<?xml version="1.0"?>
<?xml-stylesheet type="text/xsl" href="/JSBSim.xsl"?>
<fdm_config name="Mirage2000" version="2.0" release="DEVELOPMENT"
   xmlns:xsi="http://www.w3.org/2001/XMLSchema-instance"
   xsi:noNamespaceSchemaLocation="http://jsbsim.sourceforge.net/JSBSim.xsd">

    <fileheader>
        <author>Richard Harrison</author>
        <filecreationdate>2018-07-05</filecreationdate>
        <version>1.0</version>
        <copyright>Copyright (C) 2017 Richard Harrison, All rights reserved</copyright>
        <description>Dassault Mirage 2000-5 Aerodynamic data built from vspaero; CG (8.6, 0, 0.617)M, 2018-07-05 11:45</description>
        <note>Built using VSPAERO. VSPAero control sub surfaces are used for the elevons, slats and rudder. These are all then processed and this data is built from the results (together with the -stab to get the derivatives)</note>
        <note>Aircraft origin for measurements is the nose</note>
        <note>VSPAERO notes: Rudder deflection is LE right. Elevator is TE down.</note>
        <note>Cl max -1</note>
        <note>Built with AeroTool 1.0.0.0: Options: AeroDetail=Full, Gear, WakeIterations=2</note>
        <limitation></limitation>
        <reference
            refID="ZDAT/AED/2017/09-08"
            author="Richard Harrison, rjh@zaretto.com"
            title="Mirage 2000-5 Aerodynamic data built from vspaero; AeroRP (8.6, 0, 0.617)M"
            date="September, 2017"
            URL="http://www.zaretto.com/sites/zaretto.com/files/Mirage2000-data-data/rjh-zaretto-Mirage2000-aerodynamic-data-vspaero.pdf"
        />
    </fileheader>
<metrics>
  <wingarea unit="M2">33.92</wingarea>
  <wing_incidence unit="DEG">-0.36</wing_incidence>
  <wingspan unit="M">8.244</wingspan>
  <chord unit="M">4.76</chord>
  <location unit="IN" name="EYEPOINT">
    <x>197</x>
    <y>0</y>
    <z>-3.94</z>
  </location>
  <location unit="IN" name="VRP">
    <x>200</x>
    <y>0</y>
    <z>0</z>
  </location>
  <location unit="M" name="AERORP">
    <x>8.6</x>
    <y>0</y>
    <z>0.617</z>
  </location>
</metrics>

<mass_balance>
  <location unit="M" name="CG">
    <x>8.6</x>
    <y>0</y>
    <z>0.617</z>
  </location>
  <ixx unit="KG*M2">6262</ixx>
  <iyy unit="KG*M2">75686</iyy>
  <izz unit="KG*M2">78802</izz>
  <ixz unit="KG*M2">2141</ixz>
  <emptywt unit="LBS">28000</emptywt>
</mass_balance>

<ground_reactions>
  <contact type="BOGEY" name="NOSE_LG">
    <location unit="M">
      <x>4.01</x>
      <y>0</y>
      <z>-2.73</z>
    </location>
    <static_friction unit="">1</static_friction>
    <dynamic_friction unit="">0.5</dynamic_friction>
    <rolling_friction>0.02</rolling_friction>
    <spring_coeff unit="LBS/FT">48000</spring_coeff>
    <damping_coeff unit="LBS/FT/SEC">4800</damping_coeff>
    <max_steer unit="DEG">1</max_steer>
    <!--0: NOSE_LG-->
    <brake_group>NOSE</brake_group>
    <retractable>1</retractable>
  </contact>
  <contact type="BOGEY" name="LEFT_MLG">
    <location unit="M">
      <x>9</x>
      <y>-1.8</y>
      <z>-2.65</z>
    </location>
    <static_friction unit="">1</static_friction>
    <dynamic_friction unit="">0.5</dynamic_friction>
    <rolling_friction>0.02</rolling_friction>
    <spring_coeff unit="LBS/FT">48000</spring_coeff>
    <damping_coeff unit="LBS/FT/SEC">4800</damping_coeff>
    <max_steer unit="DEG">0</max_steer>
    <!--1: LEFT_MLG-->
    <brake_group>LEFT</brake_group>
    <retractable>1</retractable>
  </contact>
  <contact type="BOGEY" name="RIGHT_MLG">
    <location unit="M">
      <x>9</x>
      <y>1.8</y>
      <z>-2.65</z>
    </location>
    <static_friction unit="">1</static_friction>
    <dynamic_friction unit="">0.5</dynamic_friction>
    <rolling_friction>0.02</rolling_friction>
    <spring_coeff unit="LBS/FT">48000</spring_coeff>
    <damping_coeff unit="LBS/FT/SEC">4800</damping_coeff>
    <max_steer unit="DEG">0</max_steer>
    <!--2: RIGHT_MLG-->
    <brake_group>RIGHT</brake_group>
    <retractable>1</retractable>
  </contact>
  <contact type="STRUCTURE" name="LEFT_WING_TIP">
    <!--3: LEFT_WING_TIP-->
    <location unit="M">
      <x>11.71</x>
      <y>-4.53</y>
      <z>-0.25</z>
    </location>
    <static_friction unit="">1.2</static_friction>
    <dynamic_friction unit="">1.212</dynamic_friction>
    <rolling_friction>1.413</rolling_friction>
    <spring_coeff unit="LBS/FT">10000</spring_coeff>
    <damping_coeff unit="LBS/FT/SEC">2000</damping_coeff>
  </contact>
  <contact type="STRUCTURE" name="RIGHT_WING_TIP">
    <!--4: RIGHT_WING_TIP-->
    <location unit="M">
      <x>11.71</x>
      <y>4.53</y>
      <z>-0.25</z>
    </location>
    <static_friction unit="">1.2</static_friction>
    <dynamic_friction unit="">1.212</dynamic_friction>
    <rolling_friction>1.413</rolling_friction>
    <spring_coeff unit="LBS/FT">10000</spring_coeff>
    <damping_coeff unit="LBS/FT/SEC">2000</damping_coeff>
  </contact>
  <contact type="STRUCTURE" name="CANOPY">
    <!--5: CANOPY-->
    <location unit="M">
      <x>4.27</x>
      <y>0</y>
      <z>1.46</z>
    </location>
    <static_friction unit="">1.2</static_friction>
    <dynamic_friction unit="">1.212</dynamic_friction>
    <rolling_friction>1.413</rolling_friction>
    <spring_coeff unit="LBS/FT">10000</spring_coeff>
    <damping_coeff unit="LBS/FT/SEC">2000</damping_coeff>
  </contact>
  <contact type="STRUCTURE" name="REAR_CANOPY">
    <!--6: REAR_CANOPY-->
    <location unit="M">
      <x>5.05</x>
      <y>0</y>
      <z>1.58</z>
    </location>
    <static_friction unit="">1.2</static_friction>
    <dynamic_friction unit="">1.212</dynamic_friction>
    <rolling_friction>1.413</rolling_friction>
    <spring_coeff unit="LBS/FT">10000</spring_coeff>
    <damping_coeff unit="LBS/FT/SEC">2000</damping_coeff>
  </contact>
  <contact type="STRUCTURE" name="RADOME_FRONT">
    <!--7: RADOME_FRONT-->
    <location unit="M">
      <x>0</x>
      <y>0</y>
      <z>0</z>
    </location>
    <static_friction unit="">1.2</static_friction>
    <dynamic_friction unit="">1.212</dynamic_friction>
    <rolling_friction>1.413</rolling_friction>
    <spring_coeff unit="LBS/FT">10000</spring_coeff>
    <damping_coeff unit="LBS/FT/SEC">2000</damping_coeff>
  </contact>
  <contact type="STRUCTURE" name="VERTICAL_TAIL_FRONT">
    <!--8: VERTICAL_TAIL_FRONT-->
    <location unit="M">
      <x>13.06</x>
      <y>0</y>
      <z>3.63</z>
    </location>
    <static_friction unit="">1.2</static_friction>
    <dynamic_friction unit="">1.212</dynamic_friction>
    <rolling_friction>1.413</rolling_friction>
    <spring_coeff unit="LBS/FT">10000</spring_coeff>
    <damping_coeff unit="LBS/FT/SEC">2000</damping_coeff>
  </contact>
  <contact type="STRUCTURE" name="VERTICAL_TAIL_REAR">
    <!--9: VERTICAL_TAIL_REAR-->
    <location unit="M">
      <x>13.72</x>
      <y>0</y>
      <z>3.54</z>
    </location>
    <static_friction unit="">1.2</static_friction>
    <dynamic_friction unit="">1.212</dynamic_friction>
    <rolling_friction>1.413</rolling_friction>
    <spring_coeff unit="LBS/FT">10000</spring_coeff>
    <damping_coeff unit="LBS/FT/SEC">2000</damping_coeff>
  </contact>
  <contact type="STRUCTURE" name="REAR_BODY_LEFT">
    <!--10: REAR_BODY_LEFT-->
    <location unit="M">
      <x>13.63</x>
      <y>-0.5</y>
      <z>0.53</z>
    </location>
    <static_friction unit="">1.2</static_friction>
    <dynamic_friction unit="">1.212</dynamic_friction>
    <rolling_friction>1.413</rolling_friction>
    <spring_coeff unit="LBS/FT">10000</spring_coeff>
    <damping_coeff unit="LBS/FT/SEC">2000</damping_coeff>
  </contact>
  <contact type="STRUCTURE" name="REAR_BODY_RIGHT">
    <!--11: REAR_BODY_RIGHT-->
    <location unit="M">
      <x>13.63</x>
      <y>0.5</y>
      <z>0.53</z>
    </location>
    <static_friction unit="">1.2</static_friction>
    <dynamic_friction unit="">1.212</dynamic_friction>
    <rolling_friction>1.413</rolling_friction>
    <spring_coeff unit="LBS/FT">10000</spring_coeff>
    <damping_coeff unit="LBS/FT/SEC">2000</damping_coeff>
  </contact>
  <contact type="STRUCTURE" name="LOWER_REAR_BODY">
    <!--12: LOWER_REAR_BODY-->
    <location unit="M">
      <x>13.63</x>
      <y>0</y>
      <z>0.03</z>
    </location>
    <static_friction unit="">1.2</static_friction>
    <dynamic_friction unit="">1.212</dynamic_friction>
    <rolling_friction>1.413</rolling_friction>
    <spring_coeff unit="LBS/FT">10000</spring_coeff>
    <damping_coeff unit="LBS/FT/SEC">2000</damping_coeff>
  </contact>
  <contact type="STRUCTURE" name="LOWER_MID_REAR_BODY">
    <!--13: LOWER_MID_REAR_BODY-->
    <location unit="M">
      <x>11.56</x>
      <y>0</y>
      <z>-0.32</z>
    </location>
    <static_friction unit="">1.2</static_friction>
    <dynamic_friction unit="">1.212</dynamic_friction>
    <rolling_friction>1.413</rolling_friction>
    <spring_coeff unit="LBS/FT">10000</spring_coeff>
    <damping_coeff unit="LBS/FT/SEC">2000</damping_coeff>
  </contact>
  <contact type="STRUCTURE" name="REFUEL_PROBE">
    <!--14: REFUEL_PROBE-->
    <location unit="M">
      <x>1.53</x>
      <y>0.55</y>
      <z>1.17</z>
    </location>
    <static_friction unit="">1.2</static_friction>
    <dynamic_friction unit="">1.212</dynamic_friction>
    <rolling_friction>1.413</rolling_friction>
    <spring_coeff unit="LBS/FT">10000</spring_coeff>
    <damping_coeff unit="LBS/FT/SEC">2000</damping_coeff>
  </contact>
  <contact type="STRUCTURE" name="LEFT_STRAKE">
    <!--15: LEFT_STRAKE-->
    <location unit="M">
      <x>5.21</x>
      <y>-1.13</y>
      <z>0.64</z>
    </location>
    <static_friction unit="">1.2</static_friction>
    <dynamic_friction unit="">1.212</dynamic_friction>
    <rolling_friction>1.413</rolling_friction>
    <spring_coeff unit="LBS/FT">10000</spring_coeff>
    <damping_coeff unit="LBS/FT/SEC">2000</damping_coeff>
  </contact>
  <contact type="STRUCTURE" name="RIGHT_STRAKE">
    <!--16: RIGHT_STRAKE-->
    <location unit="M">
      <x>5.21</x>
      <y>1.13</y>
      <z>0.64</z>
    </location>
    <static_friction unit="">1.2</static_friction>
    <dynamic_friction unit="">1.212</dynamic_friction>
    <rolling_friction>1.413</rolling_friction>
    <spring_coeff unit="LBS/FT">10000</spring_coeff>
    <damping_coeff unit="LBS/FT/SEC">2000</damping_coeff>
  </contact>
  <contact type="STRUCTURE" name="FRONT_LOWER_ANTENNA">
    <!--17: FRONT_LOWER_ANTENNA-->
    <location unit="M">
      <x>2.35</x>
      <y>0</y>
      <z>-0.39</z>
    </location>
    <static_friction unit="">1.2</static_friction>
    <dynamic_friction unit="">1.212</dynamic_friction>
    <rolling_friction>1.413</rolling_friction>
    <spring_coeff unit="LBS/FT">10000</spring_coeff>
    <damping_coeff unit="LBS/FT/SEC">2000</damping_coeff>
  </contact>
  <contact type="STRUCTURE" name="VSTAB_FRONT_ANTENNA">
    <!--18: VSTAB_FRONT_ANTENNA-->
    <location unit="M">
      <x>11.98</x>
      <y>0</y>
      <z>3.06</z>
    </location>
    <static_friction unit="">1.2</static_friction>
    <dynamic_friction unit="">1.212</dynamic_friction>
    <rolling_friction>1.413</rolling_friction>
    <spring_coeff unit="LBS/FT">10000</spring_coeff>
    <damping_coeff unit="LBS/FT/SEC">2000</damping_coeff>
  </contact>
  <contact type="STRUCTURE" name="VSTAB_REAR_ANTENNA">
    <!--19: VSTAB_REAR_ANTENNA-->
    <location unit="M">
      <x>13.74</x>
      <y>0</y>
      <z>2.98</z>
    </location>
    <static_friction unit="">1.2</static_friction>
    <dynamic_friction unit="">1.212</dynamic_friction>
    <rolling_friction>1.413</rolling_friction>
    <spring_coeff unit="LBS/FT">10000</spring_coeff>
    <damping_coeff unit="LBS/FT/SEC">2000</damping_coeff>
  </contact>
  <contact type="STRUCTURE" name="CHUTE">
    <!--20: CHUTE-->
    <location unit="M">
      <x>13.83</x>
      <y>0</y>
      <z>1.21</z>
    </location>
    <static_friction unit="">1.2</static_friction>
    <dynamic_friction unit="">1.212</dynamic_friction>
    <rolling_friction>1.413</rolling_friction>
    <spring_coeff unit="LBS/FT">10000</spring_coeff>
    <damping_coeff unit="LBS/FT/SEC">2000</damping_coeff>
  </contact>
</ground_reactions>

<propulsion>
  <engine file="SNECMA_M53-P2">
    <location unit="M">
      <x>18.15</x>
      <y>0</y>
      <z>0.617</z>
    </location>
    <orient unit="DEG">
      <roll>0</roll>
      <pitch>0</pitch>
      <yaw>0</yaw>
    </orient>
    <feed>0</feed>
    <feed>1</feed>
    <feed>2</feed>
    <feed>3</feed>
    <feed>4</feed>
    <thruster file="direct">
      <location unit="M">
        <x>18.15</x>
        <y>0</y>
        <z>0.617</z>
      </location>
      <orient unit="DEG">
        <roll>0</roll>
        <pitch>0</pitch>
        <yaw>0</yaw>
      </orient>
    </thruster>
  </engine>
  <tank number="0" type="FUEL">
    <!--0: Main Tank-->
    <location unit="M">
      <x>8.6</x>
      <y>0</y>
      <z>0.617</z>
    </location>
    <capacity unit="KG">2128</capacity>
    <standpipe unit="KG">50</standpipe>
    <contents unit="KG">2128</contents>
    <priority>4</priority>
  </tank>
  <tank number="1" type="FUEL">
    <!--1: Right Wing Tank-->
    <location unit="M">
      <x>8.6</x>
      <y>4</y>
      <z>0.217</z>
    </location>
    <capacity unit="LBS">385</capacity>
    <standpipe unit="LBS">100</standpipe>
    <contents unit="LBS">385</contents>
    <priority>3</priority>
  </tank>
  <tank number="2" type="FUEL">
    <!--2: Left Wing Tank-->
    <location unit="M">
      <x>8.6</x>
      <y>-4</y>
      <z>0.217</z>
    </location>
    <capacity unit="LBS">385</capacity>
    <standpipe unit="LBS">100</standpipe>
    <contents unit="LBS">385</contents>
    <priority>3</priority>
  </tank>
  <tank number="3" type="FUEL">
    <!--3: External Tank-->
    <location unit="M">
      <x>8.6</x>
      <y>0</y>
      <z>0.008</z>
    </location>
    <capacity unit="KG">1200</capacity>
    <standpipe unit="KG">50</standpipe>
    <contents unit="KG">1200</contents>
    <priority>2</priority>
  </tank>
  <tank number="4" type="FUEL">
    <!--4: Feed line-->
    <location unit="M">
      <x>8.6</x>
      <y>0</y>
      <z>0.617</z>
    </location>
    <capacity unit="LBS">10</capacity>
    <contents unit="LBS">10</contents>
    <priority>1</priority>
  </tank>
</propulsion>

<external_reactions>
  <force name="catapult" frame="BODY">
    <location unit="IN">
      <x>667</x>
      <y>0</y>
      <z>0</z>
    </location>
    <direction>
      <x>1</x>
      <y>0</y>
      <z>0</z>
    </direction>
  </force>
  <force name="holdback" frame="BODY">
    <location unit="IN">
      <x>667</x>
      <y>0</y>
      <z>0</z>
    </location>
    <direction>
      <x>-1</x>
      <y>0</y>
      <z>0</z>
    </direction>
  </force>
  <force name="hook" frame="BODY">
    <location unit="IN">
      <x>300</x>
      <y>0</y>
      <z>0</z>
    </location>
    <direction>
      <x>-0.9995</x>
      <y>0</y>
      <z>0.01</z>
    </direction>
  </force>
</external_reactions>

<flight_control name="Mirage2000-FCS">
       <property value="8.6">metrics/cg-x-m</property>
       <property value="0.617">metrics/cg-z-m</property>
  <channel name="extra-aero">
        <!-- need %Cg in chord for moments [Xcg - Xref)/100] -->
        <summer name="cg-x-offset-chord-in">
            <input> inertia/cg-x-in</input>
            <input> -metrics/aero-rp-x-in</input>
            <output>inertia/cg-x-offset-chord-in</output>
        </summer>

        <!-- figure out the factor for the fuel tank aero -->
        <pure_gain name="cg-x-chord-percent">
            <description>Percent offset of the CoP from the CG</description>
            <input>inertia/cg-x-offset-chord-in</input>
            <gain> -0.01</gain>
            <clipto>
                <min> -1 </min>
                <max> 1 </max>
            </clipto>
            <output> inertia/cg-x-mac-percent </output>
        </pure_gain>

        <fcs_function name="pb">
            <description>PB Denormalization</description>
            <function>
                    <product>
                        <property>aero/bi2vel</property>
                        <property>velocities/p-aero-rad_sec</property>
                    </product>
            </function>
            <output>aero/pb</output>
        </fcs_function>

        <fcs_function name="cbarq-2vo">
            <description>For denormalization</description>
            <function>
                    <product>
                        <property>aero/ci2vel</property>
                        <property>velocities/q-aero-rad_sec</property>
                    </product>
            </function>
            <output>aero/qb</output>
        </fcs_function>

        <fcs_function name="rb-2vo">
            <description>For denormalization</description>
            <function>
                <product>
                        <property>aero/bi2vel</property>
                        <property>velocities/r-aero-rad_sec</property>
                    </product>
            </function>
            <output>aero/rb</output>
        </fcs_function>


        <fcs_function name="aero-cos-alpha">
            <function>
                <product>
                    <cos>
                        <property>aero/alpha-rad</property>
                    </cos>
                </product>
            </function>
            <output>aero/cos-alpha</output>
        </fcs_function>

        <fcs_function name="aero-sin-alpha">
            <function>
                <product>
                    <sin>
                        <property>aero/alpha-rad</property>
                    </sin>
                </product>
            </function>
            <output>aero/sin-alpha</output>
        </fcs_function>
       </channel>
</flight_control>
<system file="Mirage-2000-hydraulics"/>
<system file="Mirage-2000-electrics"/>
<system file="Mirage-2000-avionics"/>
<system file="Mirage-2000-ecs"/>
<system file="Mirage-2000-fadec"/>
<system file="Mirage-2000-engines-Snecma-M53"/>
<system file="Mirage-2000-fcs"/>
<aerodynamics>
    <function name="aero/c/CFXB">
    <description>BASIC DRAG</description>
    <product>
          <table>
            <independentVar lookup="row">aero/alpha-deg</independentVar>
            <tableData>
                    -10		    0.05346
                     -5		    0.03006
                     -2		    0.02463
                      0		    0.02452
                      2		    0.02738
                      4		    0.03360
                      6		    0.04402
                      8		    0.05999
                     10		    0.08344
                     12		    0.11689
                     14		    0.16336
                     16		    0.22490
                     18		    0.30019
                     20		    0.38423
                     22		    0.46629
                     24		    0.54198
                     30		    0.72799
                     35		    0.87433
                     40		    1.03959
                     50		    1.46703
                     60		    2.02739
            </tableData>
          </table>
       </product>
    </function>
    <function name="aero/c/CFXDED1L">
    <description>DRAG DUE TO ELEVON 1L</description>
    <product>
          <table>
            <independentVar lookup="row">aero/alpha-deg</independentVar>
            <independentVar lookup="column">aero/beta-deg</independentVar>
            <independentVar lookup="table">fcs/elevon-1L-pos-deg</independentVar>
              <tableData breakPoint="-16">
                               -7	        -5	        -2	         0	         2	         5	         7
                    -10	    0.01180	    0.01444	    0.01441	    0.01413	    0.01342	    0.01286	    0.01232
                     -5	    0.00755	    0.00760	    0.00897	    0.00905	    0.00840	    0.00960	    0.00916
                     -2	    0.00433	    0.00438	    0.00546	    0.00579	    0.00571	    0.00605	    0.00614
                      0	    0.00233	    0.00254	    0.00318	    0.00353	    0.00331	    0.00372	    0.00384
                      2	    0.00036	    0.00066	    0.00108	    0.00107	    0.00079	    0.00123	    0.00164
                      4	  -0.00175	  -0.00137	  -0.00156	  -0.00119	  -0.00081	  -0.00113	  -0.00050
                      6	  -0.00390	  -0.00391	  -0.00389	  -0.00337	  -0.00282	  -0.00314	  -0.00273
                      8	  -0.00660	  -0.00707	  -0.00635	  -0.00557	  -0.00511	  -0.00463	  -0.00467
                     10	  -0.00928	  -0.00899	  -0.00839	  -0.00778	  -0.00714	  -0.00616	  -0.00563
                     12	  -0.01107	  -0.01142	  -0.01067	  -0.01005	  -0.00936	  -0.00810	  -0.00684
                     14	  -0.01418	  -0.01379	  -0.01296	  -0.01270	  -0.01162	  -0.01052	  -0.00971
                     16	  -0.01804	  -0.01624	  -0.01537	  -0.01474	  -0.01393	  -0.01271	  -0.01185
                     18	  -0.01906	  -0.01977	  -0.01774	  -0.01838	  -0.01627	  -0.01603	  -0.01235
                     20	  -0.02154	  -0.02304	  -0.02230	  -0.02052	  -0.01946	  -0.01891	  -0.01388
                     22	  -0.02662	  -0.02679	  -0.02535	  -0.02337	  -0.02196	  -0.01968	  -0.01451
                     24	  -0.02741	  -0.02877	  -0.02610	  -0.02630	  -0.02228	  -0.01612	  -0.01812
                     30	  -0.03503	  -0.02840	  -0.03211	  -0.03703	  -0.03230	  -0.03319	  -0.02293
                     35	  -0.04487	  -0.04379	  -0.04091	  -0.04284	  -0.03928	  -0.03512	  -0.03300
                     40	  -0.04878	  -0.05007	  -0.04972	  -0.04469	  -0.04437	  -0.04029	  -0.03703
                     50	  -0.09114	  -0.06233	  -0.05958	  -0.05165	  -0.05521	  -0.05222	  -0.07622
                     60	  -0.07297	  -0.07200	  -0.06910	  -0.07659	  -0.06353	  -0.06291	  -0.05462
              </tableData>
              <tableData breakPoint="-10">
                               -7	        -5	        -2	         0	         2	         5	         7
                    -10	    0.00657	    0.00850	    0.00854	    0.00845	    0.00800	    0.00766	    0.00712
                     -5	    0.00393	    0.00411	    0.00491	    0.00501	    0.00462	    0.00546	    0.00505
                     -2	    0.00203	    0.00202	    0.00261	    0.00285	    0.00290	    0.00313	    0.00331
                      0	    0.00045	    0.00086	    0.00116	    0.00136	    0.00135	    0.00167	    0.00159
                      2	  -0.00063	  -0.00041	  -0.00023	  -0.00021	  -0.00029	    0.00002	    0.00039
                      4	  -0.00199	  -0.00173	  -0.00188	  -0.00161	  -0.00133	  -0.00150	  -0.00104
                      6	  -0.00339	  -0.00338	  -0.00339	  -0.00298	  -0.00261	  -0.00280	  -0.00247
                      8	  -0.00508	  -0.00530	  -0.00501	  -0.00437	  -0.00413	  -0.00353	  -0.00362
                     10	  -0.00668	  -0.00669	  -0.00623	  -0.00578	  -0.00533	  -0.00468	  -0.00456
                     12	  -0.00770	  -0.00823	  -0.00768	  -0.00723	  -0.00673	  -0.00606	  -0.00471
                     14	  -0.01002	  -0.00973	  -0.00911	  -0.00873	  -0.00817	  -0.00746	  -0.00687
                     16	  -0.01156	  -0.01127	  -0.01062	  -0.01016	  -0.00962	  -0.00883	  -0.00827
                     18	  -0.01308	  -0.01386	  -0.01213	  -0.01276	  -0.01112	  -0.01127	  -0.00798
                     20	  -0.01462	  -0.01611	  -0.01450	  -0.01410	  -0.01339	  -0.01329	  -0.01065
                     22	  -0.01874	  -0.01798	  -0.01610	  -0.01594	  -0.01422	  -0.01137	  -0.01190
                     24	  -0.01828	  -0.01988	  -0.01753	  -0.01782	  -0.01515	  -0.01088	  -0.01256
                     30	  -0.02260	  -0.02001	  -0.02119	  -0.02469	  -0.02140	  -0.02139	  -0.01309
                     35	  -0.02899	  -0.02826	  -0.02637	  -0.02632	  -0.02582	  -0.02256	  -0.02118
                     40	  -0.03170	  -0.03322	  -0.03057	  -0.02752	  -0.02821	  -0.02693	  -0.02395
                     50	  -0.06729	  -0.03876	  -0.03708	  -0.02933	  -0.03425	  -0.03176	  -0.05764
                     60	  -0.04429	  -0.04372	  -0.04175	  -0.05004	  -0.03819	  -0.04015	  -0.03254
              </tableData>
              <tableData breakPoint="-5">
                               -7	        -5	        -2	         0	         2	         5	         7
                    -10	    0.00348	    0.00393	    0.00399	    0.00403	    0.00375	    0.00360	    0.00374
                     -5	    0.00162	    0.00169	    0.00209	    0.00217	    0.00198	    0.00241	    0.00225
                     -2	    0.00066	    0.00066	    0.00092	    0.00105	    0.00111	    0.00124	    0.00134
                      0	  -0.00003	    0.00006	    0.00020	    0.00029	    0.00033	    0.00043	    0.00049
                      2	  -0.00071	  -0.00058	  -0.00054	  -0.00050	  -0.00050	  -0.00034	  -0.00018
                      4	  -0.00139	  -0.00125	  -0.00134	  -0.00120	  -0.00103	  -0.00110	  -0.00085
                      6	  -0.00210	  -0.00214	  -0.00211	  -0.00185	  -0.00167	  -0.00175	  -0.00158
                      8	  -0.00284	  -0.00309	  -0.00299	  -0.00254	  -0.00250	  -0.00210	  -0.00201
                     10	  -0.00400	  -0.00378	  -0.00351	  -0.00324	  -0.00303	  -0.00268	  -0.00260
                     12	  -0.00383	  -0.00453	  -0.00423	  -0.00395	  -0.00373	  -0.00337	  -0.00222
                     14	  -0.00545	  -0.00532	  -0.00495	  -0.00470	  -0.00445	  -0.00409	  -0.00377
                     16	  -0.00623	  -0.00606	  -0.00571	  -0.00535	  -0.00517	  -0.00475	  -0.00449
                     18	  -0.00694	  -0.00690	  -0.00645	  -0.00670	  -0.00591	  -0.00546	  -0.00354
                     20	  -0.00773	  -0.00776	  -0.00800	  -0.00756	  -0.00739	  -0.00627	  -0.00562
                     22	  -0.00843	  -0.00845	  -0.00809	  -0.00845	  -0.00743	  -0.00495	  -0.00622
                     24	  -0.00952	  -0.01058	  -0.00889	  -0.00931	  -0.00759	  -0.00621	  -0.00707
                     30	  -0.01220	  -0.00878	  -0.01037	  -0.01241	  -0.01047	  -0.01044	  -0.00974
                     35	  -0.01470	  -0.01432	  -0.01335	  -0.01608	  -0.01377	  -0.01138	  -0.01067
                     40	  -0.01548	  -0.01666	  -0.01531	  -0.01164	  -0.01410	  -0.01344	  -0.01234
                     50	  -0.04715	  -0.01902	  -0.01816	  -0.01030	  -0.01673	  -0.01548	  -0.04225
                     60	  -0.02130	  -0.02092	  -0.01998	  -0.02758	  -0.01815	  -0.02172	  -0.01538
              </tableData>
              <tableData breakPoint="0">
                               -7	        -5	        -2	         0	         2	         5	         7
                    -10	    0.00000	    0.00000	    0.00000	    0.00000	    0.00000	    0.00000	    0.00000
                     -5	    0.00000	    0.00000	    0.00000	    0.00000	    0.00000	    0.00000	    0.00000
                     -2	    0.00000	    0.00000	    0.00000	    0.00000	    0.00000	    0.00000	    0.00000
                      0	    0.00000	    0.00000	    0.00000	    0.00000	    0.00000	    0.00000	    0.00000
                      2	    0.00000	    0.00000	    0.00000	    0.00000	    0.00000	    0.00000	    0.00000
                      4	    0.00000	    0.00000	    0.00000	    0.00000	    0.00000	    0.00000	    0.00000
                      6	    0.00000	    0.00000	    0.00000	    0.00000	    0.00000	    0.00000	    0.00000
                      8	    0.00000	    0.00000	    0.00000	    0.00000	    0.00000	    0.00000	    0.00000
                     10	    0.00000	    0.00000	    0.00000	    0.00000	    0.00000	    0.00000	    0.00000
                     12	    0.00000	    0.00000	    0.00000	    0.00000	    0.00000	    0.00000	    0.00000
                     14	    0.00000	    0.00000	    0.00000	    0.00000	    0.00000	    0.00000	    0.00000
                     16	    0.00000	    0.00000	    0.00000	    0.00000	    0.00000	    0.00000	    0.00000
                     18	    0.00000	    0.00000	    0.00000	    0.00000	    0.00000	    0.00000	    0.00000
                     20	    0.00000	    0.00000	    0.00000	    0.00000	    0.00000	    0.00000	    0.00000
                     22	    0.00000	    0.00000	    0.00000	    0.00000	    0.00000	    0.00000	    0.00000
                     24	    0.00000	    0.00000	    0.00000	    0.00000	    0.00000	    0.00000	    0.00000
                     30	    0.00000	    0.00000	    0.00000	    0.00000	    0.00000	    0.00000	    0.00000
                     35	    0.00000	    0.00000	    0.00000	    0.00000	    0.00000	    0.00000	    0.00000
                     40	    0.00000	    0.00000	    0.00000	    0.00000	    0.00000	    0.00000	    0.00000
                     50	    0.00000	    0.00000	    0.00000	    0.00000	    0.00000	    0.00000	    0.00000
                     60	    0.00000	    0.00000	    0.00000	    0.00000	    0.00000	    0.00000	    0.00000
              </tableData>
              <tableData breakPoint="5">
                               -7	        -5	        -2	         0	         2	         5	         7
                    -10	  -0.00260	  -0.00311	  -0.00323	  -0.00309	  -0.00309	  -0.00296	  -0.00312
                     -5	  -0.00084	  -0.00091	  -0.00131	  -0.00137	  -0.00127	  -0.00169	  -0.00161
                     -2	    0.00020	    0.00005	  -0.00009	  -0.00024	  -0.00038	  -0.00056	  -0.00054
                      0	    0.00075	    0.00075	    0.00064	    0.00056	    0.00037	    0.00031	    0.00014
                      2	    0.00160	    0.00133	    0.00130	    0.00130	    0.00116	    0.00105	    0.00099
                      4	    0.00215	    0.00201	    0.00215	    0.00201	    0.00177	    0.00180	    0.00151
                      6	    0.00286	    0.00294	    0.00288	    0.00266	    0.00237	    0.00243	    0.00223
                      8	    0.00388	    0.00387	    0.00358	    0.00332	    0.00302	    0.00272	    0.00289
                     10	    0.00481	    0.00456	    0.00423	    0.00399	    0.00367	    0.00329	    0.00318
                     12	    0.00546	    0.00528	    0.00490	    0.00466	    0.00433	    0.00396	    0.00368
                     14	    0.00619	    0.00598	    0.00559	    0.00533	    0.00502	    0.00460	    0.00429
                     16	    0.00664	    0.00672	    0.00630	    0.00613	    0.00571	    0.00527	    0.00467
                     18	    0.00910	    0.00756	    0.00702	    0.00691	    0.00641	    0.00598	    0.00540
                     20	    0.00828	    0.00829	    0.00852	    0.00688	    0.00710	    0.00667	    0.00598
                     22	    0.00890	    0.01108	    0.00854	    0.00758	    0.00783	    0.00722	    0.00383
                     24	    0.00994	    0.00958	    0.00981	    0.00828	    0.00845	    0.00632	    0.00732
                     30	    0.01236	    0.01210	    0.01150	    0.01142	    0.01154	    0.00973	    0.00988
                     35	    0.01457	    0.01410	    0.01315	    0.00941	    0.01207	    0.01110	    0.01040
                     40	    0.01581	    0.01608	    0.02680	    0.01759	    0.02549	    0.01282	    0.01175
                     50	    0.01917	    0.01753	    0.01664	    0.02409	    0.01520	    0.01400	    0.01392
                     60	    0.01855	    0.01810	    0.01713	    0.00842	    0.01539	    0.01389	    0.01277
              </tableData>
              <tableData breakPoint="10">
                               -7	        -5	        -2	         0	         2	         5	         7
                    -10	  -0.00438	  -0.00534	  -0.00564	  -0.00552	  -0.00543	  -0.00522	  -0.00552
                     -5	  -0.00091	  -0.00103	  -0.00181	  -0.00195	  -0.00179	  -0.00266	  -0.00254
                     -2	    0.00093	    0.00084	    0.00064	    0.00033	  -0.00003	  -0.00038	  -0.00055
                      0	    0.00241	    0.00224	    0.00206	    0.00189	    0.00144	    0.00130	    0.00105
                      2	    0.00377	    0.00334	    0.00335	    0.00333	    0.00297	    0.00276	    0.00242
                      4	    0.00494	    0.00463	    0.00498	    0.00465	    0.00417	    0.00421	    0.00359
                      6	    0.00630	    0.00585	    0.00639	    0.00599	    0.00545	    0.00480	    0.00502
                      8	    0.00839	    0.00787	    0.00775	    0.00714	    0.00657	    0.00547	    0.00629
                     10	    0.01021	    0.00970	    0.00898	    0.00841	    0.00816	    0.00705	    0.00681
                     12	    0.01145	    0.01107	    0.01027	    0.00966	    0.00908	    0.00832	    0.00775
                     14	    0.01285	    0.01237	    0.01158	    0.01092	    0.01041	    0.00954	    0.00893
                     16	    0.01396	    0.01382	    0.01295	    0.01231	    0.01172	    0.01082	    0.00993
                     18	    0.01700	    0.01534	    0.01430	    0.01269	    0.01378	    0.01217	    0.01101
                     20	    0.01677	    0.01679	    0.01652	    0.01414	    0.01434	    0.01347	    0.00994
                     22	    0.01791	    0.02022	    0.01824	    0.01761	    0.01571	    0.01229	    0.01034
                     24	    0.01989	    0.02048	    0.02010	    0.01826	    0.01686	    0.01320	    0.01245
                     30	    0.02437	    0.02386	    0.02265	    0.01909	    0.02172	    0.02020	    0.01864
                     35	    0.02833	    0.02745	    0.02423	    0.02383	    0.02345	    0.02150	    0.02149
                     40	    0.02982	    0.02795	    0.04079	    0.02938	    0.03831	    0.02178	    0.02245
                     50	    0.03605	    0.03290	    0.03114	    0.03784	    0.02832	    0.02599	    0.02579
                     60	    0.03371	    0.03276	    0.03085	    0.01970	    0.02748	    0.02459	    0.02251
              </tableData>
              <tableData breakPoint="20">
                               -7	        -5	        -2	         0	         2	         5	         7
                    -10	  -0.00587	  -0.00726	  -0.00813	  -0.00803	  -0.00806	  -0.00715	  -0.00824
                     -5	    0.00092	    0.00065	  -0.00067	  -0.00099	  -0.00083	  -0.00260	  -0.00254
                     -2	    0.00471	    0.00407	    0.00397	    0.00342	    0.00239	    0.00163	    0.00139
                      0	    0.00718	    0.00657	    0.00661	    0.00626	    0.00515	    0.00468	    0.00421
                      2	    0.00947	    0.00884	    0.00884	    0.00892	    0.00788	    0.00754	    0.00667
                      4	    0.01190	    0.01102	    0.01205	    0.01137	    0.01029	    0.01026	    0.00906
                      6	    0.01430	    0.01382	    0.01449	    0.01366	    0.01243	    0.01154	    0.01137
                      8	    0.01828	    0.01709	    0.01660	    0.01579	    0.01444	    0.01257	    0.01376
                     10	    0.02166	    0.02061	    0.01904	    0.01816	    0.01707	    0.01497	    0.01454
                     12	    0.02381	    0.02201	    0.02132	    0.02003	    0.01888	    0.01730	    0.01620
                     14	    0.02626	    0.02530	    0.02362	    0.02228	    0.02122	    0.01947	    0.01829
                     16	    0.02839	    0.02758	    0.02719	    0.02466	    0.02422	    0.02261	    0.01843
                     18	    0.03228	    0.02885	    0.02975	    0.02813	    0.02653	    0.02405	    0.02175
                     20	    0.03292	    0.03094	    0.03072	    0.02997	    0.02801	    0.02431	    0.02141
                     22	    0.04360	    0.03728	    0.03440	    0.03305	    0.02945	    0.02435	    0.03183
                     24	    0.03819	    0.04098	    0.03706	    0.03454	    0.03223	    0.02713	    0.02553
                     30	    0.04556	    0.04459	    0.04162	    0.03627	    0.04009	    0.03703	    0.03503
                     35	    0.05172	    0.05000	    0.04536	    0.04366	    0.04253	    0.03882	    0.03772
                     40	    0.05401	    0.05196	    0.06338	    0.04994	    0.05516	    0.04037	    0.03878
                     50	    0.06130	    0.05572	    0.05240	    0.05836	    0.04936	    0.04299	    0.04241
                     60	    0.05303	    0.05112	    0.04744	    0.03441	    0.04131	    0.03632	    0.03885
              </tableData>
              <tableData breakPoint="25">
                               -7	        -5	        -2	         0	         2	         5	         7
                    -10	  -0.00582	  -0.00681	  -0.00827	  -0.00832	  -0.00833	  -0.00751	  -0.00871
                     -5	    0.00245	    0.00210	    0.00072	    0.00021	    0.00034	  -0.00186	  -0.00187
                     -2	    0.00691	    0.00614	    0.00611	    0.00551	    0.00408	    0.00310	    0.00267
                      0	    0.00981	    0.00906	    0.00929	    0.00888	    0.00741	    0.00677	    0.00611
                      2	    0.01253	    0.01180	    0.01194	    0.01200	    0.01061	    0.01037	    0.00907
                      4	    0.01548	    0.01436	    0.01548	    0.01485	    0.01350	    0.01324	    0.01193
                      6	    0.01829	    0.01780	    0.01854	    0.01747	    0.01596	    0.01495	    0.01465
                      8	    0.02134	    0.02178	    0.02099	    0.02013	    0.01829	    0.01602	    0.01738
                     10	    0.02707	    0.02481	    0.02379	    0.02264	    0.02129	    0.01879	    0.01822
                     12	    0.02952	    0.02745	    0.02643	    0.02483	    0.02338	    0.02147	    0.02011
                     14	    0.03236	    0.02981	    0.02907	    0.02743	    0.02611	    0.02398	    0.02253
                     16	    0.03479	    0.03376	    0.03304	    0.03158	    0.02946	    0.02746	    0.02293
                     18	    0.03898	    0.03536	    0.03527	    0.03403	    0.03210	    0.02923	    0.02646
                     20	    0.03990	    0.03781	    0.03719	    0.03616	    0.03388	    0.02972	    0.02632
                     22	    0.05091	    0.04453	    0.04125	    0.03959	    0.03558	    0.02990	    0.03702
                     24	    0.04586	    0.04844	    0.04576	    0.04134	    0.03835	    0.03197	    0.03095
                     30	    0.05408	    0.05291	    0.04951	    0.04375	    0.04760	    0.04346	    0.04104
                     35	    0.06076	    0.05870	    0.05346	    0.05131	    0.04981	    0.04536	    0.04383
                     40	    0.06299	    0.06084	    0.07166	    0.05753	    0.06256	    0.04703	    0.04486
                     50	    0.06956	    0.06310	    0.05915	    0.06481	    0.05521	    0.04948	    0.04729
                     60	    0.05769	    0.05535	    0.05095	    0.03736	    0.04380	    0.03803	    0.04007
              </tableData>
          </table>
       </product>
    </function>
    <function name="aero/c/CFXDED1R">
    <description>DRAG DUE TO ELEVON 1R</description>
    <product>
          <table>
            <independentVar lookup="row">aero/alpha-deg</independentVar>
            <independentVar lookup="column">aero/beta-deg</independentVar>
            <independentVar lookup="table">fcs/elevon-1R-pos-deg</independentVar>
              <tableData breakPoint="-16">
                               -7	        -5	        -2	         0	         2	         5	         7
                    -10	    0.01180	    0.01444	    0.01441	    0.01413	    0.01342	    0.01286	    0.01232
                     -5	    0.00755	    0.00760	    0.00897	    0.00905	    0.00840	    0.00960	    0.00916
                     -2	    0.00433	    0.00438	    0.00546	    0.00579	    0.00571	    0.00605	    0.00614
                      0	    0.00233	    0.00254	    0.00318	    0.00353	    0.00331	    0.00372	    0.00384
                      2	    0.00036	    0.00066	    0.00108	    0.00107	    0.00079	    0.00123	    0.00164
                      4	  -0.00175	  -0.00137	  -0.00156	  -0.00119	  -0.00081	  -0.00113	  -0.00050
                      6	  -0.00390	  -0.00391	  -0.00389	  -0.00337	  -0.00282	  -0.00314	  -0.00273
                      8	  -0.00660	  -0.00707	  -0.00635	  -0.00557	  -0.00511	  -0.00463	  -0.00467
                     10	  -0.00928	  -0.00899	  -0.00839	  -0.00778	  -0.00714	  -0.00616	  -0.00563
                     12	  -0.01107	  -0.01142	  -0.01067	  -0.01005	  -0.00936	  -0.00810	  -0.00684
                     14	  -0.01418	  -0.01379	  -0.01296	  -0.01270	  -0.01162	  -0.01052	  -0.00971
                     16	  -0.01804	  -0.01624	  -0.01537	  -0.01474	  -0.01393	  -0.01271	  -0.01185
                     18	  -0.01906	  -0.01977	  -0.01774	  -0.01838	  -0.01627	  -0.01603	  -0.01235
                     20	  -0.02154	  -0.02304	  -0.02230	  -0.02052	  -0.01946	  -0.01891	  -0.01388
                     22	  -0.02662	  -0.02679	  -0.02535	  -0.02337	  -0.02196	  -0.01968	  -0.01451
                     24	  -0.02741	  -0.02877	  -0.02610	  -0.02630	  -0.02228	  -0.01612	  -0.01812
                     30	  -0.03503	  -0.02840	  -0.03211	  -0.03703	  -0.03230	  -0.03319	  -0.02293
                     35	  -0.04487	  -0.04379	  -0.04091	  -0.04284	  -0.03928	  -0.03512	  -0.03300
                     40	  -0.04878	  -0.05007	  -0.04972	  -0.04469	  -0.04437	  -0.04029	  -0.03703
                     50	  -0.09114	  -0.06233	  -0.05958	  -0.05165	  -0.05521	  -0.05222	  -0.07622
                     60	  -0.07297	  -0.07200	  -0.06910	  -0.07659	  -0.06353	  -0.06291	  -0.05462
              </tableData>
              <tableData breakPoint="-10">
                               -7	        -5	        -2	         0	         2	         5	         7
                    -10	    0.00657	    0.00850	    0.00854	    0.00845	    0.00800	    0.00766	    0.00712
                     -5	    0.00393	    0.00411	    0.00491	    0.00501	    0.00462	    0.00546	    0.00505
                     -2	    0.00203	    0.00202	    0.00261	    0.00285	    0.00290	    0.00313	    0.00331
                      0	    0.00045	    0.00086	    0.00116	    0.00136	    0.00135	    0.00167	    0.00159
                      2	  -0.00063	  -0.00041	  -0.00023	  -0.00021	  -0.00029	    0.00002	    0.00039
                      4	  -0.00199	  -0.00173	  -0.00188	  -0.00161	  -0.00133	  -0.00150	  -0.00104
                      6	  -0.00339	  -0.00338	  -0.00339	  -0.00298	  -0.00261	  -0.00280	  -0.00247
                      8	  -0.00508	  -0.00530	  -0.00501	  -0.00437	  -0.00413	  -0.00353	  -0.00362
                     10	  -0.00668	  -0.00669	  -0.00623	  -0.00578	  -0.00533	  -0.00468	  -0.00456
                     12	  -0.00770	  -0.00823	  -0.00768	  -0.00723	  -0.00673	  -0.00606	  -0.00471
                     14	  -0.01002	  -0.00973	  -0.00911	  -0.00873	  -0.00817	  -0.00746	  -0.00687
                     16	  -0.01156	  -0.01127	  -0.01062	  -0.01016	  -0.00962	  -0.00883	  -0.00827
                     18	  -0.01308	  -0.01386	  -0.01213	  -0.01276	  -0.01112	  -0.01127	  -0.00798
                     20	  -0.01462	  -0.01611	  -0.01450	  -0.01410	  -0.01339	  -0.01329	  -0.01065
                     22	  -0.01874	  -0.01798	  -0.01610	  -0.01594	  -0.01422	  -0.01137	  -0.01190
                     24	  -0.01828	  -0.01988	  -0.01753	  -0.01782	  -0.01515	  -0.01088	  -0.01256
                     30	  -0.02260	  -0.02001	  -0.02119	  -0.02469	  -0.02140	  -0.02139	  -0.01309
                     35	  -0.02899	  -0.02826	  -0.02637	  -0.02632	  -0.02582	  -0.02256	  -0.02118
                     40	  -0.03170	  -0.03322	  -0.03057	  -0.02752	  -0.02821	  -0.02693	  -0.02395
                     50	  -0.06729	  -0.03876	  -0.03708	  -0.02933	  -0.03425	  -0.03176	  -0.05764
                     60	  -0.04429	  -0.04372	  -0.04175	  -0.05004	  -0.03819	  -0.04015	  -0.03254
              </tableData>
              <tableData breakPoint="-5">
                               -7	        -5	        -2	         0	         2	         5	         7
                    -10	    0.00348	    0.00393	    0.00399	    0.00403	    0.00375	    0.00360	    0.00374
                     -5	    0.00162	    0.00169	    0.00209	    0.00217	    0.00198	    0.00241	    0.00225
                     -2	    0.00066	    0.00066	    0.00092	    0.00105	    0.00111	    0.00124	    0.00134
                      0	  -0.00003	    0.00006	    0.00020	    0.00029	    0.00033	    0.00043	    0.00049
                      2	  -0.00071	  -0.00058	  -0.00054	  -0.00050	  -0.00050	  -0.00034	  -0.00018
                      4	  -0.00139	  -0.00125	  -0.00134	  -0.00120	  -0.00103	  -0.00110	  -0.00085
                      6	  -0.00210	  -0.00214	  -0.00211	  -0.00185	  -0.00167	  -0.00175	  -0.00158
                      8	  -0.00284	  -0.00309	  -0.00299	  -0.00254	  -0.00250	  -0.00210	  -0.00201
                     10	  -0.00400	  -0.00378	  -0.00351	  -0.00324	  -0.00303	  -0.00268	  -0.00260
                     12	  -0.00383	  -0.00453	  -0.00423	  -0.00395	  -0.00373	  -0.00337	  -0.00222
                     14	  -0.00545	  -0.00532	  -0.00495	  -0.00470	  -0.00445	  -0.00409	  -0.00377
                     16	  -0.00623	  -0.00606	  -0.00571	  -0.00535	  -0.00517	  -0.00475	  -0.00449
                     18	  -0.00694	  -0.00690	  -0.00645	  -0.00670	  -0.00591	  -0.00546	  -0.00354
                     20	  -0.00773	  -0.00776	  -0.00800	  -0.00756	  -0.00739	  -0.00627	  -0.00562
                     22	  -0.00843	  -0.00845	  -0.00809	  -0.00845	  -0.00743	  -0.00495	  -0.00622
                     24	  -0.00952	  -0.01058	  -0.00889	  -0.00931	  -0.00759	  -0.00621	  -0.00707
                     30	  -0.01220	  -0.00878	  -0.01037	  -0.01241	  -0.01047	  -0.01044	  -0.00974
                     35	  -0.01470	  -0.01432	  -0.01335	  -0.01608	  -0.01377	  -0.01138	  -0.01067
                     40	  -0.01548	  -0.01666	  -0.01531	  -0.01164	  -0.01410	  -0.01344	  -0.01234
                     50	  -0.04715	  -0.01902	  -0.01816	  -0.01030	  -0.01673	  -0.01548	  -0.04225
                     60	  -0.02130	  -0.02092	  -0.01998	  -0.02758	  -0.01815	  -0.02172	  -0.01538
              </tableData>
              <tableData breakPoint="0">
                               -7	        -5	        -2	         0	         2	         5	         7
                    -10	    0.00000	    0.00000	    0.00000	    0.00000	    0.00000	    0.00000	    0.00000
                     -5	    0.00000	    0.00000	    0.00000	    0.00000	    0.00000	    0.00000	    0.00000
                     -2	    0.00000	    0.00000	    0.00000	    0.00000	    0.00000	    0.00000	    0.00000
                      0	    0.00000	    0.00000	    0.00000	    0.00000	    0.00000	    0.00000	    0.00000
                      2	    0.00000	    0.00000	    0.00000	    0.00000	    0.00000	    0.00000	    0.00000
                      4	    0.00000	    0.00000	    0.00000	    0.00000	    0.00000	    0.00000	    0.00000
                      6	    0.00000	    0.00000	    0.00000	    0.00000	    0.00000	    0.00000	    0.00000
                      8	    0.00000	    0.00000	    0.00000	    0.00000	    0.00000	    0.00000	    0.00000
                     10	    0.00000	    0.00000	    0.00000	    0.00000	    0.00000	    0.00000	    0.00000
                     12	    0.00000	    0.00000	    0.00000	    0.00000	    0.00000	    0.00000	    0.00000
                     14	    0.00000	    0.00000	    0.00000	    0.00000	    0.00000	    0.00000	    0.00000
                     16	    0.00000	    0.00000	    0.00000	    0.00000	    0.00000	    0.00000	    0.00000
                     18	    0.00000	    0.00000	    0.00000	    0.00000	    0.00000	    0.00000	    0.00000
                     20	    0.00000	    0.00000	    0.00000	    0.00000	    0.00000	    0.00000	    0.00000
                     22	    0.00000	    0.00000	    0.00000	    0.00000	    0.00000	    0.00000	    0.00000
                     24	    0.00000	    0.00000	    0.00000	    0.00000	    0.00000	    0.00000	    0.00000
                     30	    0.00000	    0.00000	    0.00000	    0.00000	    0.00000	    0.00000	    0.00000
                     35	    0.00000	    0.00000	    0.00000	    0.00000	    0.00000	    0.00000	    0.00000
                     40	    0.00000	    0.00000	    0.00000	    0.00000	    0.00000	    0.00000	    0.00000
                     50	    0.00000	    0.00000	    0.00000	    0.00000	    0.00000	    0.00000	    0.00000
                     60	    0.00000	    0.00000	    0.00000	    0.00000	    0.00000	    0.00000	    0.00000
              </tableData>
              <tableData breakPoint="5">
                               -7	        -5	        -2	         0	         2	         5	         7
                    -10	  -0.00260	  -0.00311	  -0.00323	  -0.00309	  -0.00309	  -0.00296	  -0.00312
                     -5	  -0.00084	  -0.00091	  -0.00131	  -0.00137	  -0.00127	  -0.00169	  -0.00161
                     -2	    0.00020	    0.00005	  -0.00009	  -0.00024	  -0.00038	  -0.00056	  -0.00054
                      0	    0.00075	    0.00075	    0.00064	    0.00056	    0.00037	    0.00031	    0.00014
                      2	    0.00160	    0.00133	    0.00130	    0.00130	    0.00116	    0.00105	    0.00099
                      4	    0.00215	    0.00201	    0.00215	    0.00201	    0.00177	    0.00180	    0.00151
                      6	    0.00286	    0.00294	    0.00288	    0.00266	    0.00237	    0.00243	    0.00223
                      8	    0.00388	    0.00387	    0.00358	    0.00332	    0.00302	    0.00272	    0.00289
                     10	    0.00481	    0.00456	    0.00423	    0.00399	    0.00367	    0.00329	    0.00318
                     12	    0.00546	    0.00528	    0.00490	    0.00466	    0.00433	    0.00396	    0.00368
                     14	    0.00619	    0.00598	    0.00559	    0.00533	    0.00502	    0.00460	    0.00429
                     16	    0.00664	    0.00672	    0.00630	    0.00613	    0.00571	    0.00527	    0.00467
                     18	    0.00910	    0.00756	    0.00702	    0.00691	    0.00641	    0.00598	    0.00540
                     20	    0.00828	    0.00829	    0.00852	    0.00688	    0.00710	    0.00667	    0.00598
                     22	    0.00890	    0.01108	    0.00854	    0.00758	    0.00783	    0.00722	    0.00383
                     24	    0.00994	    0.00958	    0.00981	    0.00828	    0.00845	    0.00632	    0.00732
                     30	    0.01236	    0.01210	    0.01150	    0.01142	    0.01154	    0.00973	    0.00988
                     35	    0.01457	    0.01410	    0.01315	    0.00941	    0.01207	    0.01110	    0.01040
                     40	    0.01581	    0.01608	    0.02680	    0.01759	    0.02549	    0.01282	    0.01175
                     50	    0.01917	    0.01753	    0.01664	    0.02409	    0.01520	    0.01400	    0.01392
                     60	    0.01855	    0.01810	    0.01713	    0.00842	    0.01539	    0.01389	    0.01277
              </tableData>
              <tableData breakPoint="10">
                               -7	        -5	        -2	         0	         2	         5	         7
                    -10	  -0.00438	  -0.00534	  -0.00564	  -0.00552	  -0.00543	  -0.00522	  -0.00552
                     -5	  -0.00091	  -0.00103	  -0.00181	  -0.00195	  -0.00179	  -0.00266	  -0.00254
                     -2	    0.00093	    0.00084	    0.00064	    0.00033	  -0.00003	  -0.00038	  -0.00055
                      0	    0.00241	    0.00224	    0.00206	    0.00189	    0.00144	    0.00130	    0.00105
                      2	    0.00377	    0.00334	    0.00335	    0.00333	    0.00297	    0.00276	    0.00242
                      4	    0.00494	    0.00463	    0.00498	    0.00465	    0.00417	    0.00421	    0.00359
                      6	    0.00630	    0.00585	    0.00639	    0.00599	    0.00545	    0.00480	    0.00502
                      8	    0.00839	    0.00787	    0.00775	    0.00714	    0.00657	    0.00547	    0.00629
                     10	    0.01021	    0.00970	    0.00898	    0.00841	    0.00816	    0.00705	    0.00681
                     12	    0.01145	    0.01107	    0.01027	    0.00966	    0.00908	    0.00832	    0.00775
                     14	    0.01285	    0.01237	    0.01158	    0.01092	    0.01041	    0.00954	    0.00893
                     16	    0.01396	    0.01382	    0.01295	    0.01231	    0.01172	    0.01082	    0.00993
                     18	    0.01700	    0.01534	    0.01430	    0.01269	    0.01378	    0.01217	    0.01101
                     20	    0.01677	    0.01679	    0.01652	    0.01414	    0.01434	    0.01347	    0.00994
                     22	    0.01791	    0.02022	    0.01824	    0.01761	    0.01571	    0.01229	    0.01034
                     24	    0.01989	    0.02048	    0.02010	    0.01826	    0.01686	    0.01320	    0.01245
                     30	    0.02437	    0.02386	    0.02265	    0.01909	    0.02172	    0.02020	    0.01864
                     35	    0.02833	    0.02745	    0.02423	    0.02383	    0.02345	    0.02150	    0.02149
                     40	    0.02982	    0.02795	    0.04079	    0.02938	    0.03831	    0.02178	    0.02245
                     50	    0.03605	    0.03290	    0.03114	    0.03784	    0.02832	    0.02599	    0.02579
                     60	    0.03371	    0.03276	    0.03085	    0.01970	    0.02748	    0.02459	    0.02251
              </tableData>
              <tableData breakPoint="20">
                               -7	        -5	        -2	         0	         2	         5	         7
                    -10	  -0.00587	  -0.00726	  -0.00813	  -0.00803	  -0.00806	  -0.00715	  -0.00824
                     -5	    0.00092	    0.00065	  -0.00067	  -0.00099	  -0.00083	  -0.00260	  -0.00254
                     -2	    0.00471	    0.00407	    0.00397	    0.00342	    0.00239	    0.00163	    0.00139
                      0	    0.00718	    0.00657	    0.00661	    0.00626	    0.00515	    0.00468	    0.00421
                      2	    0.00947	    0.00884	    0.00884	    0.00892	    0.00788	    0.00754	    0.00667
                      4	    0.01190	    0.01102	    0.01205	    0.01137	    0.01029	    0.01026	    0.00906
                      6	    0.01430	    0.01382	    0.01449	    0.01366	    0.01243	    0.01154	    0.01137
                      8	    0.01828	    0.01709	    0.01660	    0.01579	    0.01444	    0.01257	    0.01376
                     10	    0.02166	    0.02061	    0.01904	    0.01816	    0.01707	    0.01497	    0.01454
                     12	    0.02381	    0.02201	    0.02132	    0.02003	    0.01888	    0.01730	    0.01620
                     14	    0.02626	    0.02530	    0.02362	    0.02228	    0.02122	    0.01947	    0.01829
                     16	    0.02839	    0.02758	    0.02719	    0.02466	    0.02422	    0.02261	    0.01843
                     18	    0.03228	    0.02885	    0.02975	    0.02813	    0.02653	    0.02405	    0.02175
                     20	    0.03292	    0.03094	    0.03072	    0.02997	    0.02801	    0.02431	    0.02141
                     22	    0.04360	    0.03728	    0.03440	    0.03305	    0.02945	    0.02435	    0.03183
                     24	    0.03819	    0.04098	    0.03706	    0.03454	    0.03223	    0.02713	    0.02553
                     30	    0.04556	    0.04459	    0.04162	    0.03627	    0.04009	    0.03703	    0.03503
                     35	    0.05172	    0.05000	    0.04536	    0.04366	    0.04253	    0.03882	    0.03772
                     40	    0.05401	    0.05196	    0.06338	    0.04994	    0.05516	    0.04037	    0.03878
                     50	    0.06130	    0.05572	    0.05240	    0.05836	    0.04936	    0.04299	    0.04241
                     60	    0.05303	    0.05112	    0.04744	    0.03441	    0.04131	    0.03632	    0.03885
              </tableData>
              <tableData breakPoint="25">
                               -7	        -5	        -2	         0	         2	         5	         7
                    -10	  -0.00582	  -0.00681	  -0.00827	  -0.00832	  -0.00833	  -0.00751	  -0.00871
                     -5	    0.00245	    0.00210	    0.00072	    0.00021	    0.00034	  -0.00186	  -0.00187
                     -2	    0.00691	    0.00614	    0.00611	    0.00551	    0.00408	    0.00310	    0.00267
                      0	    0.00981	    0.00906	    0.00929	    0.00888	    0.00741	    0.00677	    0.00611
                      2	    0.01253	    0.01180	    0.01194	    0.01200	    0.01061	    0.01037	    0.00907
                      4	    0.01548	    0.01436	    0.01548	    0.01485	    0.01350	    0.01324	    0.01193
                      6	    0.01829	    0.01780	    0.01854	    0.01747	    0.01596	    0.01495	    0.01465
                      8	    0.02134	    0.02178	    0.02099	    0.02013	    0.01829	    0.01602	    0.01738
                     10	    0.02707	    0.02481	    0.02379	    0.02264	    0.02129	    0.01879	    0.01822
                     12	    0.02952	    0.02745	    0.02643	    0.02483	    0.02338	    0.02147	    0.02011
                     14	    0.03236	    0.02981	    0.02907	    0.02743	    0.02611	    0.02398	    0.02253
                     16	    0.03479	    0.03376	    0.03304	    0.03158	    0.02946	    0.02746	    0.02293
                     18	    0.03898	    0.03536	    0.03527	    0.03403	    0.03210	    0.02923	    0.02646
                     20	    0.03990	    0.03781	    0.03719	    0.03616	    0.03388	    0.02972	    0.02632
                     22	    0.05091	    0.04453	    0.04125	    0.03959	    0.03558	    0.02990	    0.03702
                     24	    0.04586	    0.04844	    0.04576	    0.04134	    0.03835	    0.03197	    0.03095
                     30	    0.05408	    0.05291	    0.04951	    0.04375	    0.04760	    0.04346	    0.04104
                     35	    0.06076	    0.05870	    0.05346	    0.05131	    0.04981	    0.04536	    0.04383
                     40	    0.06299	    0.06084	    0.07166	    0.05753	    0.06256	    0.04703	    0.04486
                     50	    0.06956	    0.06310	    0.05915	    0.06481	    0.05521	    0.04948	    0.04729
                     60	    0.05769	    0.05535	    0.05095	    0.03736	    0.04380	    0.03803	    0.04007
              </tableData>
          </table>
       </product>
    </function>
    <function name="aero/c/CFXDED2L">
    <description>DRAG DUE TO ELEVON 2L</description>
    <product>
          <table>
            <independentVar lookup="row">aero/alpha-deg</independentVar>
            <independentVar lookup="column">aero/beta-deg</independentVar>
            <independentVar lookup="table">fcs/elevon-2L-pos-deg</independentVar>
              <tableData breakPoint="-16">
                               -7	        -5	        -2	         0	         2	         5	         7
                    -10	    0.01015	    0.00973	    0.01053	    0.01106	    0.01062	    0.01047	    0.00998
                     -5	    0.00541	    0.00553	    0.00629	    0.00640	    0.00591	    0.00719	    0.00747
                     -2	    0.00258	    0.00276	    0.00297	    0.00376	    0.00442	    0.00489	    0.00554
                      0	    0.00057	    0.00112	    0.00161	    0.00224	    0.00290	    0.00353	    0.00381
                      2	  -0.00109	  -0.00062	    0.00013	    0.00072	    0.00111	    0.00202	    0.00223
                      4	  -0.00322	  -0.00246	  -0.00129	  -0.00098	  -0.00044	    0.00015	    0.00084
                      6	  -0.00512	  -0.00431	  -0.00311	  -0.00272	  -0.00226	  -0.00146	  -0.00112
                      8	  -0.00669	  -0.00602	  -0.00517	  -0.00453	  -0.00428	  -0.00303	  -0.00233
                     10	  -0.00823	  -0.00779	  -0.00681	  -0.00640	  -0.00600	  -0.00511	  -0.00357
                     12	  -0.00936	  -0.00920	  -0.00861	  -0.00820	  -0.00784	  -0.00772	  -0.00461
                     14	  -0.01227	  -0.01084	  -0.01025	  -0.00989	  -0.00963	  -0.00921	  -0.00732
                     16	  -0.01424	  -0.01365	  -0.01195	  -0.01221	  -0.01139	  -0.00998	  -0.00911
                     18	  -0.01453	  -0.01642	  -0.01341	  -0.01457	  -0.01515	  -0.01269	  -0.01174
                     20	  -0.01514	  -0.01728	  -0.01558	  -0.01626	  -0.01858	  -0.01331	  -0.01644
                     22	  -0.01813	  -0.02139	  -0.01684	  -0.01804	  -0.01786	  -0.01273	  -0.01544
                     24	  -0.02209	  -0.02282	  -0.01650	  -0.02699	  -0.01696	  -0.01727	  -0.01653
                     30	  -0.02027	  -0.02609	  -0.02111	  -0.02146	  -0.02068	  -0.01195	  -0.02860
                     35	  -0.02436	  -0.02320	  -0.02434	  -0.03491	  -0.02600	  -0.01943	  -0.01546
                     40	  -0.02796	  -0.02989	  -0.02621	  -0.02837	  -0.02392	  -0.02526	  -0.02188
                     50	  -0.05758	  -0.02887	  -0.02169	  -0.01968	  -0.02477	  -0.02189	  -0.04614
                     60	  -0.01665	  -0.02131	  -0.01402	  -0.02559	  -0.01485	  -0.01154	  -0.00955
              </tableData>
              <tableData breakPoint="-10">
                               -7	        -5	        -2	         0	         2	         5	         7
                    -10	    0.00566	    0.00580	    0.00639	    0.00675	    0.00650	    0.00635	    0.00582
                     -5	    0.00286	    0.00307	    0.00346	    0.00352	    0.00326	    0.00422	    0.00424
                     -2	    0.00112	    0.00123	    0.00143	    0.00185	    0.00227	    0.00251	    0.00306
                      0	  -0.00011	    0.00020	    0.00053	    0.00087	    0.00125	    0.00171	    0.00175
                      2	  -0.00133	  -0.00095	  -0.00048	  -0.00013	    0.00009	    0.00068	    0.00093
                      4	  -0.00264	  -0.00215	  -0.00146	  -0.00121	  -0.00087	  -0.00052	  -0.00005
                      6	  -0.00385	  -0.00329	  -0.00265	  -0.00228	  -0.00208	  -0.00152	  -0.00128
                      8	  -0.00480	  -0.00442	  -0.00391	  -0.00338	  -0.00333	  -0.00258	  -0.00191
                     10	  -0.00557	  -0.00561	  -0.00480	  -0.00469	  -0.00432	  -0.00399	  -0.00340
                     12	  -0.00621	  -0.00684	  -0.00583	  -0.00584	  -0.00501	  -0.00528	  -0.00304
                     14	  -0.00835	  -0.00798	  -0.00672	  -0.00693	  -0.00590	  -0.00659	  -0.00505
                     16	  -0.00949	  -0.00905	  -0.00763	  -0.00793	  -0.00749	  -0.00662	  -0.00613
                     18	  -0.00893	  -0.01103	  -0.00833	  -0.00957	  -0.00949	  -0.00856	  -0.00668
                     20	  -0.01076	  -0.01098	  -0.01100	  -0.01041	  -0.01216	  -0.00842	  -0.00905
                     22	  -0.01131	  -0.01362	  -0.01015	  -0.01145	  -0.01007	  -0.00714	  -0.01032
                     24	  -0.01419	  -0.01405	  -0.01025	  -0.01508	  -0.00792	  -0.00926	  -0.01040
                     30	  -0.00955	  -0.01111	  -0.00800	  -0.02636	  -0.01195	  -0.00338	  -0.01888
                     35	  -0.01177	  -0.01303	  -0.00673	  -0.02173	  -0.01431	  -0.00989	  -0.00784
                     40	  -0.01130	  -0.01508	  -0.01275	  -0.01368	  -0.01113	  -0.01351	  -0.01040
                     50	  -0.03879	  -0.01041	  -0.00581	  -0.00862	  -0.00833	  -0.00653	  -0.03154
                     60	    0.00536	    0.00038	    0.00683	  -0.00435	    0.00453	    0.00641	    0.00730
              </tableData>
              <tableData breakPoint="-5">
                               -7	        -5	        -2	         0	         2	         5	         7
                    -10	    0.00310	    0.00278	    0.00309	    0.00313	    0.00317	    0.00306	    0.00317
                     -5	    0.00119	    0.00129	    0.00147	    0.00156	    0.00139	    0.00186	    0.00193
                     -2	    0.00029	    0.00037	    0.00050	    0.00069	    0.00089	    0.00099	    0.00118
                      0	  -0.00032	  -0.00018	    0.00003	    0.00018	    0.00035	    0.00054	    0.00063
                      2	  -0.00094	  -0.00073	  -0.00050	  -0.00032	  -0.00024	    0.00007	    0.00014
                      4	  -0.00159	  -0.00131	  -0.00104	  -0.00085	  -0.00067	  -0.00053	  -0.00032
                      6	  -0.00219	  -0.00192	  -0.00162	  -0.00139	  -0.00122	  -0.00101	  -0.00088
                      8	  -0.00253	  -0.00250	  -0.00220	  -0.00194	  -0.00178	  -0.00168	  -0.00104
                     10	  -0.00330	  -0.00305	  -0.00247	  -0.00247	  -0.00205	  -0.00195	  -0.00168
                     12	  -0.00282	  -0.00357	  -0.00286	  -0.00296	  -0.00243	  -0.00241	  -0.00116
                     14	  -0.00428	  -0.00406	  -0.00367	  -0.00337	  -0.00327	  -0.00285	  -0.00255
                     16	  -0.00472	  -0.00448	  -0.00413	  -0.00368	  -0.00366	  -0.00321	  -0.00300
                     18	  -0.00490	  -0.00478	  -0.00444	  -0.00509	  -0.00397	  -0.00349	  -0.00309
                     20	  -0.00497	  -0.00506	  -0.00546	  -0.00485	  -0.00494	  -0.00376	  -0.00506
                     22	  -0.00501	  -0.00525	  -0.00489	  -0.00516	  -0.00340	  -0.00186	  -0.00572
                     24	  -0.00506	  -0.00711	  -0.00435	  -0.00763	  -0.00378	  -0.00366	  -0.00310
                     30	  -0.00426	    0.00238	  -0.00190	  -0.01298	  -0.00334	    0.00420	    0.00295
                     35	  -0.00304	  -0.00395	  -0.00261	  -0.01109	  -0.00383	  -0.00174	  -0.00005
                     40	  -0.00023	  -0.00245	  -0.00114	    0.00054	  -0.00029	  -0.00267	  -0.00066
                     50	  -0.02317	    0.00345	    0.00620	    0.00242	    0.00519	    0.00609	  -0.02080
                     60	    0.02297	    0.01757	    0.02322	    0.01502	    0.01966	    0.02050	    0.02062
              </tableData>
              <tableData breakPoint="0">
                               -7	        -5	        -2	         0	         2	         5	         7
                    -10	    0.00000	    0.00000	    0.00000	    0.00000	    0.00000	    0.00000	    0.00000
                     -5	    0.00000	    0.00000	    0.00000	    0.00000	    0.00000	    0.00000	    0.00000
                     -2	    0.00000	    0.00000	    0.00000	    0.00000	    0.00000	    0.00000	    0.00000
                      0	    0.00000	    0.00000	    0.00000	    0.00000	    0.00000	    0.00000	    0.00000
                      2	    0.00000	    0.00000	    0.00000	    0.00000	    0.00000	    0.00000	    0.00000
                      4	    0.00000	    0.00000	    0.00000	    0.00000	    0.00000	    0.00000	    0.00000
                      6	    0.00000	    0.00000	    0.00000	    0.00000	    0.00000	    0.00000	    0.00000
                      8	    0.00000	    0.00000	    0.00000	    0.00000	    0.00000	    0.00000	    0.00000
                     10	    0.00000	    0.00000	    0.00000	    0.00000	    0.00000	    0.00000	    0.00000
                     12	    0.00000	    0.00000	    0.00000	    0.00000	    0.00000	    0.00000	    0.00000
                     14	    0.00000	    0.00000	    0.00000	    0.00000	    0.00000	    0.00000	    0.00000
                     16	    0.00000	    0.00000	    0.00000	    0.00000	    0.00000	    0.00000	    0.00000
                     18	    0.00000	    0.00000	    0.00000	    0.00000	    0.00000	    0.00000	    0.00000
                     20	    0.00000	    0.00000	    0.00000	    0.00000	    0.00000	    0.00000	    0.00000
                     22	    0.00000	    0.00000	    0.00000	    0.00000	    0.00000	    0.00000	    0.00000
                     24	    0.00000	    0.00000	    0.00000	    0.00000	    0.00000	    0.00000	    0.00000
                     30	    0.00000	    0.00000	    0.00000	    0.00000	    0.00000	    0.00000	    0.00000
                     35	    0.00000	    0.00000	    0.00000	    0.00000	    0.00000	    0.00000	    0.00000
                     40	    0.00000	    0.00000	    0.00000	    0.00000	    0.00000	    0.00000	    0.00000
                     50	    0.00000	    0.00000	    0.00000	    0.00000	    0.00000	    0.00000	    0.00000
                     60	    0.00000	    0.00000	    0.00000	    0.00000	    0.00000	    0.00000	    0.00000
              </tableData>
              <tableData breakPoint="5">
                               -7	        -5	        -2	         0	         2	         5	         7
                    -10	  -0.00220	  -0.00212	  -0.00241	  -0.00259	  -0.00256	  -0.00244	  -0.00261
                     -5	  -0.00059	  -0.00063	  -0.00085	  -0.00101	  -0.00096	  -0.00132	  -0.00137
                     -2	    0.00036	    0.00009	    0.00000	  -0.00015	  -0.00030	  -0.00044	  -0.00064
                      0	    0.00084	    0.00068	    0.00046	    0.00036	    0.00022	    0.00008	  -0.00013
                      2	    0.00161	    0.00123	    0.00095	    0.00086	    0.00075	    0.00049	    0.00042
                      4	    0.00210	    0.00181	    0.00161	    0.00139	    0.00118	    0.00109	    0.00087
                      6	    0.00272	    0.00246	    0.00222	    0.00203	    0.00174	    0.00156	    0.00143
                      8	    0.00336	    0.00324	    0.00267	    0.00266	    0.00219	    0.00207	    0.00182
                     10	    0.00423	    0.00390	    0.00348	    0.00333	    0.00303	    0.00271	    0.00250
                     12	    0.00491	    0.00460	    0.00416	    0.00403	    0.00370	    0.00336	    0.00316
                     14	    0.00565	    0.00533	    0.00490	    0.00478	    0.00443	    0.00406	    0.00384
                     16	    0.00618	    0.00611	    0.00568	    0.00569	    0.00518	    0.00480	    0.00433
                     18	    0.00710	    0.00698	    0.00651	    0.00544	    0.00601	    0.00564	    0.00683
                     20	    0.00567	    0.00788	    0.00818	    0.00682	    0.00696	    0.00654	    0.00593
                     22	    0.00573	    0.01088	    0.00847	    0.00764	    0.00792	    0.00745	    0.00640
                     24	    0.00971	    0.01112	    0.01011	    0.00720	    0.00955	    0.00677	    0.00764
                     30	    0.01457	    0.01344	    0.01192	    0.00288	    0.01407	    0.01286	    0.01077
                     35	    0.01653	    0.01607	    0.01479	    0.00778	    0.01638	    0.01390	    0.01499
                     40	    0.02116	    0.01916	    0.03625	    0.02268	    0.02866	    0.01947	    0.02351
                     50	    0.03066	    0.03120	    0.03059	    0.02850	    0.03168	    0.02869	    0.02721
                     60	    0.04632	    0.04675	    0.04632	    0.04263	    0.04993	    0.04403	    0.04911
              </tableData>
              <tableData breakPoint="10">
                               -7	        -5	        -2	         0	         2	         5	         7
                    -10	  -0.00382	  -0.00372	  -0.00437	  -0.00456	  -0.00471	  -0.00447	  -0.00479
                     -5	  -0.00066	  -0.00078	  -0.00110	  -0.00138	  -0.00154	  -0.00214	  -0.00222
                     -2	    0.00136	    0.00069	    0.00045	    0.00024	  -0.00004	  -0.00033	  -0.00084
                      0	    0.00238	    0.00204	    0.00140	    0.00123	    0.00102	    0.00069	    0.00041
                      2	    0.00358	    0.00289	    0.00234	    0.00218	    0.00200	    0.00151	    0.00138
                      4	    0.00461	    0.00401	    0.00362	    0.00323	    0.00275	    0.00267	    0.00221
                      6	    0.00573	    0.00477	    0.00472	    0.00441	    0.00386	    0.00327	    0.00322
                      8	    0.00703	    0.00593	    0.00580	    0.00549	    0.00480	    0.00405	    0.00397
                     10	    0.00865	    0.00729	    0.00712	    0.00667	    0.00618	    0.00558	    0.00516
                     12	    0.00982	    0.00844	    0.00828	    0.00786	    0.00737	    0.00670	    0.00631
                     14	    0.01112	    0.00945	    0.00957	    0.00908	    0.00862	    0.00790	    0.00748
                     16	    0.01215	    0.01174	    0.01087	    0.01043	    0.00986	    0.00911	    0.00849
                     18	    0.01336	    0.01185	    0.01104	    0.01104	    0.01118	    0.01041	    0.01134
                     20	    0.01210	    0.01287	    0.01365	    0.01244	    0.01336	    0.01176	    0.01301
                     22	    0.01231	    0.01795	    0.01614	    0.01365	    0.01506	    0.01309	    0.01104
                     24	    0.01682	    0.02131	    0.01826	    0.01229	    0.01712	    0.01152	    0.01268
                     30	    0.02346	    0.02048	    0.01975	    0.01741	    0.02814	    0.01967	    0.01726
                     35	    0.02598	    0.02511	    0.02217	    0.01318	    0.02883	    0.02088	    0.02169
                     40	    0.03164	    0.02983	    0.04814	    0.02850	    0.03687	    0.02807	    0.03184
                     50	    0.04288	    0.04272	    0.04152	    0.04267	    0.04453	    0.03793	    0.03626
                     60	    0.05770	    0.05191	    0.05671	    0.04949	    0.05934	    0.05265	    0.05711
              </tableData>
              <tableData breakPoint="20">
                               -7	        -5	        -2	         0	         2	         5	         7
                    -10	  -0.00522	  -0.00514	  -0.00647	  -0.00684	  -0.00712	  -0.00699	  -0.00772
                      2	    0.00839	    0.00714	    0.00581	    0.00581	    0.00562	    0.00465	    0.00422
                     10	    0.01683	    0.01491	    0.01457	    0.01354	    0.01267	    0.01137	    0.01081
                     18	    0.02514	    0.02321	    0.02337	    0.02170	    0.02178	    0.01936	    0.02183
                     30	    0.03876	    0.03468	    0.03012	    0.02901	    0.03302	    0.03331	    0.02827
                     60	    0.07235	    0.06602	    0.06987	    0.06039	    0.07095	    0.06313	    0.06675
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              </tableData>
              <tableData breakPoint="25">
                               -7	        -5	        -2	         0	         2	         5	         7
                    -10	  -0.00524	  -0.00473	  -0.00674	  -0.00732	  -0.00767	  -0.00732	  -0.00854
                      2	    0.01101	    0.00934	    0.00779	    0.00780	    0.00754	    0.00645	    0.00587
                     10	    0.02028	    0.01873	    0.01768	    0.01673	    0.01569	    0.01416	    0.01273
                     18	    0.03020	    0.02665	    0.02790	    0.02593	    0.02564	    0.02326	    0.02554
                     30	    0.04627	    0.04033	    0.03536	    0.03384	    0.03632	    0.03933	    0.03357
                     60	    0.07607	    0.06954	    0.07303	    0.06308	    0.07369	    0.06545	    0.06896
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              </tableData>
          </table>
       </product>
    </function>
    <function name="aero/c/CFXDED2R">
    <description>DRAG DUE TO ELEVON 2R</description>
    <product>
          <table>
            <independentVar lookup="row">aero/alpha-deg</independentVar>
            <independentVar lookup="column">aero/beta-deg</independentVar>
            <independentVar lookup="table">fcs/elevon-2R-pos-deg</independentVar>
              <tableData breakPoint="-16">
                               -7	        -5	        -2	         0	         2	         5	         7
                    -10	    0.01015	    0.00973	    0.01053	    0.01106	    0.01062	    0.01047	    0.00998
                      2	  -0.00109	  -0.00062	    0.00013	    0.00072	    0.00111	    0.00202	    0.00223
                     10	  -0.00823	  -0.00779	  -0.00681	  -0.00640	  -0.00600	  -0.00511	  -0.00357
                     18	  -0.01453	  -0.01642	  -0.01341	  -0.01457	  -0.01515	  -0.01269	  -0.01174
                     30	  -0.02027	  -0.02609	  -0.02111	  -0.02146	  -0.02068	  -0.01195	  -0.02860
                     60	  -0.01665	  -0.02131	  -0.01402	  -0.02559	  -0.01485	  -0.01154	  -0.00955
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              </tableData>
              <tableData breakPoint="-10">
                               -7	        -5	        -2	         0	         2	         5	         7
                    -10	    0.00566	    0.00580	    0.00639	    0.00675	    0.00650	    0.00635	    0.00582
                      2	  -0.00133	  -0.00095	  -0.00048	  -0.00013	    0.00009	    0.00068	    0.00093
                     10	  -0.00557	  -0.00561	  -0.00480	  -0.00469	  -0.00432	  -0.00399	  -0.00340
                     18	  -0.00893	  -0.01103	  -0.00833	  -0.00957	  -0.00949	  -0.00856	  -0.00668
                     30	  -0.00955	  -0.01111	  -0.00800	  -0.02636	  -0.01195	  -0.00338	  -0.01888
                     60	    0.00536	    0.00038	    0.00683	  -0.00435	    0.00453	    0.00641	    0.00730
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              </tableData>
              <tableData breakPoint="-5">
                               -7	        -5	        -2	         0	         2	         5	         7
                    -10	    0.00310	    0.00278	    0.00309	    0.00313	    0.00317	    0.00306	    0.00317
                      2	  -0.00094	  -0.00073	  -0.00050	  -0.00032	  -0.00024	    0.00007	    0.00014
                     10	  -0.00330	  -0.00305	  -0.00247	  -0.00247	  -0.00205	  -0.00195	  -0.00168
                     18	  -0.00490	  -0.00478	  -0.00444	  -0.00509	  -0.00397	  -0.00349	  -0.00309
                     30	  -0.00426	    0.00238	  -0.00190	  -0.01298	  -0.00334	    0.00420	    0.00295
                     60	    0.02297	    0.01757	    0.02322	    0.01502	    0.01966	    0.02050	    0.02062
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              </tableData>
              <tableData breakPoint="0">
                               -7	        -5	        -2	         0	         2	         5	         7
                    -10	    0.00000	    0.00000	    0.00000	    0.00000	    0.00000	    0.00000	    0.00000
                      2	    0.00000	    0.00000	    0.00000	    0.00000	    0.00000	    0.00000	    0.00000
                     10	    0.00000	    0.00000	    0.00000	    0.00000	    0.00000	    0.00000	    0.00000
                     18	    0.00000	    0.00000	    0.00000	    0.00000	    0.00000	    0.00000	    0.00000
                     30	    0.00000	    0.00000	    0.00000	    0.00000	    0.00000	    0.00000	    0.00000
                     60	    0.00000	    0.00000	    0.00000	    0.00000	    0.00000	    0.00000	    0.00000
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              </tableData>
              <tableData breakPoint="5">
                               -7	        -5	        -2	         0	         2	         5	         7
                    -10	  -0.00220	  -0.00212	  -0.00241	  -0.00259	  -0.00256	  -0.00244	  -0.00261
                      2	    0.00161	    0.00123	    0.00095	    0.00086	    0.00075	    0.00049	    0.00042
                     10	    0.00423	    0.00390	    0.00348	    0.00333	    0.00303	    0.00271	    0.00250
                     18	    0.00710	    0.00698	    0.00651	    0.00544	    0.00601	    0.00564	    0.00683
                     30	    0.01457	    0.01344	    0.01192	    0.00288	    0.01407	    0.01286	    0.01077
                     60	    0.04632	    0.04675	    0.04632	    0.04263	    0.04993	    0.04403	    0.04911
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              </tableData>
              <tableData breakPoint="10">
                               -7	        -5	        -2	         0	         2	         5	         7
                    -10	  -0.00382	  -0.00372	  -0.00437	  -0.00456	  -0.00471	  -0.00447	  -0.00479
                      2	    0.00358	    0.00289	    0.00234	    0.00218	    0.00200	    0.00151	    0.00138
                     10	    0.00865	    0.00729	    0.00712	    0.00667	    0.00618	    0.00558	    0.00516
                     18	    0.01336	    0.01185	    0.01104	    0.01104	    0.01118	    0.01041	    0.01134
                     30	    0.02346	    0.02048	    0.01975	    0.01741	    0.02814	    0.01967	    0.01726
                     60	    0.05770	    0.05191	    0.05671	    0.04949	    0.05934	    0.05265	    0.05711
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              </tableData>
              <tableData breakPoint="20">
                               -7	        -5	        -2	         0	         2	         5	         7
                    -10	  -0.00522	  -0.00514	  -0.00647	  -0.00684	  -0.00712	  -0.00699	  -0.00772
                      2	    0.00839	    0.00714	    0.00581	    0.00581	    0.00562	    0.00465	    0.00422
                     10	    0.01683	    0.01491	    0.01457	    0.01354	    0.01267	    0.01137	    0.01081
                     18	    0.02514	    0.02321	    0.02337	    0.02170	    0.02178	    0.01936	    0.02183
                     30	    0.03876	    0.03468	    0.03012	    0.02901	    0.03302	    0.03331	    0.02827
                     60	    0.07235	    0.06602	    0.06987	    0.06039	    0.07095	    0.06313	    0.06675
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              </tableData>
              <tableData breakPoint="25">
                               -7	        -5	        -2	         0	         2	         5	         7
                    -10	  -0.00524	  -0.00473	  -0.00674	  -0.00732	  -0.00767	  -0.00732	  -0.00854
                      2	    0.01101	    0.00934	    0.00779	    0.00780	    0.00754	    0.00645	    0.00587
                     10	    0.02028	    0.01873	    0.01768	    0.01673	    0.01569	    0.01416	    0.01273
                     18	    0.03020	    0.02665	    0.02790	    0.02593	    0.02564	    0.02326	    0.02554
                     30	    0.04627	    0.04033	    0.03536	    0.03384	    0.03632	    0.03933	    0.03357
                     60	    0.07607	    0.06954	    0.07303	    0.06308	    0.07369	    0.06545	    0.06896
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              </tableData>
          </table>
       </product>
    </function>
    <function name="aero/c/CFXDSBL">
    <description>DRAG DUE TO LOWER SPEEDBRAKE DEFLECTION</description>
    <product>
          <property>fcs/airbrake-upper</property>
          <table>
            <independentVar lookup="row">aero/alpha-deg</independentVar>
            <tableData>
                    -10		    0.00159
                     -5		    0.00047
                      4		    0.00126
                     12		    0.01518
                     20		    0.00114
                     35		    0.00000
                     60		    0.00000
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            </tableData>
          </table>
       </product>
    </function>
    <function name="aero/c/CFXDSBU">
    <description>DRAG DUE TO UPPER SPEEDBRAKE DEFLECTION</description>
    <product>
          <property>fcs/airbrake-lower</property>
          <table>
            <independentVar lookup="row">aero/alpha-deg</independentVar>
            <tableData>
                    -10		    0.00140
                     -5		    0.00094
                      4		    0.00082
                     12		    0.00151
                     20		    0.00000
                     35		    0.00015
                     60		    0.00000
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            </tableData>
          </table>
       </product>
    </function>
    <function name="aero/c/CFXDSD1L">
    <description>DRAG DUE TO LE SLAT 1L</description>
    <product>
          <property>fcs/slat-1L-pos-deg</property>
          <table>
            <independentVar lookup="row">aero/alpha-deg</independentVar>
            <tableData>
                    -10		    0.00017
                     -5		    0.00001
                      4		    0.00003
                     12		    0.00021
                     20		    0.00016
                     35		    0.00746
                     60		    0.02197
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            </tableData>
          </table>
       </product>
    </function>
    <function name="aero/c/CFXDSD1R">
    <description>DRAG DUE TO LE SLAT 1R</description>
    <product>
          <property>fcs/slat-1R-pos-deg</property>
          <table>
            <independentVar lookup="row">aero/alpha-deg</independentVar>
            <tableData>
                    -10		    0.00017
                     -5		    0.00001
                      4		    0.00003
                     12		    0.00021
                     20		    0.00016
                     35		    0.00746
                     60		    0.02197
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            </tableData>
          </table>
       </product>
    </function>
    <function name="aero/c/CFXDSD2L">
    <description>DRAG DUE TO LE SLAT 2L</description>
    <product>
          <property>fcs/slat-2L-pos-deg</property>
          <table>
            <independentVar lookup="row">aero/alpha-deg</independentVar>
            <tableData>
                    -10		    0.00062
                     -5		    0.00019
                      4		    0.00018
                     12		    0.00109
                     20		    0.00366
                     35		    0.00714
                     60		    0.01827
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            </tableData>
          </table>
       </product>
    </function>
    <function name="aero/c/CFXDSD2R">
    <description>DRAG DUE TO LE SLAT 2R</description>
    <product>
          <property>fcs/slat-2R-pos-deg</property>
          <table>
            <independentVar lookup="row">aero/alpha-deg</independentVar>
            <tableData>
                    -10		    0.00062
                     -5		    0.00019
                      4		    0.00018
                     12		    0.00109
                     20		    0.00366
                     35		    0.00714
                     60		    0.01827
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            </tableData>
          </table>
       </product>
    </function>
    <function name="aero/c/CFXGEAR">
    <description>DRAG INCREMENT DUE TO GEAR</description>
    <product>
          <property>gear/gear-pos-norm</property>
          <table>
            <independentVar lookup="row">aero/alpha-deg</independentVar>
            <tableData>
                    -10		    0.00032
                     -5		    0.00029
                      2		    0.00025
                      8		    0.00035
                     14		    0.00041
                     20		    0.00018
                     30		    0.00105
                     40		    0.00039
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            </tableData>
          </table>
       </product>
    </function>
    <function name="aero/c/CFXmn">
    <description>DRAG DUE TO MACH</description>
    <product>
          <table>
            <independentVar lookup="row">velocities/mach</independentVar>
            <independentVar lookup="column">aero/alpha-deg</independentVar>
            <tableData>
                                -10	         -1	       0.01	          1	         10
                    0.2	    0.00000	    0.00000	    0.00000	    0.00000	    0.00000
                    0.8	    0.01148	    0.00000	    0.00000	    0.00000	    0.01094
                   0.99	    0.01499	    0.00009	    0.00000	    0.00037	    0.00923
                    1.4	    0.05608	    0.00137	    0.00149	    0.00400	    0.06699
                    1.8	    0.05213	    0.00203	    0.00179	    0.00385	    0.06423
                    2.5	    0.03984	    0.00238	    0.00116	    0.00192	    0.05184
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            </tableData>
          </table>
       </product>
    </function>
    <function name="aero/c/CFZB">
    <description>BASIC LIFT</description>
    <product>
          <table>
            <independentVar lookup="row">aero/alpha-deg</independentVar>
            <tableData>
                    -10		  -0.52445
                     -5		  -0.22175
                      4		    0.20804
                     12		    0.71810
                     20		    1.21619
                     35		    0.90188
                     60		    0.72311
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            </tableData>
          </table>
       </product>
    </function>
    <function name="aero/c/CFZDE2L">
    <description>LIFT DUE TO LE SLAT 2L</description>
    <product>
          <property>fcs/slat-2L-pos-deg</property>
          <table>
            <independentVar lookup="row">aero/alpha-deg</independentVar>
            <tableData>
                    -10		    0.00010
                     -5		  -0.00257
                      4		    0.00252
                     12		    0.00079
                     20		    0.00213
                     35		    0.00142
                     60		    0.00207
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            </tableData>
          </table>
       </product>
    </function>
    <function name="aero/c/CFZDE2R">
    <description>LIFT DUE TO LE SLAT 2R</description>
    <product>
          <property>fcs/slat-2R-pos-deg</property>
          <table>
            <independentVar lookup="row">aero/alpha-deg</independentVar>
            <tableData>
                    -10		    0.00010
                     -5		  -0.00257
                      4		    0.00252
                     12		    0.00079
                     20		    0.00213
                     35		    0.00142
                     60		    0.00207
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            </tableData>
          </table>
       </product>
    </function>
    <function name="aero/c/CFZDED1L">
    <description>LIFT DUE TO ELEVON 1L</description>
    <product>
          <table>
            <independentVar lookup="row">aero/alpha-deg</independentVar>
            <independentVar lookup="column">aero/beta-deg</independentVar>
            <independentVar lookup="table">fcs/elevon-1L-pos-deg</independentVar>
              <tableData breakPoint="-16">
                               -7	        -5	        -2	         0	         2	         5	         7
                    -10	  -0.07762	  -0.08055	  -0.07678	  -0.07517	  -0.07151	  -0.06937	  -0.06583
                      2	  -0.07560	  -0.07694	  -0.07391	  -0.06957	  -0.07133	  -0.06955	  -0.06197
                     10	  -0.07779	  -0.07697	  -0.07661	  -0.07459	  -0.07275	  -0.06820	  -0.06515
                     18	  -0.04691	  -0.05366	  -0.06750	  -0.08445	  -0.08553	  -0.08268	  -0.06287
                     30	    0.01337	    0.01052	    0.01238	    0.01477	    0.01455	    0.01623	    0.01276
                     60	    0.00296	    0.00309	    0.00334	    0.00408	    0.00374	    0.00465	    0.00413
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              </tableData>
              <tableData breakPoint="-10">
                               -7	        -5	        -2	         0	         2	         5	         7
                    -10	  -0.04864	  -0.05263	  -0.04952	  -0.04873	  -0.04619	  -0.04460	  -0.04191
                      2	  -0.04987	  -0.04933	  -0.04794	  -0.04460	  -0.04572	  -0.04396	  -0.03752
                     10	  -0.04937	  -0.05049	  -0.04935	  -0.04792	  -0.04685	  -0.04419	  -0.04301
                     18	  -0.01996	  -0.02623	  -0.03455	  -0.04813	  -0.05371	  -0.05669	  -0.03840
                     30	    0.00841	    0.00728	    0.00783	    0.00958	    0.00803	    0.00942	    0.00808
                     60	    0.00175	    0.00183	    0.00198	    0.00262	    0.00221	    0.00225	    0.00241
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              </tableData>
              <tableData breakPoint="-5">
                               -7	        -5	        -2	         0	         2	         5	         7
                    -10	  -0.02654	  -0.02657	  -0.02518	  -0.02520	  -0.02347	  -0.02258	  -0.02207
                      2	  -0.02526	  -0.02485	  -0.02420	  -0.02274	  -0.02291	  -0.02228	  -0.02090
                     10	  -0.02655	  -0.02575	  -0.02499	  -0.02400	  -0.02372	  -0.02250	  -0.02184
                     18	  -0.00605	  -0.00825	  -0.01345	  -0.01924	  -0.02290	  -0.02705	  -0.01859
                     30	    0.00401	    0.00317	    0.00370	    0.00435	    0.00391	    0.00468	    0.00397
                     60	    0.00083	    0.00086	    0.00093	    0.00143	    0.00103	    0.00100	    0.00112
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              </tableData>
              <tableData breakPoint="0">
                               -7	        -5	        -2	         0	         2	         5	         7
                    -10	    0.00000	    0.00000	    0.00000	    0.00000	    0.00000	    0.00000	    0.00000
                      2	    0.00000	    0.00000	    0.00000	    0.00000	    0.00000	    0.00000	    0.00000
                     10	    0.00000	    0.00000	    0.00000	    0.00000	    0.00000	    0.00000	    0.00000
                     18	    0.00000	    0.00000	    0.00000	    0.00000	    0.00000	    0.00000	    0.00000
                     30	    0.00000	    0.00000	    0.00000	    0.00000	    0.00000	    0.00000	    0.00000
                     60	    0.00000	    0.00000	    0.00000	    0.00000	    0.00000	    0.00000	    0.00000
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              </tableData>
              <tableData breakPoint="5">
                               -7	        -5	        -2	         0	         2	         5	         7
                    -10	    0.02488	    0.02588	    0.02452	    0.02368	    0.02356	    0.02238	    0.02201
                      2	    0.02964	    0.02475	    0.02329	    0.02313	    0.02242	    0.02226	    0.02451
                     10	    0.02693	    0.02612	    0.02505	    0.02467	    0.02374	    0.02273	    0.02196
                     18	    0.00909	    0.00389	    0.00734	    0.01163	    0.01592	    0.02433	    0.03111
                     30	  -0.00375	  -0.00377	  -0.00374	  -0.00424	  -0.00393	  -0.00363	  -0.00365
                     60	  -0.00069	  -0.00073	  -0.00077	  -0.00041	  -0.00085	  -0.00089	  -0.00091
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              </tableData>
              <tableData breakPoint="10">
                               -7	        -5	        -2	         0	         2	         5	         7
                    -10	    0.04879	    0.05147	    0.04909	    0.04743	    0.04662	    0.04499	    0.04320
                      2	    0.05459	    0.04899	    0.04571	    0.04595	    0.04431	    0.04429	    0.04735
                     10	    0.05341	    0.05175	    0.04941	    0.04801	    0.04955	    0.04495	    0.04336
                     18	    0.00933	    0.00451	    0.01028	    0.01558	    0.02672	    0.03966	    0.05432
                     30	  -0.00715	  -0.00736	  -0.00713	  -0.00582	  -0.00722	  -0.00747	  -0.00690
                     60	  -0.00124	  -0.00130	  -0.00140	  -0.00096	  -0.00152	  -0.00157	  -0.00158
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              </tableData>
              <tableData breakPoint="20">
                               -7	        -5	        -2	         0	         2	         5	         7
                    -10	    0.09650	    0.09726	    0.09572	    0.09102	    0.08917	    0.08049	    0.08237
                      2	    0.10032	    0.09541	    0.08666	    0.08808	    0.08475	    0.08419	    0.08630
                     10	    0.10174	    0.09826	    0.09335	    0.09295	    0.09156	    0.08422	    0.08089
                     18	    0.00813	  -0.00206	    0.01113	    0.01857	    0.03190	    0.05346	    0.08160
                     30	  -0.01263	  -0.01288	  -0.01266	  -0.01056	  -0.01273	  -0.01285	  -0.01249
                     60	  -0.00192	  -0.00200	  -0.00211	  -0.00167	  -0.00226	  -0.00229	  -0.00207
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              </tableData>
              <tableData breakPoint="25">
                               -7	        -5	        -2	         0	         2	         5	         7
                    -10	    0.11863	    0.11492	    0.11450	    0.10990	    0.10673	    0.09735	    0.09916
                      2	    0.11978	    0.11457	    0.10467	    0.10608	    0.10229	    0.10275	    0.10266
                     10	    0.12215	    0.11207	    0.11174	    0.11079	    0.10911	    0.10094	    0.09697
                     18	    0.00763	  -0.00143	    0.00999	    0.01662	    0.02972	    0.05701	    0.08874
                     30	  -0.01468	  -0.01494	  -0.01471	  -0.01256	  -0.01489	  -0.01479	  -0.01441
                     60	  -0.00208	  -0.00216	  -0.00226	  -0.00181	  -0.00239	  -0.00240	  -0.00215
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              </tableData>
          </table>
       </product>
    </function>
    <function name="aero/c/CFZDED1R">
    <description>LIFT DUE TO ELEVON 1R</description>
    <product>
          <table>
            <independentVar lookup="row">aero/alpha-deg</independentVar>
            <independentVar lookup="column">aero/beta-deg</independentVar>
            <independentVar lookup="table">fcs/elevon-1R-pos-deg</independentVar>
              <tableData breakPoint="-16">
                               -7	        -5	        -2	         0	         2	         5	         7
                    -10	  -0.07762	  -0.08055	  -0.07678	  -0.07517	  -0.07151	  -0.06937	  -0.06583
                      2	  -0.07560	  -0.07694	  -0.07391	  -0.06957	  -0.07133	  -0.06955	  -0.06197
                     10	  -0.07779	  -0.07697	  -0.07661	  -0.07459	  -0.07275	  -0.06820	  -0.06515
                     18	  -0.04691	  -0.05366	  -0.06750	  -0.08445	  -0.08553	  -0.08268	  -0.06287
                     30	    0.01337	    0.01052	    0.01238	    0.01477	    0.01455	    0.01623	    0.01276
                     60	    0.00296	    0.00309	    0.00334	    0.00408	    0.00374	    0.00465	    0.00413
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              </tableData>
              <tableData breakPoint="-10">
                               -7	        -5	        -2	         0	         2	         5	         7
                    -10	  -0.04864	  -0.05263	  -0.04952	  -0.04873	  -0.04619	  -0.04460	  -0.04191
                      2	  -0.04987	  -0.04933	  -0.04794	  -0.04460	  -0.04572	  -0.04396	  -0.03752
                     10	  -0.04937	  -0.05049	  -0.04935	  -0.04792	  -0.04685	  -0.04419	  -0.04301
                     18	  -0.01996	  -0.02623	  -0.03455	  -0.04813	  -0.05371	  -0.05669	  -0.03840
                     30	    0.00841	    0.00728	    0.00783	    0.00958	    0.00803	    0.00942	    0.00808
                     60	    0.00175	    0.00183	    0.00198	    0.00262	    0.00221	    0.00225	    0.00241
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              </tableData>
              <tableData breakPoint="-5">
                               -7	        -5	        -2	         0	         2	         5	         7
                    -10	  -0.02654	  -0.02657	  -0.02518	  -0.02520	  -0.02347	  -0.02258	  -0.02207
                      2	  -0.02526	  -0.02485	  -0.02420	  -0.02274	  -0.02291	  -0.02228	  -0.02090
                     10	  -0.02655	  -0.02575	  -0.02499	  -0.02400	  -0.02372	  -0.02250	  -0.02184
                     18	  -0.00605	  -0.00825	  -0.01345	  -0.01924	  -0.02290	  -0.02705	  -0.01859
                     30	    0.00401	    0.00317	    0.00370	    0.00435	    0.00391	    0.00468	    0.00397
                     60	    0.00083	    0.00086	    0.00093	    0.00143	    0.00103	    0.00100	    0.00112
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              </tableData>
              <tableData breakPoint="0">
                               -7	        -5	        -2	         0	         2	         5	         7
                    -10	    0.00000	    0.00000	    0.00000	    0.00000	    0.00000	    0.00000	    0.00000
                      2	    0.00000	    0.00000	    0.00000	    0.00000	    0.00000	    0.00000	    0.00000
                     10	    0.00000	    0.00000	    0.00000	    0.00000	    0.00000	    0.00000	    0.00000
                     18	    0.00000	    0.00000	    0.00000	    0.00000	    0.00000	    0.00000	    0.00000
                     30	    0.00000	    0.00000	    0.00000	    0.00000	    0.00000	    0.00000	    0.00000
                     60	    0.00000	    0.00000	    0.00000	    0.00000	    0.00000	    0.00000	    0.00000
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              </tableData>
              <tableData breakPoint="5">
                               -7	        -5	        -2	         0	         2	         5	         7
                    -10	    0.02488	    0.02588	    0.02452	    0.02368	    0.02356	    0.02238	    0.02201
                      2	    0.02964	    0.02475	    0.02329	    0.02313	    0.02242	    0.02226	    0.02451
                     10	    0.02693	    0.02612	    0.02505	    0.02467	    0.02374	    0.02273	    0.02196
                     18	    0.00909	    0.00389	    0.00734	    0.01163	    0.01592	    0.02433	    0.03111
                     30	  -0.00375	  -0.00377	  -0.00374	  -0.00424	  -0.00393	  -0.00363	  -0.00365
                     60	  -0.00069	  -0.00073	  -0.00077	  -0.00041	  -0.00085	  -0.00089	  -0.00091
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              </tableData>
              <tableData breakPoint="10">
                               -7	        -5	        -2	         0	         2	         5	         7
                    -10	    0.04879	    0.05147	    0.04909	    0.04743	    0.04662	    0.04499	    0.04320
                      2	    0.05459	    0.04899	    0.04571	    0.04595	    0.04431	    0.04429	    0.04735
                     10	    0.05341	    0.05175	    0.04941	    0.04801	    0.04955	    0.04495	    0.04336
                     18	    0.00933	    0.00451	    0.01028	    0.01558	    0.02672	    0.03966	    0.05432
                     30	  -0.00715	  -0.00736	  -0.00713	  -0.00582	  -0.00722	  -0.00747	  -0.00690
                     60	  -0.00124	  -0.00130	  -0.00140	  -0.00096	  -0.00152	  -0.00157	  -0.00158
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              </tableData>
              <tableData breakPoint="20">
                               -7	        -5	        -2	         0	         2	         5	         7
                    -10	    0.09650	    0.09726	    0.09572	    0.09102	    0.08917	    0.08049	    0.08237
                      2	    0.10032	    0.09541	    0.08666	    0.08808	    0.08475	    0.08419	    0.08630
                     10	    0.10174	    0.09826	    0.09335	    0.09295	    0.09156	    0.08422	    0.08089
                     18	    0.00813	  -0.00206	    0.01113	    0.01857	    0.03190	    0.05346	    0.08160
                     30	  -0.01263	  -0.01288	  -0.01266	  -0.01056	  -0.01273	  -0.01285	  -0.01249
                     60	  -0.00192	  -0.00200	  -0.00211	  -0.00167	  -0.00226	  -0.00229	  -0.00207
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              </tableData>
              <tableData breakPoint="25">
                               -7	        -5	        -2	         0	         2	         5	         7
                    -10	    0.11863	    0.11492	    0.11450	    0.10990	    0.10673	    0.09735	    0.09916
                      2	    0.11978	    0.11457	    0.10467	    0.10608	    0.10229	    0.10275	    0.10266
                     10	    0.12215	    0.11207	    0.11174	    0.11079	    0.10911	    0.10094	    0.09697
                     18	    0.00763	  -0.00143	    0.00999	    0.01662	    0.02972	    0.05701	    0.08874
                     30	  -0.01468	  -0.01494	  -0.01471	  -0.01256	  -0.01489	  -0.01479	  -0.01441
                     60	  -0.00208	  -0.00216	  -0.00226	  -0.00181	  -0.00239	  -0.00240	  -0.00215
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              </tableData>
          </table>
       </product>
    </function>
    <function name="aero/c/CFZDEL">
    <description>LIFT DUE TO LOWER SPEEDBRAKE DEFLECTION</description>
    <product>
          <property>fcs/airbrake-upper</property>
          <table>
            <independentVar lookup="row">aero/alpha-deg</independentVar>
            <tableData>
                    -10		  -0.00719
                     -5		    0.00138
                      4		  -0.00331
                     12		    0.01829
                     20		  -0.01124
                     35		  -0.00684
                     60		  -0.00232
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            </tableData>
          </table>
       </product>
    </function>
    <function name="aero/c/CFZDSBU">
    <description>LIFT DUE TO UPPER SPEEDBRAKE DEFLECTION</description>
    <product>
          <property>fcs/airbrake-lower</property>
          <table>
            <independentVar lookup="row">aero/alpha-deg</independentVar>
            <tableData>
                    -10		  -0.00228
                     -5		  -0.00096
                      4		  -0.00292
                     12		  -0.00173
                     20		    0.01167
                     35		    0.01157
                     60		    0.00896
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            </tableData>
          </table>
       </product>
    </function>
    <function name="aero/c/CFZDSD1L">
    <description>LIFT DUE TO LE SLAT 1L</description>
    <product>
          <property>fcs/slat-1L-pos-deg</property>
          <table>
            <independentVar lookup="row">aero/alpha-deg</independentVar>
            <tableData>
                    -10		  -0.00053
                     -5		  -0.00010
                      4		    0.00045
                     12		  -0.00026
                     20		    0.00205
                     35		  -0.00067
                     60		    0.00026
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            </tableData>
          </table>
       </product>
    </function>
    <function name="aero/c/CFZDSD1R">
    <description>LIFT DUE TO LE SLAT 1R</description>
    <product>
          <property>fcs/slat-1R-pos-deg</property>
          <table>
            <independentVar lookup="row">aero/alpha-deg</independentVar>
            <tableData>
                    -10		  -0.00053
                     -5		  -0.00010
                      4		    0.00045
                     12		  -0.00026
                     20		    0.00205
                     35		  -0.00067
                     60		    0.00026
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            </tableData>
          </table>
       </product>
    </function>
    <function name="aero/c/CFZGEAR">
    <description>LIFT INCREMENT DUE TO GEAR</description>
    <product>
          <property>gear/gear-pos-norm</property>
          <table>
            <independentVar lookup="row">aero/alpha-deg</independentVar>
            <tableData>
                    -10		    0.00023
                     -5		  -0.00009
                      2		    0.00014
                      8		    0.00030
                     14		    0.00092
                     20		    0.00549
                     30		    0.00985
                     40		    0.01390
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            </tableData>
          </table>
       </product>
    </function>
    <function name="aero/c/CFZmn">
    <description>LIFT DUE TO MACH</description>
    <product>
          <table>
            <independentVar lookup="row">velocities/mach</independentVar>
            <independentVar lookup="column">aero/alpha-deg</independentVar>
            <tableData>
                                -10	         -1	       0.01	          1	         10
                    0.2	    0.08051	    0.00216	  -0.00033	  -0.00363	  -0.08791
                    0.8	  -0.05840	    0.00844	  -0.00695	  -0.00572	    0.05748
                   0.99	  -0.04336	    0.00044	  -0.00341	    0.00520	    0.03798
                    1.4	    0.13361	  -0.00070	  -0.00072	  -0.00256	  -0.13062
                    1.8	    0.14976	    0.00755	    0.00714	    0.00390	  -0.12507
                    2.5	    0.17976	  -0.00193	  -0.00464	  -0.00922	  -0.14068
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            </tableData>
          </table>
       </product>
    </function>
    <function name="aero/c/CMM1">
    <description>BASIC PITCHING MOMENT</description>
    <product>
          <table>
            <independentVar lookup="row">aero/alpha-deg</independentVar>
            <tableData>
                    -20		    0.00000
                    -10		  -0.02980
                      2		    0.00198
                     10		    0.02362
                     18		    0.03799
                     30		    0.04103
                     60		    0.02250
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            </tableData>
          </table>
       </product>
    </function>
    <function name="aero/c/CMMDED1L">
    <description>PITCH MOMENT DUE TO ELEVON 1L</description>
    <product>
          <table>
            <independentVar lookup="row">aero/alpha-deg</independentVar>
            <independentVar lookup="column">aero/beta-deg</independentVar>
            <independentVar lookup="table">fcs/elevon-1L-pos-deg</independentVar>
              <tableData breakPoint="-16">
                               -7	        -5	        -2	         0	         2	         5	         7
                    -10	    0.03117	    0.03249	    0.03141	    0.03031	    0.02965	    0.02914	    0.02772
                      2	    0.02786	    0.02830	    0.02827	    0.02604	    0.02623	    0.02606	    0.02352
                     10	    0.03102	    0.03012	    0.02905	    0.02816	    0.02695	    0.02514	    0.02324
                     18	    0.01730	    0.01972	    0.02398	    0.03045	    0.03165	    0.03087	    0.02199
                     30	    0.01409	    0.01089	    0.01331	    0.01843	    0.01907	    0.01760	    0.01367
                     60	    0.00561	    0.00537	    0.00493	    0.00483	    0.00394	    0.00583	    0.00284
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              </tableData>
              <tableData breakPoint="-10">
                               -7	        -5	        -2	         0	         2	         5	         7
                    -10	    0.01956	    0.02115	    0.02022	    0.01943	    0.01908	    0.01873	    0.01764
                      2	    0.01837	    0.01836	    0.01870	    0.01675	    0.01707	    0.01657	    0.01443
                     10	    0.01974	    0.01997	    0.01900	    0.01844	    0.01763	    0.01648	    0.01584
                     18	    0.00888	    0.01099	    0.01285	    0.01723	    0.01992	    0.02236	    0.01322
                     30	    0.00863	    0.00739	    0.00769	    0.01013	    0.01209	    0.01048	    0.00802
                     60	    0.00337	    0.00320	    0.00295	    0.00302	    0.00234	    0.00518	    0.00168
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              </tableData>
              <tableData breakPoint="-5">
                               -7	        -5	        -2	         0	         2	         5	         7
                    -10	    0.01066	    0.01068	    0.01025	    0.00974	    0.00967	    0.00947	    0.00946
                      2	    0.00941	    0.00935	    0.00973	    0.00853	    0.00869	    0.00846	    0.00798
                     10	    0.01078	    0.01026	    0.00975	    0.00947	    0.00905	    0.00847	    0.00812
                     18	    0.00669	    0.00606	    0.00587	    0.00782	    0.00830	    0.01274	    0.00623
                     30	    0.00432	    0.00284	    0.00300	    0.00500	    0.00455	    0.00509	    0.00449
                     60	    0.00158	    0.00151	    0.00138	    0.00151	    0.00109	    0.00416	    0.00078
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              </tableData>
              <tableData breakPoint="0">
                               -7	        -5	        -2	         0	         2	         5	         7
                    -10	    0.00000	    0.00000	    0.00000	    0.00000	    0.00000	    0.00000	    0.00000
                      2	    0.00000	    0.00000	    0.00000	    0.00000	    0.00000	    0.00000	    0.00000
                     10	    0.00000	    0.00000	    0.00000	    0.00000	    0.00000	    0.00000	    0.00000
                     18	    0.00000	    0.00000	    0.00000	    0.00000	    0.00000	    0.00000	    0.00000
                     30	    0.00000	    0.00000	    0.00000	    0.00000	    0.00000	    0.00000	    0.00000
                     60	    0.00000	    0.00000	    0.00000	    0.00000	    0.00000	    0.00000	    0.00000
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              </tableData>
              <tableData breakPoint="5">
                               -7	        -5	        -2	         0	         2	         5	         7
                    -10	  -0.00992	  -0.01039	  -0.00996	  -0.01023	  -0.00966	  -0.00939	  -0.00945
                      2	  -0.01099	  -0.00950	  -0.00937	  -0.00887	  -0.00869	  -0.00863	  -0.00941
                     10	  -0.01113	  -0.01058	  -0.01003	  -0.00957	  -0.00930	  -0.00871	  -0.00834
                     18	  -0.01056	  -0.00489	  -0.00594	  -0.00557	  -0.00669	  -0.00937	  -0.01327
                     30	  -0.00397	  -0.00406	  -0.00412	  -0.00412	  -0.00561	  -0.00418	  -0.00379
                     60	  -0.00134	  -0.00128	  -0.00115	  -0.00081	  -0.00090	  -0.00075	  -0.00063
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              </tableData>
              <tableData breakPoint="10">
                               -7	        -5	        -2	         0	         2	         5	         7
                    -10	  -0.01943	  -0.02076	  -0.01987	  -0.01982	  -0.01908	  -0.01875	  -0.01855
                      2	  -0.02065	  -0.01893	  -0.01870	  -0.01782	  -0.01744	  -0.01729	  -0.01802
                     10	  -0.02224	  -0.02114	  -0.02002	  -0.01910	  -0.01932	  -0.01738	  -0.01661
                     18	  -0.01860	  -0.01247	  -0.01224	  -0.01048	  -0.01212	  -0.01616	  -0.02227
                     30	  -0.00752	  -0.00784	  -0.00781	  -0.00686	  -0.00931	  -0.00917	  -0.00740
                     60	  -0.00242	  -0.00228	  -0.00204	  -0.00148	  -0.00159	  -0.00132	  -0.00110
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              </tableData>
              <tableData breakPoint="20">
                               -7	        -5	        -2	         0	         2	         5	         7
                    -10	  -0.03855	  -0.03960	  -0.03760	  -0.03757	  -0.03512	  -0.03380	  -0.03721
                      2	  -0.03874	  -0.03708	  -0.03534	  -0.03468	  -0.03300	  -0.03336	  -0.03357
                     10	  -0.04297	  -0.04077	  -0.03858	  -0.03762	  -0.03662	  -0.03273	  -0.03160
                     18	  -0.03300	  -0.02637	  -0.02589	  -0.02395	  -0.02314	  -0.02681	  -0.03613
                     30	  -0.01312	  -0.01359	  -0.01101	  -0.01057	  -0.01483	  -0.01471	  -0.01316
                     60	  -0.00377	  -0.00353	  -0.00312	  -0.00237	  -0.00237	  -0.00193	  -0.00525
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              </tableData>
              <tableData breakPoint="25">
                               -7	        -5	        -2	         0	         2	         5	         7
                    -10	  -0.04752	  -0.04696	  -0.04524	  -0.04527	  -0.04250	  -0.04100	  -0.04440
                      2	  -0.04656	  -0.04480	  -0.04275	  -0.04201	  -0.03999	  -0.04070	  -0.04025
                     10	  -0.05189	  -0.04774	  -0.04654	  -0.04524	  -0.04402	  -0.03962	  -0.03812
                     18	  -0.03876	  -0.03245	  -0.02869	  -0.03021	  -0.02882	  -0.03098	  -0.04014
                     30	  -0.01518	  -0.01570	  -0.01315	  -0.01276	  -0.01623	  -0.01680	  -0.01523
                     60	  -0.00409	  -0.00381	  -0.00335	  -0.00255	  -0.00251	  -0.00202	  -0.00531
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              </tableData>
          </table>
       </product>
    </function>
    <function name="aero/c/CMMDED1R">
    <description>PITCH MOMENT DUE TO ELEVON 1R</description>
    <product>
          <table>
            <independentVar lookup="row">aero/alpha-deg</independentVar>
            <independentVar lookup="column">aero/beta-deg</independentVar>
            <independentVar lookup="table">fcs/elevon-1R-pos-deg</independentVar>
              <tableData breakPoint="-16">
                               -7	        -5	        -2	         0	         2	         5	         7
                    -10	    0.03117	    0.03249	    0.03141	    0.03031	    0.02965	    0.02914	    0.02772
                      2	    0.02786	    0.02830	    0.02827	    0.02604	    0.02623	    0.02606	    0.02352
                     10	    0.03102	    0.03012	    0.02905	    0.02816	    0.02695	    0.02514	    0.02324
                     18	    0.01730	    0.01972	    0.02398	    0.03045	    0.03165	    0.03087	    0.02199
                     30	    0.01409	    0.01089	    0.01331	    0.01843	    0.01907	    0.01760	    0.01367
                     60	    0.00561	    0.00537	    0.00493	    0.00483	    0.00394	    0.00583	    0.00284
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              </tableData>
              <tableData breakPoint="-10">
                               -7	        -5	        -2	         0	         2	         5	         7
                    -10	    0.01956	    0.02115	    0.02022	    0.01943	    0.01908	    0.01873	    0.01764
                      2	    0.01837	    0.01836	    0.01870	    0.01675	    0.01707	    0.01657	    0.01443
                     10	    0.01974	    0.01997	    0.01900	    0.01844	    0.01763	    0.01648	    0.01584
                     18	    0.00888	    0.01099	    0.01285	    0.01723	    0.01992	    0.02236	    0.01322
                     30	    0.00863	    0.00739	    0.00769	    0.01013	    0.01209	    0.01048	    0.00802
                     60	    0.00337	    0.00320	    0.00295	    0.00302	    0.00234	    0.00518	    0.00168
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              </tableData>
              <tableData breakPoint="-5">
                               -7	        -5	        -2	         0	         2	         5	         7
                    -10	    0.01066	    0.01068	    0.01025	    0.00974	    0.00967	    0.00947	    0.00946
                      2	    0.00941	    0.00935	    0.00973	    0.00853	    0.00869	    0.00846	    0.00798
                     10	    0.01078	    0.01026	    0.00975	    0.00947	    0.00905	    0.00847	    0.00812
                     18	    0.00669	    0.00606	    0.00587	    0.00782	    0.00830	    0.01274	    0.00623
                     30	    0.00432	    0.00284	    0.00300	    0.00500	    0.00455	    0.00509	    0.00449
                     60	    0.00158	    0.00151	    0.00138	    0.00151	    0.00109	    0.00416	    0.00078
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              </tableData>
              <tableData breakPoint="0">
                               -7	        -5	        -2	         0	         2	         5	         7
                    -10	    0.00000	    0.00000	    0.00000	    0.00000	    0.00000	    0.00000	    0.00000
                      2	    0.00000	    0.00000	    0.00000	    0.00000	    0.00000	    0.00000	    0.00000
                     10	    0.00000	    0.00000	    0.00000	    0.00000	    0.00000	    0.00000	    0.00000
                     18	    0.00000	    0.00000	    0.00000	    0.00000	    0.00000	    0.00000	    0.00000
                     30	    0.00000	    0.00000	    0.00000	    0.00000	    0.00000	    0.00000	    0.00000
                     60	    0.00000	    0.00000	    0.00000	    0.00000	    0.00000	    0.00000	    0.00000
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              </tableData>
              <tableData breakPoint="5">
                               -7	        -5	        -2	         0	         2	         5	         7
                    -10	  -0.00992	  -0.01039	  -0.00996	  -0.01023	  -0.00966	  -0.00939	  -0.00945
                      2	  -0.01099	  -0.00950	  -0.00937	  -0.00887	  -0.00869	  -0.00863	  -0.00941
                     10	  -0.01113	  -0.01058	  -0.01003	  -0.00957	  -0.00930	  -0.00871	  -0.00834
                     18	  -0.01056	  -0.00489	  -0.00594	  -0.00557	  -0.00669	  -0.00937	  -0.01327
                     30	  -0.00397	  -0.00406	  -0.00412	  -0.00412	  -0.00561	  -0.00418	  -0.00379
                     60	  -0.00134	  -0.00128	  -0.00115	  -0.00081	  -0.00090	  -0.00075	  -0.00063
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              </tableData>
              <tableData breakPoint="10">
                               -7	        -5	        -2	         0	         2	         5	         7
                    -10	  -0.01943	  -0.02076	  -0.01987	  -0.01982	  -0.01908	  -0.01875	  -0.01855
                      2	  -0.02065	  -0.01893	  -0.01870	  -0.01782	  -0.01744	  -0.01729	  -0.01802
                     10	  -0.02224	  -0.02114	  -0.02002	  -0.01910	  -0.01932	  -0.01738	  -0.01661
                     18	  -0.01860	  -0.01247	  -0.01224	  -0.01048	  -0.01212	  -0.01616	  -0.02227
                     30	  -0.00752	  -0.00784	  -0.00781	  -0.00686	  -0.00931	  -0.00917	  -0.00740
                     60	  -0.00242	  -0.00228	  -0.00204	  -0.00148	  -0.00159	  -0.00132	  -0.00110
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              </tableData>
              <tableData breakPoint="20">
                               -7	        -5	        -2	         0	         2	         5	         7
                    -10	  -0.03855	  -0.03960	  -0.03760	  -0.03757	  -0.03512	  -0.03380	  -0.03721
                      2	  -0.03874	  -0.03708	  -0.03534	  -0.03468	  -0.03300	  -0.03336	  -0.03357
                     10	  -0.04297	  -0.04077	  -0.03858	  -0.03762	  -0.03662	  -0.03273	  -0.03160
                     18	  -0.03300	  -0.02637	  -0.02589	  -0.02395	  -0.02314	  -0.02681	  -0.03613
                     30	  -0.01312	  -0.01359	  -0.01101	  -0.01057	  -0.01483	  -0.01471	  -0.01316
                     60	  -0.00377	  -0.00353	  -0.00312	  -0.00237	  -0.00237	  -0.00193	  -0.00525
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              </tableData>
              <tableData breakPoint="25">
                               -7	        -5	        -2	         0	         2	         5	         7
                    -10	  -0.04752	  -0.04696	  -0.04524	  -0.04527	  -0.04250	  -0.04100	  -0.04440
                      2	  -0.04656	  -0.04480	  -0.04275	  -0.04201	  -0.03999	  -0.04070	  -0.04025
                     10	  -0.05189	  -0.04774	  -0.04654	  -0.04524	  -0.04402	  -0.03962	  -0.03812
                     18	  -0.03876	  -0.03245	  -0.02869	  -0.03021	  -0.02882	  -0.03098	  -0.04014
                     30	  -0.01518	  -0.01570	  -0.01315	  -0.01276	  -0.01623	  -0.01680	  -0.01523
                     60	  -0.00409	  -0.00381	  -0.00335	  -0.00255	  -0.00251	  -0.00202	  -0.00531
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              </tableData>
          </table>
       </product>
    </function>
    <function name="aero/c/CMMDED2L">
    <description>PITCH MOMENT DUE TO ELEVON 2L</description>
    <product>
          <table>
            <independentVar lookup="row">aero/alpha-deg</independentVar>
            <independentVar lookup="column">aero/beta-deg</independentVar>
            <independentVar lookup="table">fcs/elevon-2L-pos-deg</independentVar>
              <tableData breakPoint="-16">
                               -7	        -5	        -2	         0	         2	         5	         7
                    -10	    0.03193	    0.02764	    0.02834	    0.02756	    0.02663	    0.02488	    0.02391
                      2	    0.02627	    0.02712	    0.02589	    0.02366	    0.02326	    0.02207	    0.01992
                     10	    0.02820	    0.02707	    0.02545	    0.02476	    0.02380	    0.02101	    0.01918
                     18	    0.01041	    0.01377	    0.01588	    0.02288	    0.02827	    0.02609	    0.01859
                     30	    0.00712	    0.01071	    0.00806	    0.00877	    0.01277	    0.00649	    0.01464
                     60	  -0.00048	    0.00273	    0.00042	    0.00174	    0.00087	    0.00025	  -0.00010
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              </tableData>
              <tableData breakPoint="-10">
                               -7	        -5	        -2	         0	         2	         5	         7
                    -10	    0.02006	    0.01789	    0.01839	    0.01777	    0.01727	    0.01591	    0.01504
                      2	    0.01796	    0.01682	    0.01717	    0.01524	    0.01528	    0.01449	    0.01221
                     10	    0.01755	    0.01772	    0.01637	    0.01647	    0.01556	    0.01381	    0.01195
                     18	    0.00732	    0.00741	    0.00798	    0.01321	    0.01678	    0.02012	    0.01084
                     30	    0.00312	    0.00405	    0.00385	    0.02086	    0.00846	    0.00216	    0.00972
                     60	  -0.00227	    0.00112	  -0.00095	    0.00055	  -0.00002	  -0.00037	  -0.00056
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              </tableData>
              <tableData breakPoint="-5">
                               -7	        -5	        -2	         0	         2	         5	         7
                    -10	    0.01135	    0.00917	    0.00940	    0.00894	    0.00882	    0.00794	    0.00826
                      2	    0.00922	    0.00817	    0.00882	    0.00785	    0.00799	    0.00743	    0.00700
                     10	    0.00949	    0.00911	    0.00806	    0.00845	    0.00732	    0.00721	    0.00665
                     18	    0.00462	    0.00405	    0.00395	    0.00484	    0.00627	    0.01113	    0.00560
                     30	    0.00257	  -0.00153	    0.00137	    0.00803	    0.00224	  -0.00134	    0.00127
                     60	  -0.00369	  -0.00015	  -0.00204	  -0.00056	  -0.00074	  -0.00083	  -0.00093
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              </tableData>
              <tableData breakPoint="0">
                               -7	        -5	        -2	         0	         2	         5	         7
                    -10	    0.00000	    0.00000	    0.00000	    0.00000	    0.00000	    0.00000	    0.00000
                      2	    0.00000	    0.00000	    0.00000	    0.00000	    0.00000	    0.00000	    0.00000
                     10	    0.00000	    0.00000	    0.00000	    0.00000	    0.00000	    0.00000	    0.00000
                     18	    0.00000	    0.00000	    0.00000	    0.00000	    0.00000	    0.00000	    0.00000
                     30	    0.00000	    0.00000	    0.00000	    0.00000	    0.00000	    0.00000	    0.00000
                     60	    0.00000	    0.00000	    0.00000	    0.00000	    0.00000	    0.00000	    0.00000
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              </tableData>
              <tableData breakPoint="5">
                               -7	        -5	        -2	         0	         2	         5	         7
                    -10	  -0.01065	  -0.00931	  -0.00914	  -0.00927	  -0.00882	  -0.00806	  -0.00835
                      2	  -0.01061	  -0.00895	  -0.00866	  -0.00804	  -0.00776	  -0.00753	  -0.00721
                     10	  -0.00988	  -0.00948	  -0.00900	  -0.00859	  -0.00827	  -0.00757	  -0.00706
                     18	  -0.00535	  -0.00302	  -0.00463	  -0.00516	  -0.00554	  -0.00783	  -0.01248
                     30	  -0.00315	  -0.00358	  -0.00121	    0.00197	  -0.00536	  -0.00519	  -0.00386
                     60	  -0.00242	  -0.00229	  -0.00220	  -0.00206	  -0.00351	  -0.00170	  -0.00527
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              </tableData>
              <tableData breakPoint="10">
                               -7	        -5	        -2	         0	         2	         5	         7
                    -10	  -0.02083	  -0.01841	  -0.01836	  -0.01833	  -0.01746	  -0.01589	  -0.01619
                      2	  -0.01965	  -0.01772	  -0.01714	  -0.01605	  -0.01546	  -0.01502	  -0.01563
                     10	  -0.01933	  -0.01848	  -0.01788	  -0.01708	  -0.01644	  -0.01514	  -0.01389
                     18	  -0.01035	  -0.00733	  -0.00824	  -0.00815	  -0.01007	  -0.01389	  -0.01866
                     30	  -0.00556	  -0.00271	  -0.00377	  -0.00353	  -0.00997	  -0.00790	  -0.00665
                     60	  -0.00334	    0.00019	  -0.00286	  -0.00244	  -0.00392	  -0.00202	  -0.00549
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              </tableData>
              <tableData breakPoint="20">
                               -7	        -5	        -2	         0	         2	         5	         7
                    -10	  -0.03959	  -0.03475	  -0.03482	  -0.03373	  -0.03231	  -0.03006	  -0.03311
                      2	  -0.03618	  -0.03418	  -0.03192	  -0.03081	  -0.02917	  -0.02855	  -0.02880
                     10	  -0.03791	  -0.03336	  -0.03387	  -0.03231	  -0.03119	  -0.02798	  -0.02676
                     18	  -0.02243	  -0.01761	  -0.01801	  -0.01646	  -0.01880	  -0.02204	  -0.02895
                     30	  -0.00939	  -0.00653	  -0.00318	  -0.00595	  -0.01215	  -0.01214	  -0.01104
                     60	  -0.00448	  -0.00087	  -0.00367	  -0.00311	  -0.00442	  -0.00240	  -0.00576
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              </tableData>
              <tableData breakPoint="25">
                               -7	        -5	        -2	         0	         2	         5	         7
                    -10	  -0.04817	  -0.04143	  -0.04145	  -0.04052	  -0.03872	  -0.03428	  -0.03936
                      2	  -0.04369	  -0.04102	  -0.03847	  -0.03713	  -0.03508	  -0.03435	  -0.03441
                     10	  -0.04337	  -0.04068	  -0.04008	  -0.03888	  -0.03756	  -0.03364	  -0.03306
                     18	  -0.02779	  -0.02123	  -0.02181	  -0.01989	  -0.02091	  -0.02359	  -0.03237
                     30	  -0.01104	  -0.00821	  -0.00460	  -0.00719	  -0.01193	  -0.01397	  -0.01282
                     60	  -0.00477	  -0.00113	  -0.00387	  -0.00325	  -0.00453	  -0.00249	  -0.00586
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              </tableData>
          </table>
       </product>
    </function>
    <function name="aero/c/CMMDED2R">
    <description>PITCH MOMENT DUE TO ELEVON 2R</description>
    <product>
          <table>
            <independentVar lookup="row">aero/alpha-deg</independentVar>
            <independentVar lookup="column">aero/beta-deg</independentVar>
            <independentVar lookup="table">fcs/elevon-2R-pos-deg</independentVar>
              <tableData breakPoint="-16">
                               -7	        -5	        -2	         0	         2	         5	         7
                    -10	    0.03193	    0.02764	    0.02834	    0.02756	    0.02663	    0.02488	    0.02391
                      2	    0.02627	    0.02712	    0.02589	    0.02366	    0.02326	    0.02207	    0.01992
                     10	    0.02820	    0.02707	    0.02545	    0.02476	    0.02380	    0.02101	    0.01918
                     18	    0.01041	    0.01377	    0.01588	    0.02288	    0.02827	    0.02609	    0.01859
                     30	    0.00712	    0.01071	    0.00806	    0.00877	    0.01277	    0.00649	    0.01464
                     60	  -0.00048	    0.00273	    0.00042	    0.00174	    0.00087	    0.00025	  -0.00010
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              </tableData>
              <tableData breakPoint="-10">
                               -7	        -5	        -2	         0	         2	         5	         7
                    -10	    0.02006	    0.01789	    0.01839	    0.01777	    0.01727	    0.01591	    0.01504
                      2	    0.01796	    0.01682	    0.01717	    0.01524	    0.01528	    0.01449	    0.01221
                     10	    0.01755	    0.01772	    0.01637	    0.01647	    0.01556	    0.01381	    0.01195
                     18	    0.00732	    0.00741	    0.00798	    0.01321	    0.01678	    0.02012	    0.01084
                     30	    0.00312	    0.00405	    0.00385	    0.02086	    0.00846	    0.00216	    0.00972
                     60	  -0.00227	    0.00112	  -0.00095	    0.00055	  -0.00002	  -0.00037	  -0.00056
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              </tableData>
              <tableData breakPoint="-5">
                               -7	        -5	        -2	         0	         2	         5	         7
                    -10	    0.01135	    0.00917	    0.00940	    0.00894	    0.00882	    0.00794	    0.00826
                      2	    0.00922	    0.00817	    0.00882	    0.00785	    0.00799	    0.00743	    0.00700
                     10	    0.00949	    0.00911	    0.00806	    0.00845	    0.00732	    0.00721	    0.00665
                     18	    0.00462	    0.00405	    0.00395	    0.00484	    0.00627	    0.01113	    0.00560
                     30	    0.00257	  -0.00153	    0.00137	    0.00803	    0.00224	  -0.00134	    0.00127
                     60	  -0.00369	  -0.00015	  -0.00204	  -0.00056	  -0.00074	  -0.00083	  -0.00093
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              </tableData>
              <tableData breakPoint="0">
                               -7	        -5	        -2	         0	         2	         5	         7
                    -10	    0.00000	    0.00000	    0.00000	    0.00000	    0.00000	    0.00000	    0.00000
                      2	    0.00000	    0.00000	    0.00000	    0.00000	    0.00000	    0.00000	    0.00000
                     10	    0.00000	    0.00000	    0.00000	    0.00000	    0.00000	    0.00000	    0.00000
                     18	    0.00000	    0.00000	    0.00000	    0.00000	    0.00000	    0.00000	    0.00000
                     30	    0.00000	    0.00000	    0.00000	    0.00000	    0.00000	    0.00000	    0.00000
                     60	    0.00000	    0.00000	    0.00000	    0.00000	    0.00000	    0.00000	    0.00000
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              </tableData>
              <tableData breakPoint="5">
                               -7	        -5	        -2	         0	         2	         5	         7
                    -10	  -0.01065	  -0.00931	  -0.00914	  -0.00927	  -0.00882	  -0.00806	  -0.00835
                      2	  -0.01061	  -0.00895	  -0.00866	  -0.00804	  -0.00776	  -0.00753	  -0.00721
                     10	  -0.00988	  -0.00948	  -0.00900	  -0.00859	  -0.00827	  -0.00757	  -0.00706
                     18	  -0.00535	  -0.00302	  -0.00463	  -0.00516	  -0.00554	  -0.00783	  -0.01248
                     30	  -0.00315	  -0.00358	  -0.00121	    0.00197	  -0.00536	  -0.00519	  -0.00386
                     60	  -0.00242	  -0.00229	  -0.00220	  -0.00206	  -0.00351	  -0.00170	  -0.00527
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              </tableData>
              <tableData breakPoint="10">
                               -7	        -5	        -2	         0	         2	         5	         7
                    -10	  -0.02083	  -0.01841	  -0.01836	  -0.01833	  -0.01746	  -0.01589	  -0.01619
                      2	  -0.01965	  -0.01772	  -0.01714	  -0.01605	  -0.01546	  -0.01502	  -0.01563
                     10	  -0.01933	  -0.01848	  -0.01788	  -0.01708	  -0.01644	  -0.01514	  -0.01389
                     18	  -0.01035	  -0.00733	  -0.00824	  -0.00815	  -0.01007	  -0.01389	  -0.01866
                     30	  -0.00556	  -0.00271	  -0.00377	  -0.00353	  -0.00997	  -0.00790	  -0.00665
                     60	  -0.00334	    0.00019	  -0.00286	  -0.00244	  -0.00392	  -0.00202	  -0.00549
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              </tableData>
              <tableData breakPoint="20">
                               -7	        -5	        -2	         0	         2	         5	         7
                    -10	  -0.03959	  -0.03475	  -0.03482	  -0.03373	  -0.03231	  -0.03006	  -0.03311
                      2	  -0.03618	  -0.03418	  -0.03192	  -0.03081	  -0.02917	  -0.02855	  -0.02880
                     10	  -0.03791	  -0.03336	  -0.03387	  -0.03231	  -0.03119	  -0.02798	  -0.02676
                     18	  -0.02243	  -0.01761	  -0.01801	  -0.01646	  -0.01880	  -0.02204	  -0.02895
                     30	  -0.00939	  -0.00653	  -0.00318	  -0.00595	  -0.01215	  -0.01214	  -0.01104
                     60	  -0.00448	  -0.00087	  -0.00367	  -0.00311	  -0.00442	  -0.00240	  -0.00576
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              </tableData>
              <tableData breakPoint="25">
                               -7	        -5	        -2	         0	         2	         5	         7
                    -10	  -0.04817	  -0.04143	  -0.04145	  -0.04052	  -0.03872	  -0.03428	  -0.03936
                      2	  -0.04369	  -0.04102	  -0.03847	  -0.03713	  -0.03508	  -0.03435	  -0.03441
                     10	  -0.04337	  -0.04068	  -0.04008	  -0.03888	  -0.03756	  -0.03364	  -0.03306
                     18	  -0.02779	  -0.02123	  -0.02181	  -0.01989	  -0.02091	  -0.02359	  -0.03237
                     30	  -0.01104	  -0.00821	  -0.00460	  -0.00719	  -0.01193	  -0.01397	  -0.01282
                     60	  -0.00477	  -0.00113	  -0.00387	  -0.00325	  -0.00453	  -0.00249	  -0.00586
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              </tableData>
          </table>
       </product>
    </function>
    <function name="aero/c/CMMDSBL">
    <description>PITCH MOMENT DUE TO LOWER SPEEDBRAKE DEFLECTION</description>
    <product>
          <property>fcs/airbrake-upper</property>
          <table>
            <independentVar lookup="row">aero/alpha-deg</independentVar>
            <tableData>
                    -10		  -0.00024
                     -5		  -0.00097
                      4		  -0.00355
                     12		  -0.01135
                     20		  -0.00173
                     35		    0.00012
                     60		    0.00030
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            </tableData>
          </table>
       </product>
    </function>
    <function name="aero/c/CMMDSBU">
    <description>PITCH MOMENT DUE TO UPPER SPEEDBRAKE DEFLECTION</description>
    <product>
          <property>fcs/airbrake-lower</property>
          <table>
            <independentVar lookup="row">aero/alpha-deg</independentVar>
            <tableData>
                    -10		  -0.00096
                     -5		    0.00017
                      4		    0.00088
                     12		  -0.00050
                     20		  -0.00017
                     35		    0.00250
                     60		    0.00213
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            </tableData>
          </table>
       </product>
    </function>
    <function name="aero/c/CMMDSD1L">
    <description>PITCH MOMENT DUE TO LE SLAT 1L</description>
    <product>
          <property>fcs/slat-1L-pos-deg</property>
          <table>
            <independentVar lookup="row">aero/alpha-deg</independentVar>
            <tableData>
                    -10		  -0.00021
                     -5		  -0.00023
                      4		    0.00007
                     12		    0.00008
                     20		    0.00010
                     35		  -0.00215
                     60		  -0.00304
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            </tableData>
          </table>
       </product>
    </function>
    <function name="aero/c/CMMDSD1R">
    <description>PITCH MOMENT DUE TO LE SLAT 1R</description>
    <product>
          <property>fcs/slat-1R-pos-deg</property>
          <table>
            <independentVar lookup="row">aero/alpha-deg</independentVar>
            <tableData>
                    -10		  -0.00021
                     -5		  -0.00023
                      4		    0.00007
                     12		    0.00008
                     20		    0.00010
                     35		  -0.00215
                     60		  -0.00304
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            </tableData>
          </table>
       </product>
    </function>
    <function name="aero/c/CMMDSD2L">
    <description>PITCH MOMENT DUE TO LE SLAT 2L</description>
    <product>
          <property>fcs/slat-2L-pos-deg</property>
          <table>
            <independentVar lookup="row">aero/alpha-deg</independentVar>
            <tableData>
                    -10		    0.00164
                     -5		    0.00096
                      4		  -0.00072
                     12		  -0.00157
                     20		  -0.00214
                     35		    0.00064
                     60		    0.00287
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            </tableData>
          </table>
       </product>
    </function>
    <function name="aero/c/CMMDSD2R">
    <description>PITCH MOMENT DUE TO LE SLAT 2R</description>
    <product>
          <property>fcs/slat-2R-pos-deg</property>
          <table>
            <independentVar lookup="row">aero/alpha-deg</independentVar>
            <tableData>
                    -10		    0.00164
                     -5		    0.00096
                      4		  -0.00072
                     12		  -0.00157
                     20		  -0.00214
                     35		    0.00064
                     60		    0.00287
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            </tableData>
          </table>
       </product>
    </function>
    <function name="aero/c/CMMGEAR">
    <description>PITCHING MOMENT INCREMENT DUE TO GEAR</description>
    <product>
          <property>gear/gear-pos-norm</property>
          <table>
            <independentVar lookup="row">aero/alpha-deg</independentVar>
            <tableData>
                    -10		  -0.00072
                     -5		  -0.00037
                      2		    0.00015
                      8		    0.00057
                     14		    0.00112
                     20		    0.00070
                     30		    0.00256
                     40		    0.00544
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            </tableData>
          </table>
       </product>
    </function>
    <function name="aero/c/CMMmnw">
    <description>PITCH DUE TO MACH</description>
    <product>
          <table>
            <independentVar lookup="row">velocities/mach</independentVar>
            <independentVar lookup="column">aero/alpha-deg</independentVar>
            <tableData>
                                -10	         -1	       0.01	          1	         10
                    0.2	  -0.00294	  -0.00040	  -0.00024	    0.00022	    0.00619
                    0.8	    0.01044	  -0.00205	    0.00198	    0.00321	  -0.01307
                   0.99	    0.04446	    0.00030	    0.00030	  -0.00196	  -0.04242
                    1.4	    0.06871	    0.01235	    0.00509	  -0.00130	  -0.05433
                    1.8	    0.06496	    0.01135	    0.00481	  -0.00079	  -0.04611
                    2.5	    0.04525	    0.00679	    0.00032	  -0.00560	  -0.06507
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            </tableData>
          </table>
       </product>
    </function>
    <function name="aero/c/CMMQ">
    <description>PITCH DAMPING DERIVATIVE</description>
    <product>
          <property>aero/qb</property>
          <table>
            <independentVar lookup="row">aero/alpha-deg</independentVar>
            <tableData>
                    -10		  -1.39550
                     -5		  -1.19687
                      4		  -1.15655
                     12		  -1.47996
                     20		  -1.68465
                     35		  -0.77429
                     60		  -0.84217
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            </tableData>
          </table>
       </product>
    </function>
    <function name="aero/c/CML1">
    <description>BASIC ROLLING MOMENT</description>
    <product>
          <table>
            <independentVar lookup="row">aero/alpha-deg</independentVar>
            <independentVar lookup="column">aero/beta-deg</independentVar>
            <tableData>
                                 -7	         -5	         -2	          0	          2	          5	          7
                    -10	  -0.01947	  -0.01452	  -0.00653	    0.00000	    0.00653	    0.01452	    0.01947
                      2	    0.00645	    0.00402	    0.00130	    0.00000	  -0.00130	  -0.00402	  -0.00645
                     10	    0.01398	    0.00973	    0.00382	    0.00000	  -0.00382	  -0.00973	  -0.01398
                     18	    0.03533	    0.03192	    0.01422	    0.00000	  -0.01422	  -0.03192	  -0.03533
                     30	    0.04141	    0.02894	    0.01094	    0.00000	  -0.01094	  -0.02894	  -0.04141
                     60	    0.00616	    0.00465	    0.00062	    0.00000	  -0.00062	  -0.00465	  -0.00616
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            </tableData>
          </table>
       </product>
    </function>
    <function name="aero/c/CMLDED1L">
    <description>ROLLING MOMENT DUE TO ELEVON 1L DEFLECTION</description>
    <product>
          <table>
            <independentVar lookup="row">aero/alpha-deg</independentVar>
            <independentVar lookup="column">aero/beta-deg</independentVar>
            <independentVar lookup="table">fcs/elevon-1L-pos-deg</independentVar>
              <tableData breakPoint="-16">
                               -7	        -5	        -2	         0	         2	         5	         7
                    -10	  -0.01897	  -0.02028	  -0.02006	  -0.01976	  -0.01949	  -0.01890	  -0.01939
                      2	  -0.01735	  -0.01759	  -0.01767	  -0.01711	  -0.01734	  -0.01729	  -0.01710
                     10	  -0.01867	  -0.01749	  -0.01764	  -0.01745	  -0.01713	  -0.01650	  -0.01680
                     18	  -0.00919	  -0.00961	  -0.01553	  -0.02288	  -0.02548	  -0.02737	  -0.02176
                     30	    0.00159	    0.00197	    0.00295	    0.00250	    0.00366	    0.00468	    0.00559
                     60	    0.00130	    0.00140	    0.00127	    0.00111	    0.00130	    0.00119	    0.00163
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              </tableData>
              <tableData breakPoint="-10">
                               -7	        -5	        -2	         0	         2	         5	         7
                    -10	  -0.01190	  -0.01279	  -0.01276	  -0.01259	  -0.01244	  -0.01205	  -0.01263
                      2	  -0.01124	  -0.01135	  -0.01155	  -0.01088	  -0.01114	  -0.01101	  -0.01094
                     10	  -0.01235	  -0.01174	  -0.01155	  -0.01142	  -0.01122	  -0.01079	  -0.01057
                     18	  -0.00338	  -0.00339	  -0.00724	  -0.01152	  -0.01516	  -0.01970	  -0.01407
                     30	    0.00071	    0.00111	    0.00175	    0.00164	    0.00225	    0.00302	    0.00372
                     60	    0.00077	    0.00082	    0.00075	    0.00065	    0.00076	    0.00076	    0.00097
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              </tableData>
              <tableData breakPoint="-5">
                               -7	        -5	        -2	         0	         2	         5	         7
                    -10	  -0.00626	  -0.00640	  -0.00640	  -0.00632	  -0.00625	  -0.00606	  -0.00623
                      2	  -0.00572	  -0.00575	  -0.00586	  -0.00549	  -0.00565	  -0.00557	  -0.00557
                     10	  -0.00622	  -0.00602	  -0.00592	  -0.00585	  -0.00574	  -0.00552	  -0.00540
                     18	  -0.00057	  -0.00132	  -0.00244	  -0.00398	  -0.00561	  -0.00917	  -0.00698
                     30	    0.00061	    0.00033	    0.00085	    0.00083	    0.00107	    0.00167	    0.00145
                     60	    0.00034	    0.00038	    0.00035	    0.00030	    0.00036	    0.00027	    0.00046
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              </tableData>
              <tableData breakPoint="0">
                               -7	        -5	        -2	         0	         2	         5	         7
                    -10	    0.00000	    0.00000	    0.00000	    0.00000	    0.00000	    0.00000	    0.00000
                      2	    0.00000	    0.00000	    0.00000	    0.00000	    0.00000	    0.00000	    0.00000
                     10	    0.00000	    0.00000	    0.00000	    0.00000	    0.00000	    0.00000	    0.00000
                     18	    0.00000	    0.00000	    0.00000	    0.00000	    0.00000	    0.00000	    0.00000
                     30	    0.00000	    0.00000	    0.00000	    0.00000	    0.00000	    0.00000	    0.00000
                     60	    0.00000	    0.00000	    0.00000	    0.00000	    0.00000	    0.00000	    0.00000
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              </tableData>
              <tableData breakPoint="5">
                               -7	        -5	        -2	         0	         2	         5	         7
                    -10	    0.00585	    0.00600	    0.00586	    0.00617	    0.00612	    0.00593	    0.00614
                      2	    0.00578	    0.00581	    0.00565	    0.00572	    0.00557	    0.00562	    0.00555
                     10	    0.00642	    0.00621	    0.00608	    0.00598	    0.00587	    0.00564	    0.00549
                     18	  -0.00250	    0.00037	    0.00114	    0.00213	    0.00331	    0.00686	    0.01144
                     30	  -0.00057	  -0.00063	  -0.00074	  -0.00071	  -0.00100	  -0.00122	  -0.00124
                     60	  -0.00034	  -0.00033	  -0.00029	  -0.00025	  -0.00029	  -0.00035	  -0.00035
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              </tableData>
              <tableData breakPoint="10">
                               -7	        -5	        -2	         0	         2	         5	         7
                    -10	    0.01127	    0.01200	    0.01168	    0.01188	    0.01196	    0.01204	    0.01203
                      2	    0.01155	    0.01159	    0.01130	    0.01148	    0.01125	    0.01132	    0.01112
                     10	    0.01285	    0.01240	    0.01211	    0.01190	    0.01172	    0.01122	    0.01090
                     18	  -0.00229	    0.00044	    0.00152	    0.00329	    0.00489	    0.01039	    0.01830
                     30	  -0.00103	  -0.00115	  -0.00139	  -0.00142	  -0.00188	  -0.00242	  -0.00247
                     60	  -0.00059	  -0.00058	  -0.00052	  -0.00045	  -0.00051	  -0.00061	  -0.00057
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              </tableData>
              <tableData breakPoint="20">
                               -7	        -5	        -2	         0	         2	         5	         7
                    -10	    0.02182	    0.02259	    0.02192	    0.02217	    0.02209	    0.02247	    0.02213
                      2	    0.02231	    0.02239	    0.02150	    0.02220	    0.02165	    0.02186	    0.02152
                     10	    0.02487	    0.02393	    0.02325	    0.02284	    0.02245	    0.02152	    0.02127
                     18	  -0.00173	    0.00117	    0.00080	    0.00376	    0.00595	    0.01309	    0.02484
                     30	  -0.00179	  -0.00201	  -0.00244	  -0.00216	  -0.00329	  -0.00413	  -0.00422
                     60	  -0.00089	  -0.00089	  -0.00079	  -0.00067	  -0.00075	  -0.00089	  -0.00059
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              </tableData>
              <tableData breakPoint="25">
                               -7	        -5	        -2	         0	         2	         5	         7
                    -10	    0.02644	    0.02753	    0.02626	    0.02657	    0.02640	    0.02691	    0.02665
                      2	    0.02693	    0.02710	    0.02597	    0.02682	    0.02620	    0.02652	    0.02595
                     10	    0.03007	    0.02881	    0.02801	    0.02749	    0.02702	    0.02588	    0.02548
                     18	  -0.00150	    0.00071	    0.00126	    0.00352	    0.00562	    0.01372	    0.02597
                     30	  -0.00206	  -0.00233	  -0.00280	  -0.00249	  -0.00377	  -0.00475	  -0.00491
                     60	  -0.00097	  -0.00096	  -0.00084	  -0.00071	  -0.00079	  -0.00094	  -0.00062
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              </tableData>
          </table>
       </product>
    </function>
    <function name="aero/c/CMLDED1R">
    <description>ROLLING MOMENT DUE TO ELEVON 1R DEFLECTION</description>
    <product>
          <table>
            <independentVar lookup="row">aero/alpha-deg</independentVar>
            <independentVar lookup="column">aero/beta-deg</independentVar>
            <independentVar lookup="table">fcs/elevon-1R-pos-deg</independentVar>
              <tableData breakPoint="-16">
                               -7	        -5	        -2	         0	         2	         5	         7
                    -10	    0.01897	    0.02028	    0.02006	    0.01976	    0.01949	    0.01890	    0.01939
                      2	    0.01735	    0.01759	    0.01767	    0.01711	    0.01734	    0.01729	    0.01710
                     10	    0.01867	    0.01749	    0.01764	    0.01745	    0.01713	    0.01650	    0.01680
                     18	    0.00919	    0.00961	    0.01553	    0.02288	    0.02548	    0.02737	    0.02176
                     30	  -0.00159	  -0.00197	  -0.00295	  -0.00250	  -0.00366	  -0.00468	  -0.00559
                     60	  -0.00130	  -0.00140	  -0.00127	  -0.00111	  -0.00130	  -0.00119	  -0.00163
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              </tableData>
              <tableData breakPoint="-10">
                               -7	        -5	        -2	         0	         2	         5	         7
                    -10	    0.01190	    0.01279	    0.01276	    0.01259	    0.01244	    0.01205	    0.01263
                      2	    0.01124	    0.01135	    0.01155	    0.01088	    0.01114	    0.01101	    0.01094
                     10	    0.01235	    0.01174	    0.01155	    0.01142	    0.01122	    0.01079	    0.01057
                     18	    0.00338	    0.00339	    0.00724	    0.01152	    0.01516	    0.01970	    0.01407
                     30	  -0.00071	  -0.00111	  -0.00175	  -0.00164	  -0.00225	  -0.00302	  -0.00372
                     60	  -0.00077	  -0.00082	  -0.00075	  -0.00065	  -0.00076	  -0.00076	  -0.00097
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              </tableData>
              <tableData breakPoint="-5">
                               -7	        -5	        -2	         0	         2	         5	         7
                    -10	    0.00626	    0.00640	    0.00640	    0.00632	    0.00625	    0.00606	    0.00623
                      2	    0.00572	    0.00575	    0.00586	    0.00549	    0.00565	    0.00557	    0.00557
                     10	    0.00622	    0.00602	    0.00592	    0.00585	    0.00574	    0.00552	    0.00540
                     18	    0.00057	    0.00132	    0.00244	    0.00398	    0.00561	    0.00917	    0.00698
                     30	  -0.00061	  -0.00033	  -0.00085	  -0.00083	  -0.00107	  -0.00167	  -0.00145
                     60	  -0.00034	  -0.00038	  -0.00035	  -0.00030	  -0.00036	  -0.00027	  -0.00046
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              </tableData>
              <tableData breakPoint="0">
                               -7	        -5	        -2	         0	         2	         5	         7
                    -10	    0.00000	    0.00000	    0.00000	    0.00000	    0.00000	    0.00000	    0.00000
                      2	    0.00000	    0.00000	    0.00000	    0.00000	    0.00000	    0.00000	    0.00000
                     10	    0.00000	    0.00000	    0.00000	    0.00000	    0.00000	    0.00000	    0.00000
                     18	    0.00000	    0.00000	    0.00000	    0.00000	    0.00000	    0.00000	    0.00000
                     30	    0.00000	    0.00000	    0.00000	    0.00000	    0.00000	    0.00000	    0.00000
                     60	    0.00000	    0.00000	    0.00000	    0.00000	    0.00000	    0.00000	    0.00000
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              </tableData>
              <tableData breakPoint="5">
                               -7	        -5	        -2	         0	         2	         5	         7
                    -10	  -0.00585	  -0.00600	  -0.00586	  -0.00617	  -0.00612	  -0.00593	  -0.00614
                      2	  -0.00578	  -0.00581	  -0.00565	  -0.00572	  -0.00557	  -0.00562	  -0.00555
                     10	  -0.00642	  -0.00621	  -0.00608	  -0.00598	  -0.00587	  -0.00564	  -0.00549
                     18	    0.00250	  -0.00037	  -0.00114	  -0.00213	  -0.00331	  -0.00686	  -0.01144
                     30	    0.00057	    0.00063	    0.00074	    0.00071	    0.00100	    0.00122	    0.00124
                     60	    0.00034	    0.00033	    0.00029	    0.00025	    0.00029	    0.00035	    0.00035
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              </tableData>
              <tableData breakPoint="10">
                               -7	        -5	        -2	         0	         2	         5	         7
                    -10	  -0.01127	  -0.01200	  -0.01168	  -0.01188	  -0.01196	  -0.01204	  -0.01203
                      2	  -0.01155	  -0.01159	  -0.01130	  -0.01148	  -0.01125	  -0.01132	  -0.01112
                     10	  -0.01285	  -0.01240	  -0.01211	  -0.01190	  -0.01172	  -0.01122	  -0.01090
                     18	    0.00229	  -0.00044	  -0.00152	  -0.00329	  -0.00489	  -0.01039	  -0.01830
                     30	    0.00103	    0.00115	    0.00139	    0.00142	    0.00188	    0.00242	    0.00247
                     60	    0.00059	    0.00058	    0.00052	    0.00045	    0.00051	    0.00061	    0.00057
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              </tableData>
              <tableData breakPoint="20">
                               -7	        -5	        -2	         0	         2	         5	         7
                    -10	  -0.02182	  -0.02259	  -0.02192	  -0.02217	  -0.02209	  -0.02247	  -0.02213
                      2	  -0.02231	  -0.02239	  -0.02150	  -0.02220	  -0.02165	  -0.02186	  -0.02152
                     10	  -0.02487	  -0.02393	  -0.02325	  -0.02284	  -0.02245	  -0.02152	  -0.02127
                     18	    0.00173	  -0.00117	  -0.00080	  -0.00376	  -0.00595	  -0.01309	  -0.02484
                     30	    0.00179	    0.00201	    0.00244	    0.00216	    0.00329	    0.00413	    0.00422
                     60	    0.00089	    0.00089	    0.00079	    0.00067	    0.00075	    0.00089	    0.00059
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              </tableData>
              <tableData breakPoint="25">
                               -7	        -5	        -2	         0	         2	         5	         7
                    -10	  -0.02644	  -0.02753	  -0.02626	  -0.02657	  -0.02640	  -0.02691	  -0.02665
                      2	  -0.02693	  -0.02710	  -0.02597	  -0.02682	  -0.02620	  -0.02652	  -0.02595
                     10	  -0.03007	  -0.02881	  -0.02801	  -0.02749	  -0.02702	  -0.02588	  -0.02548
                     18	    0.00150	  -0.00071	  -0.00126	  -0.00352	  -0.00562	  -0.01372	  -0.02597
                     30	    0.00206	    0.00233	    0.00280	    0.00249	    0.00377	    0.00475	    0.00491
                     60	    0.00097	    0.00096	    0.00084	    0.00071	    0.00079	    0.00094	    0.00062
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              </tableData>
          </table>
       </product>
    </function>
    <function name="aero/c/CMLDED2L">
    <description>ROLLING MOMENT DUE TO ELEVON 2L DEFLECTION</description>
    <product>
          <table>
            <independentVar lookup="row">aero/alpha-deg</independentVar>
            <independentVar lookup="column">aero/beta-deg</independentVar>
            <independentVar lookup="table">fcs/elevon-2L-pos-deg</independentVar>
              <tableData breakPoint="-16">
                               -7	        -5	        -2	         0	         2	         5	         7
                    -10	  -0.00803	  -0.00765	  -0.00825	  -0.00881	  -0.00888	  -0.00840	  -0.00906
                      2	  -0.00607	  -0.00655	  -0.00692	  -0.00710	  -0.00711	  -0.00709	  -0.00702
                     10	  -0.00799	  -0.00802	  -0.00832	  -0.00842	  -0.00841	  -0.00828	  -0.00832
                     18	    0.00463	    0.00406	  -0.00171	  -0.00822	  -0.01548	  -0.01697	  -0.01371
                     30	    0.00617	    0.00683	    0.00690	    0.00567	    0.00710	    0.00760	    0.00793
                     60	    0.00163	    0.00188	    0.00143	    0.00109	    0.00133	    0.00169	    0.00170
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              </tableData>
              <tableData breakPoint="-10">
                               -7	        -5	        -2	         0	         2	         5	         7
                    -10	  -0.00498	  -0.00465	  -0.00528	  -0.00565	  -0.00572	  -0.00526	  -0.00594
                      2	  -0.00401	  -0.00414	  -0.00453	  -0.00453	  -0.00461	  -0.00462	  -0.00462
                     10	  -0.00507	  -0.00516	  -0.00539	  -0.00546	  -0.00545	  -0.00539	  -0.00539
                     18	    0.00421	    0.00465	    0.00129	  -0.00261	  -0.00763	  -0.01287	  -0.00864
                     30	    0.00351	    0.00379	    0.00383	    0.00363	    0.00442	    0.00485	    0.00480
                     60	    0.00088	    0.00115	    0.00087	    0.00065	    0.00078	    0.00098	    0.00099
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              </tableData>
              <tableData breakPoint="-5">
                               -7	        -5	        -2	         0	         2	         5	         7
                    -10	  -0.00277	  -0.00238	  -0.00267	  -0.00285	  -0.00289	  -0.00247	  -0.00290
                      2	  -0.00205	  -0.00205	  -0.00229	  -0.00230	  -0.00235	  -0.00237	  -0.00235
                     10	  -0.00253	  -0.00260	  -0.00274	  -0.00278	  -0.00276	  -0.00274	  -0.00272
                     18	    0.00346	    0.00262	    0.00142	    0.00000	  -0.00174	  -0.00519	  -0.00502
                     30	    0.00194	    0.00152	    0.00188	    0.00187	    0.00213	    0.00264	    0.00291
                     60	    0.00032	    0.00058	    0.00044	    0.00031	    0.00035	    0.00044	    0.00044
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              </tableData>
              <tableData breakPoint="0">
                               -7	        -5	        -2	         0	         2	         5	         7
                    -10	    0.00000	    0.00000	    0.00000	    0.00000	    0.00000	    0.00000	    0.00000
                      2	    0.00000	    0.00000	    0.00000	    0.00000	    0.00000	    0.00000	    0.00000
                     10	    0.00000	    0.00000	    0.00000	    0.00000	    0.00000	    0.00000	    0.00000
                     18	    0.00000	    0.00000	    0.00000	    0.00000	    0.00000	    0.00000	    0.00000
                     30	    0.00000	    0.00000	    0.00000	    0.00000	    0.00000	    0.00000	    0.00000
                     60	    0.00000	    0.00000	    0.00000	    0.00000	    0.00000	    0.00000	    0.00000
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              </tableData>
              <tableData breakPoint="5">
                               -7	        -5	        -2	         0	         2	         5	         7
                    -10	    0.00249	    0.00237	    0.00225	    0.00280	    0.00290	    0.00289	    0.00287
                      2	    0.00215	    0.00219	    0.00228	    0.00234	    0.00229	    0.00241	    0.00241
                     10	    0.00276	    0.00277	    0.00281	    0.00282	    0.00277	    0.00265	    0.00255
                     18	  -0.00313	  -0.00312	  -0.00243	  -0.00147	  -0.00006	    0.00308	    0.00864
                     30	  -0.00236	  -0.00220	  -0.00207	  -0.00174	  -0.00185	  -0.00208	  -0.00209
                     60	  -0.00039	  -0.00038	  -0.00030	  -0.00026	  -0.00037	  -0.00046	    0.00001
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              </tableData>
              <tableData breakPoint="10">
                               -7	        -5	        -2	         0	         2	         5	         7
                    -10	    0.00477	    0.00468	    0.00478	    0.00550	    0.00569	    0.00566	    0.00536
                      2	    0.00423	    0.00437	    0.00451	    0.00464	    0.00457	    0.00482	    0.00471
                     10	    0.00490	    0.00504	    0.00554	    0.00556	    0.00550	    0.00529	    0.00475
                     18	  -0.00591	  -0.00563	  -0.00490	  -0.00362	  -0.00139	    0.00466	    0.01263
                     30	  -0.00421	  -0.00420	  -0.00382	  -0.00316	  -0.00325	  -0.00398	  -0.00401
                     60	  -0.00074	  -0.00058	  -0.00058	  -0.00046	  -0.00060	  -0.00079	  -0.00030
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              </tableData>
              <tableData breakPoint="20">
                               -7	        -5	        -2	         0	         2	         5	         7
                    -10	    0.00922	    0.00859	    0.00923	    0.00998	    0.01096	    0.01069	    0.01035
                      2	    0.00812	    0.00840	    0.00854	    0.00889	    0.00872	    0.00936	    0.00920
                     10	    0.00975	    0.00979	    0.01003	    0.01010	    0.01001	    0.00969	    0.00980
                     18	  -0.01197	  -0.01105	  -0.01137	  -0.00860	  -0.00520	    0.00300	    0.01509
                     30	  -0.00718	  -0.00717	  -0.00709	  -0.00542	  -0.00649	  -0.00677	  -0.00711
                     60	  -0.00142	  -0.00102	  -0.00091	  -0.00072	  -0.00089	  -0.00109	  -0.00069
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              </tableData>
              <tableData breakPoint="25">
                               -7	        -5	        -2	         0	         2	         5	         7
                    -10	    0.01077	    0.01051	    0.01088	    0.01199	    0.01300	    0.01299	    0.01258
                      2	    0.00975	    0.01012	    0.01029	    0.01070	    0.01047	    0.01126	    0.01111
                     10	    0.01149	    0.01180	    0.01214	    0.01215	    0.01205	    0.01210	    0.01149
                     18	  -0.01529	  -0.01264	  -0.01326	  -0.00994	  -0.00718	    0.00139	    0.01453
                     30	  -0.00829	  -0.00759	  -0.00814	  -0.00634	  -0.00750	  -0.00774	  -0.00822
                     60	  -0.00153	  -0.00124	  -0.00099	  -0.00077	  -0.00098	  -0.00118	  -0.00077
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              </tableData>
          </table>
       </product>
    </function>
    <function name="aero/c/CMLDED2R">
    <description>ROLLING MOMENT DUE TO ELEVON 2R DEFLECTION</description>
    <product>
          <table>
            <independentVar lookup="row">aero/alpha-deg</independentVar>
            <independentVar lookup="column">aero/beta-deg</independentVar>
            <independentVar lookup="table">fcs/elevon-2R-pos-deg</independentVar>
              <tableData breakPoint="-16">
                               -7	        -5	        -2	         0	         2	         5	         7
                    -10	    0.00803	    0.00765	    0.00825	    0.00881	    0.00888	    0.00840	    0.00906
                      2	    0.00607	    0.00655	    0.00692	    0.00710	    0.00711	    0.00709	    0.00702
                     10	    0.00799	    0.00802	    0.00832	    0.00842	    0.00841	    0.00828	    0.00832
                     18	  -0.00463	  -0.00406	    0.00171	    0.00822	    0.01548	    0.01697	    0.01371
                     30	  -0.00617	  -0.00683	  -0.00690	  -0.00567	  -0.00710	  -0.00760	  -0.00793
                     60	  -0.00163	  -0.00188	  -0.00143	  -0.00109	  -0.00133	  -0.00169	  -0.00170
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              </tableData>
              <tableData breakPoint="-10">
                               -7	        -5	        -2	         0	         2	         5	         7
                    -10	    0.00498	    0.00465	    0.00528	    0.00565	    0.00572	    0.00526	    0.00594
                      2	    0.00401	    0.00414	    0.00453	    0.00453	    0.00461	    0.00462	    0.00462
                     10	    0.00507	    0.00516	    0.00539	    0.00546	    0.00545	    0.00539	    0.00539
                     18	  -0.00421	  -0.00465	  -0.00129	    0.00261	    0.00763	    0.01287	    0.00864
                     30	  -0.00351	  -0.00379	  -0.00383	  -0.00363	  -0.00442	  -0.00485	  -0.00480
                     60	  -0.00088	  -0.00115	  -0.00087	  -0.00065	  -0.00078	  -0.00098	  -0.00099
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              </tableData>
              <tableData breakPoint="-5">
                               -7	        -5	        -2	         0	         2	         5	         7
                    -10	    0.00277	    0.00238	    0.00267	    0.00285	    0.00289	    0.00247	    0.00290
                      2	    0.00205	    0.00205	    0.00229	    0.00230	    0.00235	    0.00237	    0.00235
                     10	    0.00253	    0.00260	    0.00274	    0.00278	    0.00276	    0.00274	    0.00272
                     18	  -0.00346	  -0.00262	  -0.00142	    0.00000	    0.00174	    0.00519	    0.00502
                     30	  -0.00194	  -0.00152	  -0.00188	  -0.00187	  -0.00213	  -0.00264	  -0.00291
                     60	  -0.00032	  -0.00058	  -0.00044	  -0.00031	  -0.00035	  -0.00044	  -0.00044
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              </tableData>
              <tableData breakPoint="0">
                               -7	        -5	        -2	         0	         2	         5	         7
                    -10	    0.00000	    0.00000	    0.00000	    0.00000	    0.00000	    0.00000	    0.00000
                      2	    0.00000	    0.00000	    0.00000	    0.00000	    0.00000	    0.00000	    0.00000
                     10	    0.00000	    0.00000	    0.00000	    0.00000	    0.00000	    0.00000	    0.00000
                     18	    0.00000	    0.00000	    0.00000	    0.00000	    0.00000	    0.00000	    0.00000
                     30	    0.00000	    0.00000	    0.00000	    0.00000	    0.00000	    0.00000	    0.00000
                     60	    0.00000	    0.00000	    0.00000	    0.00000	    0.00000	    0.00000	    0.00000
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              </tableData>
              <tableData breakPoint="5">
                               -7	        -5	        -2	         0	         2	         5	         7
                    -10	  -0.00249	  -0.00237	  -0.00225	  -0.00280	  -0.00290	  -0.00289	  -0.00287
                      2	  -0.00215	  -0.00219	  -0.00228	  -0.00234	  -0.00229	  -0.00241	  -0.00241
                     10	  -0.00276	  -0.00277	  -0.00281	  -0.00282	  -0.00277	  -0.00265	  -0.00255
                     18	    0.00313	    0.00312	    0.00243	    0.00147	    0.00006	  -0.00308	  -0.00864
                     30	    0.00236	    0.00220	    0.00207	    0.00174	    0.00185	    0.00208	    0.00209
                     60	    0.00039	    0.00038	    0.00030	    0.00026	    0.00037	    0.00046	  -0.00001
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              </tableData>
              <tableData breakPoint="10">
                               -7	        -5	        -2	         0	         2	         5	         7
                    -10	  -0.00477	  -0.00468	  -0.00478	  -0.00550	  -0.00569	  -0.00566	  -0.00536
                      2	  -0.00423	  -0.00437	  -0.00451	  -0.00464	  -0.00457	  -0.00482	  -0.00471
                     10	  -0.00490	  -0.00504	  -0.00554	  -0.00556	  -0.00550	  -0.00529	  -0.00475
                     18	    0.00591	    0.00563	    0.00490	    0.00362	    0.00139	  -0.00466	  -0.01263
                     30	    0.00421	    0.00420	    0.00382	    0.00316	    0.00325	    0.00398	    0.00401
                     60	    0.00074	    0.00058	    0.00058	    0.00046	    0.00060	    0.00079	    0.00030
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              </tableData>
              <tableData breakPoint="20">
                               -7	        -5	        -2	         0	         2	         5	         7
                    -10	  -0.00922	  -0.00859	  -0.00923	  -0.00998	  -0.01096	  -0.01069	  -0.01035
                      2	  -0.00812	  -0.00840	  -0.00854	  -0.00889	  -0.00872	  -0.00936	  -0.00920
                     10	  -0.00975	  -0.00979	  -0.01003	  -0.01010	  -0.01001	  -0.00969	  -0.00980
                     18	    0.01197	    0.01105	    0.01137	    0.00860	    0.00520	  -0.00300	  -0.01509
                     30	    0.00718	    0.00717	    0.00709	    0.00542	    0.00649	    0.00677	    0.00711
                     60	    0.00142	    0.00102	    0.00091	    0.00072	    0.00089	    0.00109	    0.00069
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              </tableData>
              <tableData breakPoint="25">
                               -7	        -5	        -2	         0	         2	         5	         7
                    -10	  -0.01077	  -0.01051	  -0.01088	  -0.01199	  -0.01300	  -0.01299	  -0.01258
                      2	  -0.00975	  -0.01012	  -0.01029	  -0.01070	  -0.01047	  -0.01126	  -0.01111
                     10	  -0.01149	  -0.01180	  -0.01214	  -0.01215	  -0.01205	  -0.01210	  -0.01149
                     18	    0.01529	    0.01264	    0.01326	    0.00994	    0.00718	  -0.00139	  -0.01453
                     30	    0.00829	    0.00759	    0.00814	    0.00634	    0.00750	    0.00774	    0.00822
                     60	    0.00153	    0.00124	    0.00099	    0.00077	    0.00098	    0.00118	    0.00077
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              </tableData>
          </table>
       </product>
    </function>
    <function name="aero/c/CMLDRD">
    <description>ROLLING MOMENT DUE TO RUDDER DEFLECTION</description>
    <product>
          <table>
            <independentVar lookup="row">aero/alpha-deg</independentVar>
            <independentVar lookup="column">aero/beta-deg</independentVar>
            <independentVar lookup="table">fcs/rudder-pos-deg</independentVar>
              <tableData breakPoint="-25">
                               -7	        -5	        -2	         0	         2	         5	         7
                    -10	    0.01041	    0.00950	    0.00913	    0.00875	    0.00857	    0.00885	    0.00970
                      2	    0.00898	    0.00871	    0.00782	    0.00747	    0.00771	    0.00833	    0.00879
                     10	    0.00540	    0.00505	    0.00452	    0.00437	    0.00416	    0.00441	    0.00514
                     18	    0.00120	    0.00464	    0.00582	    0.00143	    0.00554	    0.00414	  -0.00055
                     30	    0.00481	    0.00397	    0.00390	    0.00187	    0.00370	    0.00403	    0.00429
                     60	    0.00057	    0.00056	    0.00030	    0.00000	    0.00033	    0.00082	    0.00069
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              </tableData>
              <tableData breakPoint="0">
                               -7	        -5	        -2	         0	         2	         5	         7
                    -10	    0.00000	    0.00000	    0.00000	    0.00000	    0.00000	    0.00000	    0.00000
                      2	    0.00000	    0.00000	    0.00000	    0.00000	    0.00000	    0.00000	    0.00000
                     10	    0.00000	    0.00000	    0.00000	    0.00000	    0.00000	    0.00000	    0.00000
                     18	    0.00000	    0.00000	    0.00000	    0.00000	    0.00000	    0.00000	    0.00000
                     30	    0.00000	    0.00000	    0.00000	    0.00000	    0.00000	    0.00000	    0.00000
                     60	    0.00000	    0.00000	    0.00000	    0.00000	    0.00000	    0.00000	    0.00000
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              </tableData>
              <tableData breakPoint="25">
                               -7	        -5	        -2	         0	         2	         5	         7
                    -10	  -0.00970	  -0.00885	  -0.00857	  -0.00875	  -0.00913	  -0.00950	  -0.01041
                      2	  -0.00879	  -0.00833	  -0.00771	  -0.00747	  -0.00782	  -0.00871	  -0.00898
                     10	  -0.00514	  -0.00441	  -0.00416	  -0.00437	  -0.00452	  -0.00505	  -0.00540
                     18	    0.00055	  -0.00414	  -0.00554	  -0.00143	  -0.00582	  -0.00464	  -0.00120
                     30	  -0.00429	  -0.00403	  -0.00370	  -0.00187	  -0.00390	  -0.00397	  -0.00481
                     60	  -0.00069	  -0.00082	  -0.00033	    0.00000	  -0.00030	  -0.00056	  -0.00057
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              </tableData>
          </table>
       </product>
    </function>
    <function name="aero/c/CMLDSBL">
    <description>ROLLING MOMENT DUE TO LOWER SPEEDBRAKE DEFLECTION</description>
    <product>
          <property>fcs/airbrake-upper</property>
          <table>
            <independentVar lookup="row">aero/alpha-deg</independentVar>
            <tableData>
                    -10		    0.00307
                     -5		    0.00178
                      4		  -0.00010
                     12		    0.01086
                     20		    0.00622
                     35		    0.00445
                     60		    0.00192
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            </tableData>
          </table>
       </product>
    </function>
    <function name="aero/c/CMLDSBU">
    <description>ROLLING MOMENT DUE TO UPPER SPEEDBRAKE DEFLECTION</description>
    <product>
          <property>fcs/airbrake-lower</property>
          <table>
            <independentVar lookup="row">aero/alpha-deg</independentVar>
            <tableData>
                    -10		    0.00031
                     -5		    0.00007
                      4		    0.00019
                     12		  -0.00010
                     20		  -0.00370
                     35		  -0.00220
                     60		  -0.00065
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            </tableData>
          </table>
       </product>
    </function>
    <function name="aero/c/CMLDSD1L">
    <description>ROLLING MOMENT DUE TO LE SLAT 1L DEFLECTION</description>
    <product>
          <property>fcs/slat-1L-pos-deg</property>
          <table>
            <independentVar lookup="row">aero/alpha-deg</independentVar>
            <tableData>
                    -10		  -0.00173
                     -5		  -0.00061
                      4		  -0.00057
                     12		  -0.00297
                     20		  -0.00013
                     35		    0.00029
                     60		    0.00032
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            </tableData>
          </table>
       </product>
    </function>
    <function name="aero/c/CMLDSD1R">
    <description>ROLLING MOMENT DUE TO LE SLAT 1R DEFLECTION</description>
    <product>
          <property>fcs/slat-1R-pos-deg</property>
          <table>
            <independentVar lookup="row">aero/alpha-deg</independentVar>
            <tableData>
                    -10		    0.00173
                     -5		    0.00061
                      4		    0.00057
                     12		    0.00297
                     20		    0.00013
                     35		  -0.00029
                     60		  -0.00032
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            </tableData>
          </table>
       </product>
    </function>
    <function name="aero/c/CMLDSD2L">
    <description>ROLLING MOMENT DUE TO LE SLAT 2L DEFLECTION</description>
    <product>
          <property>fcs/slat-2L-pos-deg</property>
          <table>
            <independentVar lookup="row">aero/alpha-deg</independentVar>
            <tableData>
                    -10		  -0.00541
                     -5		  -0.00268
                      4		  -0.00246
                     12		  -0.00731
                     20		  -0.00559
                     35		  -0.00405
                     60		  -0.00345
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            </tableData>
          </table>
       </product>
    </function>
    <function name="aero/c/CMLDSD2R">
    <description>ROLLING MOMENT DUE TO LE SLAT 2R DEFLECTION</description>
    <product>
          <property>fcs/slat-2R-pos-deg</property>
          <table>
            <independentVar lookup="row">aero/alpha-deg</independentVar>
            <tableData>
                    -10		    0.00541
                     -5		    0.00268
                      4		    0.00246
                     12		    0.00731
                     20		    0.00559
                     35		    0.00405
                     60		    0.00345
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            </tableData>
          </table>
       </product>
    </function>
    <function name="aero/c/CMLGEAR">
    <description>ROLLING MOMENT INCREMENT DUE TO GEAR</description>
    <product>
          <property>gear/gear-pos-norm</property>
          <table>
            <independentVar lookup="row">aero/alpha-deg</independentVar>
            <tableData>
                    -10		    0.00000
                     -5		    0.00000
                      2		    0.00000
                      8		   0.00000
                     14		  -0.00013
                     20		    0.00024
                     30		  -0.00028
                     40		  -0.00035
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            </tableData>
          </table>
       </product>
    </function>
    <function name="aero/c/CMLmnw">
    <description>ROLL DUE TO MACH</description>
    <product>
          <table>
            <independentVar lookup="row">velocities/mach</independentVar>
            <independentVar lookup="column">aero/alpha-deg</independentVar>
            <tableData>
                                -10	         -1	       0.01	          1	         10
                    0.2	    0.00000	    0.00000	    0.00000	    0.00000	    0.00000
                    0.8	    0.00000	    0.00000	    0.00000	    0.00000	    0.00000
                   0.99	    0.00000	    0.00000	    0.00000	    0.00000	    0.00000
                    1.4	    0.00000	    0.00005	    0.00000	    0.00021	  -0.00064
                    1.8	    0.00000	  -0.00003	    0.00000	    0.00000	    0.00012
                    2.5	  -0.00003	    0.00002	    0.00001	  -0.00002	    0.00028
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            </tableData>
          </table>
       </product>
    </function>
    <function name="aero/c/CMLP">
    <description>ROLL DAMPING DERIVATIVE</description>
    <product>
          <property>aero/pb</property>
          <table>
            <independentVar lookup="row">aero/alpha-deg</independentVar>
            <tableData>
                    -10		  -0.46408
                     -5		  -0.32757
                      4		  -0.30639
                     12		  -0.49369
                     20		  -0.12745
                     35		  -0.06921
                     60		  -0.10619
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            </tableData>
          </table>
       </product>
    </function>
    <function name="aero/c/CMLR">
    <description>ROLLING MOMENT DUE TO YAW RATE</description>
    <product>
          <property>aero/rb</property>
          <table>
            <independentVar lookup="row">aero/alpha-deg</independentVar>
            <tableData>
                    -10		  -0.06101
                     -5		    0.00703
                      4		    0.05999
                     12		    0.14325
                     20		    0.28393
                     35		    0.16463
                     60		    0.03095
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            </tableData>
          </table>
       </product>
    </function>
    <function name="aero/c/CFYB">
    <description>BASIC SIDE FORCE</description>
    <product>
          <table>
            <independentVar lookup="row">aero/alpha-deg</independentVar>
            <independentVar lookup="column">aero/beta-deg</independentVar>
            <tableData>
                                 -7	         -5	         -2	          0	          2	          5	          7
                    -10	    0.04538	    0.02766	    0.01079	    0.00000	  -0.01079	  -0.02766	  -0.04538
                      2	    0.04400	    0.03033	    0.01194	    0.00000	  -0.01194	  -0.03033	  -0.04400
                     10	    0.03446	    0.02066	    0.00811	    0.00000	  -0.00811	  -0.02066	  -0.03446
                     18	    0.00649	  -0.00119	  -0.00481	    0.00000	    0.00481	    0.00119	  -0.00649
                     30	  -0.03778	  -0.03052	  -0.01421	    0.00000	    0.01421	    0.03052	    0.03778
                     60	  -0.13016	  -0.09230	  -0.03572	    0.00000	    0.03572	    0.09230	    0.13016
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            </tableData>
          </table>
       </product>
    </function>
    <function name="aero/c/CFYDED1L">
    <description>SIDE FORCE DUE TO ELEVON 1L DEFLECTION</description>
    <product>
          <table>
            <independentVar lookup="row">aero/alpha-deg</independentVar>
            <independentVar lookup="column">aero/beta-deg</independentVar>
            <independentVar lookup="table">fcs/elevon-1L-pos-deg</independentVar>
              <tableData breakPoint="-16">
                               -7	        -5	        -2	         0	         2	         5	         7
                    -10	  -0.02151	  -0.02061	  -0.01943	  -0.01793	  -0.01704	  -0.01565	  -0.01327
                      2	  -0.00553	  -0.00426	  -0.00401	  -0.00456	  -0.00316	  -0.00289	  -0.00308
                     10	    0.00593	    0.00509	    0.00426	    0.00373	    0.00298	    0.00195	  -0.00060
                     18	    0.00946	    0.00930	    0.00983	    0.00503	    0.00317	    0.00195	    0.00248
                     30	    0.00338	    0.00489	    0.00709	    0.00761	    0.00776	    0.00877	    0.00680
                     60	    0.00132	    0.00173	    0.00212	    0.00210	    0.00279	    0.00380	    0.00382
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              </tableData>
              <tableData breakPoint="-10">
                               -7	        -5	        -2	         0	         2	         5	         7
                    -10	  -0.01432	  -0.01313	  -0.01241	  -0.01149	  -0.01098	  -0.01009	  -0.00788
                      2	  -0.00319	  -0.00236	  -0.00216	  -0.00270	  -0.00190	  -0.00181	  -0.00184
                     10	    0.00421	    0.00335	    0.00284	    0.00246	    0.00193	    0.00124	    0.00022
                     18	    0.00582	    0.00564	    0.00658	    0.00484	    0.00217	  -0.00022	    0.00196
                     30	    0.00206	    0.00260	    0.00413	    0.00476	    0.00450	    0.00592	    0.00438
                     60	    0.00076	    0.00102	    0.00125	    0.00123	    0.00163	    0.00275	    0.00224
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              </tableData>
              <tableData breakPoint="-5">
                               -7	        -5	        -2	         0	         2	         5	         7
                    -10	  -0.00651	  -0.00658	  -0.00624	  -0.00579	  -0.00556	  -0.00512	  -0.00514
                      2	  -0.00143	  -0.00102	  -0.00087	  -0.00126	  -0.00093	  -0.00092	  -0.00100
                     10	    0.00169	    0.00177	    0.00149	    0.00127	    0.00099	    0.00063	    0.00012
                     18	    0.00455	    0.00328	    0.00394	    0.00326	    0.00252	    0.00087	    0.00037
                     30	    0.00074	    0.00111	    0.00191	    0.00235	    0.00237	    0.00307	    0.00214
                     60	    0.00034	    0.00048	    0.00058	    0.00057	    0.00076	    0.00164	    0.00105
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              </tableData>
              <tableData breakPoint="0">
                               -7	        -5	        -2	         0	         2	         5	         7
                    -10	    0.00000	    0.00000	    0.00000	    0.00000	    0.00000	    0.00000	    0.00000
                      2	    0.00000	    0.00000	    0.00000	    0.00000	    0.00000	    0.00000	    0.00000
                     10	    0.00000	    0.00000	    0.00000	    0.00000	    0.00000	    0.00000	    0.00000
                     18	    0.00000	    0.00000	    0.00000	    0.00000	    0.00000	    0.00000	    0.00000
                     30	    0.00000	    0.00000	    0.00000	    0.00000	    0.00000	    0.00000	    0.00000
                     60	    0.00000	    0.00000	    0.00000	    0.00000	    0.00000	    0.00000	    0.00000
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              </tableData>
              <tableData breakPoint="5">
                               -7	        -5	        -2	         0	         2	         5	         7
                    -10	    0.00604	    0.00640	    0.00610	    0.00570	    0.00553	    0.00512	    0.00514
                      2	    0.00057	    0.00072	    0.00033	    0.00108	    0.00132	    0.00091	    0.00115
                     10	  -0.00186	  -0.00190	  -0.00161	  -0.00136	  -0.00104	  -0.00065	  -0.00015
                     18	  -0.00411	  -0.00299	  -0.00349	  -0.00331	  -0.00353	  -0.00066	    0.00100
                     30	  -0.00060	  -0.00101	  -0.00172	  -0.00210	  -0.00207	  -0.00206	  -0.00213
                     60	  -0.00033	  -0.00040	  -0.00049	  -0.00047	  -0.00062	  -0.00077	  -0.00083
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              </tableData>
              <tableData breakPoint="10">
                               -7	        -5	        -2	         0	         2	         5	         7
                    -10	    0.01178	    0.01253	    0.01193	    0.01119	    0.01089	    0.01010	    0.01018
                      2	    0.00111	    0.00117	    0.00098	    0.00196	    0.00208	    0.00186	    0.00279
                     10	  -0.00384	  -0.00390	  -0.00328	  -0.00276	  -0.00217	  -0.00128	  -0.00032
                     18	  -0.00636	  -0.00534	  -0.00647	  -0.00747	  -0.00627	  -0.00215	    0.00026
                     30	  -0.00101	  -0.00179	  -0.00319	  -0.00389	  -0.00401	  -0.00352	  -0.00400
                     60	  -0.00057	  -0.00071	  -0.00083	  -0.00083	  -0.00113	  -0.00135	  -0.00141
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              </tableData>
              <tableData breakPoint="20">
                               -7	        -5	        -2	         0	         2	         5	         7
                    -10	    0.02250	    0.02321	    0.02149	    0.02087	    0.02047	    0.01879	    0.01866
                      2	    0.00135	    0.00155	    0.00128	    0.00314	    0.00327	    0.00351	    0.00517
                     10	  -0.00780	  -0.00785	  -0.00652	  -0.00550	  -0.00420	  -0.00259	  -0.00058
                     18	  -0.01008	  -0.00954	  -0.01252	  -0.01219	  -0.01154	  -0.00686	  -0.00189
                     30	  -0.00147	  -0.00290	  -0.00483	  -0.00628	  -0.00705	  -0.00642	  -0.00705
                     60	  -0.00087	  -0.00110	  -0.00129	  -0.00125	  -0.00165	  -0.00197	  -0.00310
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              </tableData>
              <tableData breakPoint="25">
                               -7	        -5	        -2	         0	         2	         5	         7
                    -10	    0.02722	    0.02887	    0.02559	    0.02482	    0.02438	    0.02271	    0.02263
                      2	    0.00121	    0.00153	    0.00132	    0.00347	    0.00359	    0.00409	    0.00617
                     10	  -0.00961	  -0.00948	  -0.00796	  -0.00669	  -0.00508	  -0.00310	  -0.00075
                     18	  -0.01163	  -0.01165	  -0.01297	  -0.01546	  -0.01460	  -0.00870	  -0.00306
                     30	  -0.00159	  -0.00326	  -0.00554	  -0.00721	  -0.00824	  -0.00745	  -0.00808
                     60	  -0.00094	  -0.00118	  -0.00138	  -0.00133	  -0.00174	  -0.00206	  -0.00318
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              </tableData>
          </table>
       </product>
    </function>
    <function name="aero/c/CFYDED1R">
    <description>SIDE FORCE DUE TO ELEVON 1R DEFLECTION</description>
    <product>
          <table>
            <independentVar lookup="row">aero/alpha-deg</independentVar>
            <independentVar lookup="column">aero/beta-deg</independentVar>
            <independentVar lookup="table">fcs/elevon-1R-pos-deg</independentVar>
              <tableData breakPoint="-16">
                               -7	        -5	        -2	         0	         2	         5	         7
                    -10	    0.02151	    0.02061	    0.01943	    0.01793	    0.01704	    0.01565	    0.01327
                      2	    0.00553	    0.00426	    0.00401	    0.00456	    0.00316	    0.00289	    0.00308
                     10	  -0.00593	  -0.00509	  -0.00426	  -0.00373	  -0.00298	  -0.00195	    0.00060
                     18	  -0.00946	  -0.00930	  -0.00983	  -0.00503	  -0.00317	  -0.00195	  -0.00248
                     30	  -0.00338	  -0.00489	  -0.00709	  -0.00761	  -0.00776	  -0.00877	  -0.00680
                     60	  -0.00132	  -0.00173	  -0.00212	  -0.00210	  -0.00279	  -0.00380	  -0.00382
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              </tableData>
              <tableData breakPoint="-10">
                               -7	        -5	        -2	         0	         2	         5	         7
                    -10	    0.01432	    0.01313	    0.01241	    0.01149	    0.01098	    0.01009	    0.00788
                      2	    0.00319	    0.00236	    0.00216	    0.00270	    0.00190	    0.00181	    0.00184
                     10	  -0.00421	  -0.00335	  -0.00284	  -0.00246	  -0.00193	  -0.00124	  -0.00022
                     18	  -0.00582	  -0.00564	  -0.00658	  -0.00484	  -0.00217	    0.00022	  -0.00196
                     30	  -0.00206	  -0.00260	  -0.00413	  -0.00476	  -0.00450	  -0.00592	  -0.00438
                     60	  -0.00076	  -0.00102	  -0.00125	  -0.00123	  -0.00163	  -0.00275	  -0.00224
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              </tableData>
              <tableData breakPoint="-5">
                               -7	        -5	        -2	         0	         2	         5	         7
                    -10	    0.00651	    0.00658	    0.00624	    0.00579	    0.00556	    0.00512	    0.00514
                      2	    0.00143	    0.00102	    0.00087	    0.00126	    0.00093	    0.00092	    0.00100
                     10	  -0.00169	  -0.00177	  -0.00149	  -0.00127	  -0.00099	  -0.00063	  -0.00012
                     18	  -0.00455	  -0.00328	  -0.00394	  -0.00326	  -0.00252	  -0.00087	  -0.00037
                     30	  -0.00074	  -0.00111	  -0.00191	  -0.00235	  -0.00237	  -0.00307	  -0.00214
                     60	  -0.00034	  -0.00048	  -0.00058	  -0.00057	  -0.00076	  -0.00164	  -0.00105
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              </tableData>
              <tableData breakPoint="0">
                               -7	        -5	        -2	         0	         2	         5	         7
                    -10	    0.00000	    0.00000	    0.00000	    0.00000	    0.00000	    0.00000	    0.00000
                      2	    0.00000	    0.00000	    0.00000	    0.00000	    0.00000	    0.00000	    0.00000
                     10	    0.00000	    0.00000	    0.00000	    0.00000	    0.00000	    0.00000	    0.00000
                     18	    0.00000	    0.00000	    0.00000	    0.00000	    0.00000	    0.00000	    0.00000
                     30	    0.00000	    0.00000	    0.00000	    0.00000	    0.00000	    0.00000	    0.00000
                     60	    0.00000	    0.00000	    0.00000	    0.00000	    0.00000	    0.00000	    0.00000
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              </tableData>
              <tableData breakPoint="5">
                               -7	        -5	        -2	         0	         2	         5	         7
                    -10	  -0.00604	  -0.00640	  -0.00610	  -0.00570	  -0.00553	  -0.00512	  -0.00514
                      2	  -0.00057	  -0.00072	  -0.00033	  -0.00108	  -0.00132	  -0.00091	  -0.00115
                     10	    0.00186	    0.00190	    0.00161	    0.00136	    0.00104	    0.00065	    0.00015
                     18	    0.00411	    0.00299	    0.00349	    0.00331	    0.00353	    0.00066	  -0.00100
                     30	    0.00060	    0.00101	    0.00172	    0.00210	    0.00207	    0.00206	    0.00213
                     60	    0.00033	    0.00040	    0.00049	    0.00047	    0.00062	    0.00077	    0.00083
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              </tableData>
              <tableData breakPoint="10">
                               -7	        -5	        -2	         0	         2	         5	         7
                    -10	  -0.01178	  -0.01253	  -0.01193	  -0.01119	  -0.01089	  -0.01010	  -0.01018
                      2	  -0.00111	  -0.00117	  -0.00098	  -0.00196	  -0.00208	  -0.00186	  -0.00279
                     10	    0.00384	    0.00390	    0.00328	    0.00276	    0.00217	    0.00128	    0.00032
                     18	    0.00636	    0.00534	    0.00647	    0.00747	    0.00627	    0.00215	  -0.00026
                     30	    0.00101	    0.00179	    0.00319	    0.00389	    0.00401	    0.00352	    0.00400
                     60	    0.00057	    0.00071	    0.00083	    0.00083	    0.00113	    0.00135	    0.00141
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              </tableData>
              <tableData breakPoint="20">
                               -7	        -5	        -2	         0	         2	         5	         7
                    -10	  -0.02250	  -0.02321	  -0.02149	  -0.02087	  -0.02047	  -0.01879	  -0.01866
                      2	  -0.00135	  -0.00155	  -0.00128	  -0.00314	  -0.00327	  -0.00351	  -0.00517
                     10	    0.00780	    0.00785	    0.00652	    0.00550	    0.00420	    0.00259	    0.00058
                     18	    0.01008	    0.00954	    0.01252	    0.01219	    0.01154	    0.00686	    0.00189
                     30	    0.00147	    0.00290	    0.00483	    0.00628	    0.00705	    0.00642	    0.00705
                     60	    0.00087	    0.00110	    0.00129	    0.00125	    0.00165	    0.00197	    0.00310
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              </tableData>
              <tableData breakPoint="25">
                               -7	        -5	        -2	         0	         2	         5	         7
                    -10	  -0.02722	  -0.02887	  -0.02559	  -0.02482	  -0.02438	  -0.02271	  -0.02263
                      2	  -0.00121	  -0.00153	  -0.00132	  -0.00347	  -0.00359	  -0.00409	  -0.00617
                     10	    0.00961	    0.00948	    0.00796	    0.00669	    0.00508	    0.00310	    0.00075
                     18	    0.01163	    0.01165	    0.01297	    0.01546	    0.01460	    0.00870	    0.00306
                     30	    0.00159	    0.00326	    0.00554	    0.00721	    0.00824	    0.00745	    0.00808
                     60	    0.00094	    0.00118	    0.00138	    0.00133	    0.00174	    0.00206	    0.00318
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              </tableData>
          </table>
       </product>
    </function>
    <function name="aero/c/CFYDED2L">
    <description>SIDE FORCE DUE TO ELEVON 2L DEFLECTION</description>
    <product>
          <table>
            <independentVar lookup="row">aero/alpha-deg</independentVar>
            <independentVar lookup="column">aero/beta-deg</independentVar>
            <independentVar lookup="table">fcs/elevon-2L-pos-deg</independentVar>
              <tableData breakPoint="-16">
                               -7	        -5	        -2	         0	         2	         5	         7
                    -10	  -0.02062	  -0.01488	  -0.01362	  -0.01243	  -0.01220	  -0.01140	  -0.00907
                      2	  -0.00637	  -0.00477	  -0.00521	  -0.00561	  -0.00356	  -0.00213	  -0.00163
                     10	  -0.00172	  -0.00143	  -0.00169	  -0.00165	  -0.00136	  -0.00095	  -0.00181
                     18	    0.00106	    0.00134	    0.00225	    0.00096	  -0.00263	  -0.00279	  -0.00140
                     30	  -0.00003	  -0.00004	    0.00287	    0.00361	    0.00341	    0.00343	    0.00209
                     60	    0.00104	    0.00042	    0.00068	    0.00045	    0.00088	    0.00127	    0.00094
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              </tableData>
              <tableData breakPoint="-10">
                               -7	        -5	        -2	         0	         2	         5	         7
                    -10	  -0.01400	  -0.00964	  -0.00879	  -0.00807	  -0.00797	  -0.00740	  -0.00524
                      2	  -0.00406	  -0.00326	  -0.00320	  -0.00358	  -0.00237	  -0.00149	  -0.00106
                     10	  -0.00078	  -0.00087	  -0.00102	  -0.00110	  -0.00091	  -0.00058	  -0.00085
                     18	    0.00124	    0.00041	    0.00245	    0.00117	  -0.00137	  -0.00362	  -0.00047
                     30	    0.00030	    0.00017	    0.00181	    0.00053	    0.00197	    0.00200	    0.00298
                     60	    0.00121	    0.00033	    0.00049	    0.00023	    0.00047	    0.00061	    0.00033
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              </tableData>
              <tableData breakPoint="-5">
                               -7	        -5	        -2	         0	         2	         5	         7
                    -10	  -0.00626	  -0.00497	  -0.00447	  -0.00410	  -0.00409	  -0.00378	  -0.00379
                      2	  -0.00197	  -0.00188	  -0.00168	  -0.00178	  -0.00123	  -0.00082	  -0.00059
                     10	  -0.00083	  -0.00043	  -0.00050	  -0.00057	  -0.00048	  -0.00031	  -0.00034
                     18	    0.00158	    0.00157	    0.00161	    0.00110	    0.00056	  -0.00151	  -0.00100
                     30	  -0.00039	    0.00035	    0.00074	    0.00093	    0.00122	    0.00085	    0.00015
                     60	    0.00136	    0.00031	    0.00035	    0.00009	    0.00015	    0.00011	  -0.00007
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              </tableData>
              <tableData breakPoint="0">
                               -7	        -5	        -2	         0	         2	         5	         7
                    -10	    0.00000	    0.00000	    0.00000	    0.00000	    0.00000	    0.00000	    0.00000
                      2	    0.00000	    0.00000	    0.00000	    0.00000	    0.00000	    0.00000	    0.00000
                     10	    0.00000	    0.00000	    0.00000	    0.00000	    0.00000	    0.00000	    0.00000
                     18	    0.00000	    0.00000	    0.00000	    0.00000	    0.00000	    0.00000	    0.00000
                     30	    0.00000	    0.00000	    0.00000	    0.00000	    0.00000	    0.00000	    0.00000
                     60	    0.00000	    0.00000	    0.00000	    0.00000	    0.00000	    0.00000	    0.00000
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              </tableData>
              <tableData breakPoint="5">
                               -7	        -5	        -2	         0	         2	         5	         7
                    -10	    0.00620	    0.00521	    0.00444	    0.00411	    0.00417	    0.00383	    0.00365
                      2	    0.00162	    0.00155	    0.00105	    0.00181	    0.00186	    0.00089	    0.00058
                     10	    0.00072	    0.00028	    0.00048	    0.00057	    0.00056	    0.00043	    0.00048
                     18	  -0.00015	  -0.00073	  -0.00144	  -0.00124	  -0.00145	    0.00089	    0.00246
                     30	    0.00068	    0.00017	  -0.00025	  -0.00082	  -0.00102	  -0.00070	  -0.00134
                     60	    0.00062	    0.00033	    0.00005	  -0.00006	  -0.00046	  -0.00063	  -0.00261
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              </tableData>
              <tableData breakPoint="10">
                               -7	        -5	        -2	         0	         2	         5	         7
                    -10	    0.01211	    0.01037	    0.00876	    0.00816	    0.00827	    0.00763	    0.00739
                      2	    0.00347	    0.00302	    0.00261	    0.00354	    0.00328	    0.00193	    0.00211
                     10	    0.00131	    0.00048	    0.00092	    0.00111	    0.00114	    0.00084	    0.00089
                     18	    0.00027	  -0.00081	  -0.00223	  -0.00366	  -0.00229	    0.00191	    0.00381
                     30	    0.00128	    0.00159	  -0.00065	  -0.00074	  -0.00227	  -0.00169	  -0.00233
                     60	    0.00078	  -0.00030	    0.00005	  -0.00010	  -0.00070	  -0.00089	  -0.00284
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              </tableData>
              <tableData breakPoint="20">
                               -7	        -5	        -2	         0	         2	         5	         7
                    -10	    0.02233	    0.01987	    0.01646	    0.01529	    0.01567	    0.01469	    0.01394
                      2	    0.00673	    0.00546	    0.00484	    0.00666	    0.00609	    0.00405	    0.00430
                     10	    0.00265	    0.00094	    0.00156	    0.00197	    0.00218	    0.00150	    0.00222
                     18	  -0.00082	  -0.00227	  -0.00547	  -0.00751	  -0.00461	    0.00005	    0.00439
                     30	    0.00242	    0.00236	    0.00148	  -0.00093	  -0.00357	  -0.00306	  -0.00378
                     60	    0.00182	  -0.00024	    0.00004	  -0.00015	  -0.00087	  -0.00152	  -0.00311
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              </tableData>
              <tableData breakPoint="25">
                               -7	        -5	        -2	         0	         2	         5	         7
                    -10	    0.02697	    0.02508	    0.01970	    0.01831	    0.01877	    0.01719	    0.01713
                      2	    0.00788	    0.00650	    0.00585	    0.00796	    0.00732	    0.00521	    0.00537
                     10	    0.00257	    0.00110	    0.00192	    0.00236	    0.00268	    0.00200	    0.00279
                     18	  -0.00201	  -0.00273	  -0.00659	  -0.00767	  -0.00614	  -0.00084	    0.00432
                     30	    0.00274	    0.00315	    0.00150	  -0.00104	  -0.00397	  -0.00366	  -0.00399
                     60	    0.00188	    0.00018	    0.00003	  -0.00015	  -0.00088	  -0.00158	  -0.00319
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              </tableData>
          </table>
       </product>
    </function>
    <function name="aero/c/CFYDED2R">
    <description>SIDE FORCE DUE TO ELEVON 2R DEFLECTION</description>
    <product>
          <table>
            <independentVar lookup="row">aero/alpha-deg</independentVar>
            <independentVar lookup="column">aero/beta-deg</independentVar>
            <independentVar lookup="table">fcs/elevon-2R-pos-deg</independentVar>
              <tableData breakPoint="-16">
                               -7	        -5	        -2	         0	         2	         5	         7
                    -10	    0.02062	    0.01488	    0.01362	    0.01243	    0.01220	    0.01140	    0.00907
                      2	    0.00637	    0.00477	    0.00521	    0.00561	    0.00356	    0.00213	    0.00163
                     10	    0.00172	    0.00143	    0.00169	    0.00165	    0.00136	    0.00095	    0.00181
                     18	  -0.00106	  -0.00134	  -0.00225	  -0.00096	    0.00263	    0.00279	    0.00140
                     30	    0.00003	    0.00004	  -0.00287	  -0.00361	  -0.00341	  -0.00343	  -0.00209
                     60	  -0.00104	  -0.00042	  -0.00068	  -0.00045	  -0.00088	  -0.00127	  -0.00094
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              </tableData>
              <tableData breakPoint="-10">
                               -7	        -5	        -2	         0	         2	         5	         7
                    -10	    0.01400	    0.00964	    0.00879	    0.00807	    0.00797	    0.00740	    0.00524
                      2	    0.00406	    0.00326	    0.00320	    0.00358	    0.00237	    0.00149	    0.00106
                     10	    0.00078	    0.00087	    0.00102	    0.00110	    0.00091	    0.00058	    0.00085
                     18	  -0.00124	  -0.00041	  -0.00245	  -0.00117	    0.00137	    0.00362	    0.00047
                     30	  -0.00030	  -0.00017	  -0.00181	  -0.00053	  -0.00197	  -0.00200	  -0.00298
                     60	  -0.00121	  -0.00033	  -0.00049	  -0.00023	  -0.00047	  -0.00061	  -0.00033
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              </tableData>
              <tableData breakPoint="-5">
                               -7	        -5	        -2	         0	         2	         5	         7
                    -10	    0.00626	    0.00497	    0.00447	    0.00410	    0.00409	    0.00378	    0.00379
                      2	    0.00197	    0.00188	    0.00168	    0.00178	    0.00123	    0.00082	    0.00059
                     10	    0.00083	    0.00043	    0.00050	    0.00057	    0.00048	    0.00031	    0.00034
                     18	  -0.00158	  -0.00157	  -0.00161	  -0.00110	  -0.00056	    0.00151	    0.00100
                     30	    0.00039	  -0.00035	  -0.00074	  -0.00093	  -0.00122	  -0.00085	  -0.00015
                     60	  -0.00136	  -0.00031	  -0.00035	  -0.00009	  -0.00015	  -0.00011	    0.00007
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              </tableData>
              <tableData breakPoint="0">
                               -7	        -5	        -2	         0	         2	         5	         7
                    -10	    0.00000	    0.00000	    0.00000	    0.00000	    0.00000	    0.00000	    0.00000
                      2	    0.00000	    0.00000	    0.00000	    0.00000	    0.00000	    0.00000	    0.00000
                     10	    0.00000	    0.00000	    0.00000	    0.00000	    0.00000	    0.00000	    0.00000
                     18	    0.00000	    0.00000	    0.00000	    0.00000	    0.00000	    0.00000	    0.00000
                     30	    0.00000	    0.00000	    0.00000	    0.00000	    0.00000	    0.00000	    0.00000
                     60	    0.00000	    0.00000	    0.00000	    0.00000	    0.00000	    0.00000	    0.00000
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              </tableData>
              <tableData breakPoint="5">
                               -7	        -5	        -2	         0	         2	         5	         7
                    -10	  -0.00620	  -0.00521	  -0.00444	  -0.00411	  -0.00417	  -0.00383	  -0.00365
                      2	  -0.00162	  -0.00155	  -0.00105	  -0.00181	  -0.00186	  -0.00089	  -0.00058
                     10	  -0.00072	  -0.00028	  -0.00048	  -0.00057	  -0.00056	  -0.00043	  -0.00048
                     18	    0.00015	    0.00073	    0.00144	    0.00124	    0.00145	  -0.00089	  -0.00246
                     30	  -0.00068	  -0.00017	    0.00025	    0.00082	    0.00102	    0.00070	    0.00134
                     60	  -0.00062	  -0.00033	  -0.00005	    0.00006	    0.00046	    0.00063	    0.00261
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              </tableData>
              <tableData breakPoint="10">
                               -7	        -5	        -2	         0	         2	         5	         7
                    -10	  -0.01211	  -0.01037	  -0.00876	  -0.00816	  -0.00827	  -0.00763	  -0.00739
                      2	  -0.00347	  -0.00302	  -0.00261	  -0.00354	  -0.00328	  -0.00193	  -0.00211
                     10	  -0.00131	  -0.00048	  -0.00092	  -0.00111	  -0.00114	  -0.00084	  -0.00089
                     18	  -0.00027	    0.00081	    0.00223	    0.00366	    0.00229	  -0.00191	  -0.00381
                     30	  -0.00128	  -0.00159	    0.00065	    0.00074	    0.00227	    0.00169	    0.00233
                     60	  -0.00078	    0.00030	  -0.00005	    0.00010	    0.00070	    0.00089	    0.00284
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              </tableData>
              <tableData breakPoint="20">
                               -7	        -5	        -2	         0	         2	         5	         7
                    -10	  -0.02233	  -0.01987	  -0.01646	  -0.01529	  -0.01567	  -0.01469	  -0.01394
                      2	  -0.00673	  -0.00546	  -0.00484	  -0.00666	  -0.00609	  -0.00405	  -0.00430
                     10	  -0.00265	  -0.00094	  -0.00156	  -0.00197	  -0.00218	  -0.00150	  -0.00222
                     18	    0.00082	    0.00227	    0.00547	    0.00751	    0.00461	  -0.00005	  -0.00439
                     30	  -0.00242	  -0.00236	  -0.00148	    0.00093	    0.00357	    0.00306	    0.00378
                     60	  -0.00182	    0.00024	  -0.00004	    0.00015	    0.00087	    0.00152	    0.00311
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              </tableData>
              <tableData breakPoint="25">
                               -7	        -5	        -2	         0	         2	         5	         7
                    -10	  -0.02697	  -0.02508	  -0.01970	  -0.01831	  -0.01877	  -0.01719	  -0.01713
                      2	  -0.00788	  -0.00650	  -0.00585	  -0.00796	  -0.00732	  -0.00521	  -0.00537
                     10	  -0.00257	  -0.00110	  -0.00192	  -0.00236	  -0.00268	  -0.00200	  -0.00279
                     18	    0.00201	    0.00273	    0.00659	    0.00767	    0.00614	    0.00084	  -0.00432
                     30	  -0.00274	  -0.00315	  -0.00150	    0.00104	    0.00397	    0.00366	    0.00399
                     60	  -0.00188	  -0.00018	  -0.00003	    0.00015	    0.00088	    0.00158	    0.00319
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              </tableData>
          </table>
       </product>
    </function>
    <function name="aero/c/CFYDRD">
    <description>SIDE FORCE DUE TO RUDDER DEFLECTION</description>
    <product>
          <table>
            <independentVar lookup="row">aero/alpha-deg</independentVar>
            <independentVar lookup="column">aero/beta-deg</independentVar>
            <independentVar lookup="table">fcs/rudder-pos-deg</independentVar>
              <tableData breakPoint="0">
                              -25	         0	        25
                    -10	  -0.04873	    0.00000	    0.04873
                      2	  -0.04491	    0.00000	    0.04491
                     10	  -0.04249	    0.00000	    0.04249
                     18	  -0.03052	    0.00000	    0.03052
                     30	  -0.02190	    0.00000	    0.02190
                     60	  -0.00473	    0.00000	    0.00473
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              </tableData>
          </table>
       </product>
    </function>
    <function name="aero/c/CFYDSBL">
    <description>SIDE FORCE DUE TO LOWER SPEEDBRAKE DEFLECTION</description>
    <product>
          <property>fcs/airbrake-upper</property>
          <table>
            <independentVar lookup="row">aero/alpha-deg</independentVar>
            <tableData>
                    -10		    0.00051
                     -5		  -0.00327
                      4		  -0.00023
                     12		  -0.00326
                     20		    0.00009
                     35		  -0.00218
                     60		  -0.00374
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            </tableData>
          </table>
       </product>
    </function>
    <function name="aero/c/CFYDSBU">
    <description>SIDE FORCE DUE TO UPPER SPEEDBRAKE DEFLECTION</description>
    <product>
          <property>fcs/airbrake-lower</property>
          <table>
            <independentVar lookup="row">aero/alpha-deg</independentVar>
            <tableData>
                    -10		    0.00012
                     -5		  -0.00024
                      4		  -0.00239
                     12		  -0.00475
                     20		  -0.00069
                     35		  -0.00019
                     60		    0.00039
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            </tableData>
          </table>
       </product>
    </function>
    <function name="aero/c/CFYDSD1L">
    <description>SIDE FORCE DUE TO LE SLAT 1L DEFLECTION</description>
    <product>
          <property>fcs/slat-1L-pos-deg</property>
          <table>
            <independentVar lookup="row">aero/alpha-deg</independentVar>
            <tableData>
                    -10		    0.00025
                     -5		  -0.00008
                      4		  -0.00024
                     12		  -0.00206
                     20		  -0.00223
                     35		  -0.00291
                     60		  -0.00202
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            </tableData>
          </table>
       </product>
    </function>
    <function name="aero/c/CFYDSD1R">
    <description>SIDE FORCE DUE TO LE SLAT 1R DEFLECTION</description>
    <product>
          <property>fcs/slat-1R-pos-deg</property>
          <table>
            <independentVar lookup="row">aero/alpha-deg</independentVar>
            <tableData>
                    -10		  -0.00025
                     -5		    0.00008
                      4		    0.00024
                     12		    0.00206
                     20		    0.00223
                     35		    0.00291
                     60		    0.00202
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            </tableData>
          </table>
       </product>
    </function>
    <function name="aero/c/CFYDSD2L">
    <description>SIDE FORCE DUE TO LE SLAT 2L DEFLECTION</description>
    <product>
          <property>fcs/slat-2L-pos-deg</property>
          <table>
            <independentVar lookup="row">aero/alpha-deg</independentVar>
            <tableData>
                    -10		    0.00068
                     -5		  -0.00037
                      4		  -0.00076
                     12		  -0.00398
                     20		  -0.00692
                     35		  -0.00664
                     60		  -0.00430
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            </tableData>
          </table>
       </product>
    </function>
    <function name="aero/c/CFYDSD2R">
    <description>SIDE FORCE DUE TO LE SLAT 2R DEFLECTION</description>
    <product>
          <property>fcs/slat-2R-pos-deg</property>
          <table>
            <independentVar lookup="row">aero/alpha-deg</independentVar>
            <tableData>
                    -10		  -0.00068
                     -5		    0.00037
                      4		    0.00076
                     12		    0.00398
                     20		    0.00692
                     35		    0.00664
                     60		    0.00430
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            </tableData>
          </table>
       </product>
    </function>
    <function name="aero/c/CFYGEAR">
    <description>SIDE FORCE INCREMENT DUE TO GEAR</description>
    <product>
          <property>gear/gear-pos-norm</property>
          <table>
            <independentVar lookup="row">aero/alpha-deg</independentVar>
            <tableData>
                    -10		    0.00001
                     -5		    0.00000
                      2		    0.00000
                      8		  -0.00003
                     14		  -0.00010
                     20		  -0.00005
                     30		  -0.00017
                     40		  -0.00043
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            </tableData>
          </table>
       </product>
    </function>
    <function name="aero/c/CFYmn">
    <description>SIDE FORCE DUE TO MACH</description>
    <product>
          <table>
            <independentVar lookup="row">velocities/mach</independentVar>
            <independentVar lookup="column">aero/alpha-deg</independentVar>
            <tableData>
                                -10	         -1	       0.01	          1	         10
                    0.2	    0.00000	    0.00000	    0.00000	    0.00000	    0.00000
                    0.8	    0.00000	    0.00000	    0.00000	    0.00000	    0.00000
                   0.99	    0.00000	    0.00000	    0.00000	    0.00000	    0.00000
                    1.4	  -0.00002	    0.00000	    0.00000	  -0.00001	  -0.00005
                    1.8	    0.00003	    0.00002	    0.00002	    0.00002	    0.00002
                    2.5	    0.00296	    0.00006	    0.00001	    0.00003	    0.00247
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            </tableData>
          </table>
       </product>
    </function>
    <function name="aero/c/CFYP">
    <description>SIDE FORCE DUE TO ROLL RATE</description>
    <product>
          <property>aero/pb</property>
          <table>
            <independentVar lookup="row">aero/alpha-deg</independentVar>
            <tableData>
                    -10		  -0.22683
                     -5		  -0.07832
                      4		    0.05964
                     12		    0.38726
                     20		    0.70577
                     35		    0.69809
                     60		    0.56785
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            </tableData>
          </table>
       </product>
    </function>
    <function name="aero/c/CFYR">
    <description>SIDE FORCE DUE TO YAW RATE</description>
    <product>
          <property>aero/rb</property>
          <table>
            <independentVar lookup="row">aero/alpha-deg</independentVar>
            <tableData>
                    -10		    0.48246
                     -5		    0.37794
                      4		    0.32707
                     12		    0.36814
                     20		    0.24493
                     35		    0.24194
                     60		    0.28658
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            </tableData>
          </table>
       </product>
    </function>
    <function name="aero/c/CMN1">
    <description>BASIC YAWING MOMENT</description>
    <product>
          <table>
            <independentVar lookup="row">aero/alpha-deg</independentVar>
            <independentVar lookup="column">aero/beta-deg</independentVar>
            <tableData>
                                 -7	         -5	         -2	          0	          2	          5	          7
                    -10	  -0.00292	    0.00017	    0.00049	    0.00000	  -0.00049	  -0.00017	    0.00292
                      2	    0.00153	    0.00182	    0.00067	    0.00000	  -0.00067	  -0.00182	  -0.00153
                     10	    0.00381	    0.00443	    0.00192	    0.00000	  -0.00192	  -0.00443	  -0.00381
                     18	    0.00361	    0.00195	    0.00054	    0.00000	  -0.00054	  -0.00195	  -0.00361
                     30	  -0.00099	  -0.00023	    0.00045	    0.00000	  -0.00045	    0.00023	    0.00099
                     60	    0.00395	    0.00244	    0.00088	    0.00000	  -0.00088	  -0.00244	  -0.00395
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            </tableData>
          </table>
       </product>
    </function>
    <function name="aero/c/CMNDED1L">
    <description>YAW MOMENT DUE TO ELEVON 1L</description>
    <product>
          <table>
            <independentVar lookup="row">aero/alpha-deg</independentVar>
            <independentVar lookup="column">aero/beta-deg</independentVar>
            <independentVar lookup="table">fcs/elevon-1L-pos-deg</independentVar>
              <tableData breakPoint="-16">
                               -7	        -5	        -2	         0	         2	         5	         7
                    -10	  -0.00365	  -0.00348	  -0.00315	  -0.00278	  -0.00235	  -0.00205	  -0.00147
                      2	  -0.00358	  -0.00325	  -0.00327	  -0.00250	  -0.00265	  -0.00245	  -0.00218
                     10	  -0.00224	  -0.00245	  -0.00257	  -0.00271	  -0.00274	  -0.00273	  -0.00329
                     18	  -0.00542	  -0.00549	  -0.00461	  -0.00466	  -0.00406	  -0.00274	  -0.00270
                     30	  -0.00618	  -0.00594	  -0.00572	  -0.00524	  -0.00610	  -0.00556	  -0.00627
                     60	  -0.00208	  -0.00193	  -0.00174	  -0.00168	  -0.00151	  -0.00124	  -0.00141
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              </tableData>
              <tableData breakPoint="-10">
                               -7	        -5	        -2	         0	         2	         5	         7
                    -10	  -0.00238	  -0.00195	  -0.00175	  -0.00154	  -0.00127	  -0.00110	  -0.00046
                      2	  -0.00190	  -0.00173	  -0.00168	  -0.00125	  -0.00139	  -0.00129	  -0.00111
                     10	  -0.00095	  -0.00126	  -0.00136	  -0.00146	  -0.00151	  -0.00153	  -0.00163
                     18	  -0.00369	  -0.00372	  -0.00290	  -0.00290	  -0.00276	  -0.00193	  -0.00132
                     30	  -0.00368	  -0.00381	  -0.00347	  -0.00320	  -0.00373	  -0.00338	  -0.00416
                     60	  -0.00122	  -0.00114	  -0.00102	  -0.00099	  -0.00088	  -0.00050	  -0.00084
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              </tableData>
              <tableData breakPoint="-5">
                               -7	        -5	        -2	         0	         2	         5	         7
                    -10	  -0.00075	  -0.00086	  -0.00076	  -0.00066	  -0.00053	  -0.00045	  -0.00056
                      2	  -0.00081	  -0.00071	  -0.00066	  -0.00048	  -0.00057	  -0.00054	  -0.00044
                     10	  -0.00059	  -0.00050	  -0.00056	  -0.00062	  -0.00066	  -0.00068	  -0.00073
                     18	  -0.00173	  -0.00159	  -0.00140	  -0.00135	  -0.00120	  -0.00075	  -0.00114
                     30	  -0.00194	  -0.00192	  -0.00171	  -0.00153	  -0.00166	  -0.00150	  -0.00198
                     60	  -0.00057	  -0.00054	  -0.00048	  -0.00046	  -0.00041	  -0.00004	  -0.00039
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              </tableData>
              <tableData breakPoint="0">
                               -7	        -5	        -2	         0	         2	         5	         7
                    -10	    0.00000	    0.00000	    0.00000	    0.00000	    0.00000	    0.00000	    0.00000
                      2	    0.00000	    0.00000	    0.00000	    0.00000	    0.00000	    0.00000	    0.00000
                     10	    0.00000	    0.00000	    0.00000	    0.00000	    0.00000	    0.00000	    0.00000
                     18	    0.00000	    0.00000	    0.00000	    0.00000	    0.00000	    0.00000	    0.00000
                     30	    0.00000	    0.00000	    0.00000	    0.00000	    0.00000	    0.00000	    0.00000
                     60	    0.00000	    0.00000	    0.00000	    0.00000	    0.00000	    0.00000	    0.00000
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              </tableData>
              <tableData breakPoint="5">
                               -7	        -5	        -2	         0	         2	         5	         7
                    -10	    0.00047	    0.00056	    0.00045	    0.00040	    0.00030	    0.00024	    0.00034
                      2	    0.00029	    0.00035	    0.00015	    0.00007	    0.00048	    0.00028	    0.00002
                     10	    0.00032	    0.00026	    0.00031	    0.00038	    0.00043	    0.00047	    0.00054
                     18	    0.00166	    0.00139	    0.00138	    0.00117	    0.00109	    0.00090	    0.00125
                     30	    0.00177	    0.00169	    0.00149	    0.00132	    0.00153	    0.00165	    0.00167
                     60	    0.00050	    0.00044	    0.00039	    0.00038	    0.00034	    0.00032	    0.00030
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              </tableData>
              <tableData breakPoint="10">
                               -7	        -5	        -2	         0	         2	         5	         7
                    -10	    0.00068	    0.00086	    0.00063	    0.00053	    0.00035	    0.00030	    0.00046
                      2	    0.00020	    0.00033	    0.00013	  -0.00028	    0.00031	    0.00012	    0.00022
                     10	    0.00038	    0.00027	    0.00038	    0.00053	    0.00060	    0.00074	    0.00089
                     18	    0.00308	    0.00265	    0.00263	    0.00234	    0.00211	    0.00186	    0.00195
                     30	    0.00332	    0.00316	    0.00281	    0.00260	    0.00280	    0.00326	    0.00313
                     60	    0.00089	    0.00079	    0.00068	    0.00068	    0.00062	    0.00056	    0.00053
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              </tableData>
              <tableData breakPoint="20">
                               -7	        -5	        -2	         0	         2	         5	         7
                    -10	    0.00044	    0.00067	    0.00019	    0.00006	  -0.00018	  -0.00047	  -0.00007
                      2	  -0.00091	  -0.00059	  -0.00097	  -0.00178	  -0.00057	  -0.00104	  -0.00075
                     10	  -0.00012	  -0.00032	  -0.00007	    0.00024	    0.00047	    0.00077	    0.00104
                     18	    0.00496	    0.00497	    0.00491	    0.00401	    0.00372	    0.00320	    0.00292
                     30	    0.00577	    0.00550	    0.00523	    0.00437	    0.00474	    0.00542	    0.00523
                     60	    0.00137	    0.00122	    0.00104	    0.00102	    0.00091	    0.00082	    0.00020
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              </tableData>
              <tableData breakPoint="25">
                               -7	        -5	        -2	         0	         2	         5	         7
                    -10	    0.00006	    0.00063	  -0.00027	  -0.00042	  -0.00065	  -0.00092	  -0.00047
                      2	  -0.00170	  -0.00130	  -0.00172	  -0.00275	  -0.00132	  -0.00180	  -0.00144
                     10	  -0.00055	  -0.00078	  -0.00045	  -0.00007	    0.00023	    0.00062	    0.00096
                     18	    0.00555	    0.00573	    0.00525	    0.00495	    0.00452	    0.00367	    0.00342
                     30	    0.00667	    0.00635	    0.00600	    0.00503	    0.00541	    0.00618	    0.00601
                     60	    0.00148	    0.00132	    0.00112	    0.00108	    0.00096	    0.00086	    0.00023
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              </tableData>
          </table>
       </product>
    </function>
    <function name="aero/c/CMNDED1R">
    <description>YAW MOMENT DUE TO ELEVON 1R</description>
    <product>
          <table>
            <independentVar lookup="row">aero/alpha-deg</independentVar>
            <independentVar lookup="column">aero/beta-deg</independentVar>
            <independentVar lookup="table">fcs/elevon-1R-pos-deg</independentVar>
              <tableData breakPoint="-16">
                               -7	        -5	        -2	         0	         2	         5	         7
                    -10	    0.00365	    0.00348	    0.00315	    0.00278	    0.00235	    0.00205	    0.00147
                      2	    0.00358	    0.00325	    0.00327	    0.00250	    0.00265	    0.00245	    0.00218
                     10	    0.00224	    0.00245	    0.00257	    0.00271	    0.00274	    0.00273	    0.00329
                     18	    0.00542	    0.00549	    0.00461	    0.00466	    0.00406	    0.00274	    0.00270
                     30	    0.00618	    0.00594	    0.00572	    0.00524	    0.00610	    0.00556	    0.00627
                     60	    0.00208	    0.00193	    0.00174	    0.00168	    0.00151	    0.00124	    0.00141
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              </tableData>
              <tableData breakPoint="-10">
                               -7	        -5	        -2	         0	         2	         5	         7
                    -10	    0.00238	    0.00195	    0.00175	    0.00154	    0.00127	    0.00110	    0.00046
                      2	    0.00190	    0.00173	    0.00168	    0.00125	    0.00139	    0.00129	    0.00111
                     10	    0.00095	    0.00126	    0.00136	    0.00146	    0.00151	    0.00153	    0.00163
                     18	    0.00369	    0.00372	    0.00290	    0.00290	    0.00276	    0.00193	    0.00132
                     30	    0.00368	    0.00381	    0.00347	    0.00320	    0.00373	    0.00338	    0.00416
                     60	    0.00122	    0.00114	    0.00102	    0.00099	    0.00088	    0.00050	    0.00084
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              </tableData>
              <tableData breakPoint="-5">
                               -7	        -5	        -2	         0	         2	         5	         7
                    -10	    0.00075	    0.00086	    0.00076	    0.00066	    0.00053	    0.00045	    0.00056
                      2	    0.00081	    0.00071	    0.00066	    0.00048	    0.00057	    0.00054	    0.00044
                     10	    0.00059	    0.00050	    0.00056	    0.00062	    0.00066	    0.00068	    0.00073
                     18	    0.00173	    0.00159	    0.00140	    0.00135	    0.00120	    0.00075	    0.00114
                     30	    0.00194	    0.00192	    0.00171	    0.00153	    0.00166	    0.00150	    0.00198
                     60	    0.00057	    0.00054	    0.00048	    0.00046	    0.00041	    0.00004	    0.00039
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              </tableData>
              <tableData breakPoint="0">
                               -7	        -5	        -2	         0	         2	         5	         7
                    -10	    0.00000	    0.00000	    0.00000	    0.00000	    0.00000	    0.00000	    0.00000
                      2	    0.00000	    0.00000	    0.00000	    0.00000	    0.00000	    0.00000	    0.00000
                     10	    0.00000	    0.00000	    0.00000	    0.00000	    0.00000	    0.00000	    0.00000
                     18	    0.00000	    0.00000	    0.00000	    0.00000	    0.00000	    0.00000	    0.00000
                     30	    0.00000	    0.00000	    0.00000	    0.00000	    0.00000	    0.00000	    0.00000
                     60	    0.00000	    0.00000	    0.00000	    0.00000	    0.00000	    0.00000	    0.00000
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              </tableData>
              <tableData breakPoint="5">
                               -7	        -5	        -2	         0	         2	         5	         7
                    -10	  -0.00047	  -0.00056	  -0.00045	  -0.00040	  -0.00030	  -0.00024	  -0.00034
                      2	  -0.00029	  -0.00035	  -0.00015	  -0.00007	  -0.00048	  -0.00028	  -0.00002
                     10	  -0.00032	  -0.00026	  -0.00031	  -0.00038	  -0.00043	  -0.00047	  -0.00054
                     18	  -0.00166	  -0.00139	  -0.00138	  -0.00117	  -0.00109	  -0.00090	  -0.00125
                     30	  -0.00177	  -0.00169	  -0.00149	  -0.00132	  -0.00153	  -0.00165	  -0.00167
                     60	  -0.00050	  -0.00044	  -0.00039	  -0.00038	  -0.00034	  -0.00032	  -0.00030
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              </tableData>
              <tableData breakPoint="10">
                               -7	        -5	        -2	         0	         2	         5	         7
                    -10	  -0.00068	  -0.00086	  -0.00063	  -0.00053	  -0.00035	  -0.00030	  -0.00046
                      2	  -0.00020	  -0.00033	  -0.00013	    0.00028	  -0.00031	  -0.00012	  -0.00022
                     10	  -0.00038	  -0.00027	  -0.00038	  -0.00053	  -0.00060	  -0.00074	  -0.00089
                     18	  -0.00308	  -0.00265	  -0.00263	  -0.00234	  -0.00211	  -0.00186	  -0.00195
                     30	  -0.00332	  -0.00316	  -0.00281	  -0.00260	  -0.00280	  -0.00326	  -0.00313
                     60	  -0.00089	  -0.00079	  -0.00068	  -0.00068	  -0.00062	  -0.00056	  -0.00053
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              </tableData>
              <tableData breakPoint="20">
                               -7	        -5	        -2	         0	         2	         5	         7
                    -10	  -0.00044	  -0.00067	  -0.00019	  -0.00006	    0.00018	    0.00047	    0.00007
                      2	    0.00091	    0.00059	    0.00097	    0.00178	    0.00057	    0.00104	    0.00075
                     10	    0.00012	    0.00032	    0.00007	  -0.00024	  -0.00047	  -0.00077	  -0.00104
                     18	  -0.00496	  -0.00497	  -0.00491	  -0.00401	  -0.00372	  -0.00320	  -0.00292
                     30	  -0.00577	  -0.00550	  -0.00523	  -0.00437	  -0.00474	  -0.00542	  -0.00523
                     60	  -0.00137	  -0.00122	  -0.00104	  -0.00102	  -0.00091	  -0.00082	  -0.00020
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              </tableData>
              <tableData breakPoint="25">
                               -7	        -5	        -2	         0	         2	         5	         7
                    -10	  -0.00006	  -0.00063	    0.00027	    0.00042	    0.00065	    0.00092	    0.00047
                      2	    0.00170	    0.00130	    0.00172	    0.00275	    0.00132	    0.00180	    0.00144
                     10	    0.00055	    0.00078	    0.00045	    0.00007	  -0.00023	  -0.00062	  -0.00096
                     18	  -0.00555	  -0.00573	  -0.00525	  -0.00495	  -0.00452	  -0.00367	  -0.00342
                     30	  -0.00667	  -0.00635	  -0.00600	  -0.00503	  -0.00541	  -0.00618	  -0.00601
                     60	  -0.00148	  -0.00132	  -0.00112	  -0.00108	  -0.00096	  -0.00086	  -0.00023
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              </tableData>
          </table>
       </product>
    </function>
    <function name="aero/c/CMNDED2L">
    <description>YAW MOMENT DUE TO ELEVON 2L</description>
    <product>
          <table>
            <independentVar lookup="row">aero/alpha-deg</independentVar>
            <independentVar lookup="column">aero/beta-deg</independentVar>
            <independentVar lookup="table">fcs/elevon-2L-pos-deg</independentVar>
              <tableData breakPoint="-16">
                               -7	        -5	        -2	         0	         2	         5	         7
                    -10	  -0.00331	  -0.00195	  -0.00173	  -0.00161	  -0.00132	  -0.00113	  -0.00050
                      2	  -0.00205	  -0.00165	  -0.00206	  -0.00147	  -0.00127	  -0.00055	  -0.00016
                     10	  -0.00142	  -0.00127	  -0.00132	  -0.00132	  -0.00106	  -0.00092	  -0.00105
                     18	  -0.00307	  -0.00305	  -0.00236	  -0.00196	  -0.00167	  -0.00035	    0.00009
                     30	  -0.00343	  -0.00402	  -0.00329	  -0.00254	  -0.00368	  -0.00364	  -0.00462
                     60	  -0.00016	  -0.00062	  -0.00043	  -0.00051	  -0.00054	  -0.00080	  -0.00117
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              </tableData>
              <tableData breakPoint="-10">
                               -7	        -5	        -2	         0	         2	         5	         7
                    -10	  -0.00235	  -0.00119	  -0.00103	  -0.00099	  -0.00081	  -0.00066	    0.00001
                      2	  -0.00124	  -0.00104	  -0.00121	  -0.00088	  -0.00073	  -0.00028	  -0.00007
                     10	  -0.00068	  -0.00072	  -0.00074	  -0.00080	  -0.00063	  -0.00054	  -0.00070
                     18	  -0.00217	  -0.00235	  -0.00153	  -0.00134	  -0.00122	  -0.00076	    0.00028
                     30	  -0.00188	  -0.00225	  -0.00176	  -0.00229	  -0.00233	  -0.00225	  -0.00270
                     60	    0.00023	  -0.00030	  -0.00022	  -0.00030	  -0.00035	  -0.00055	  -0.00082
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              </tableData>
              <tableData breakPoint="-5">
                               -7	        -5	        -2	         0	         2	         5	         7
                    -10	  -0.00070	  -0.00059	  -0.00049	  -0.00046	  -0.00039	  -0.00030	  -0.00041
                      2	  -0.00056	  -0.00056	  -0.00064	  -0.00040	  -0.00031	  -0.00012	    0.00002
                     10	  -0.00049	  -0.00031	  -0.00032	  -0.00038	  -0.00032	  -0.00024	  -0.00023
                     18	  -0.00118	  -0.00086	  -0.00078	  -0.00082	  -0.00055	  -0.00052	  -0.00012
                     30	  -0.00109	  -0.00095	  -0.00093	  -0.00094	  -0.00100	  -0.00114	  -0.00172
                     60	    0.00056	  -0.00006	  -0.00005	  -0.00015	  -0.00021	  -0.00036	  -0.00054
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              </tableData>
              <tableData breakPoint="0">
                               -7	        -5	        -2	         0	         2	         5	         7
                    -10	    0.00000	    0.00000	    0.00000	    0.00000	    0.00000	    0.00000	    0.00000
                      2	    0.00000	    0.00000	    0.00000	    0.00000	    0.00000	    0.00000	    0.00000
                     10	    0.00000	    0.00000	    0.00000	    0.00000	    0.00000	    0.00000	    0.00000
                     18	    0.00000	    0.00000	    0.00000	    0.00000	    0.00000	    0.00000	    0.00000
                     30	    0.00000	    0.00000	    0.00000	    0.00000	    0.00000	    0.00000	    0.00000
                     60	    0.00000	    0.00000	    0.00000	    0.00000	    0.00000	    0.00000	    0.00000
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              </tableData>
              <tableData breakPoint="5">
                               -7	        -5	        -2	         0	         2	         5	         7
                    -10	    0.00074	    0.00059	    0.00038	    0.00041	    0.00035	    0.00025	    0.00024
                      2	    0.00047	    0.00044	    0.00030	    0.00032	    0.00053	    0.00003	  -0.00021
                     10	    0.00053	    0.00030	    0.00029	    0.00032	    0.00025	    0.00012	    0.00008
                     18	    0.00145	    0.00101	    0.00095	    0.00084	    0.00056	    0.00030	    0.00030
                     30	    0.00157	    0.00136	    0.00126	    0.00087	    0.00084	    0.00106	    0.00070
                     60	    0.00055	    0.00037	    0.00020	    0.00013	    0.00002	  -0.00001	  -0.00100
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              </tableData>
              <tableData breakPoint="10">
                               -7	        -5	        -2	         0	         2	         5	         7
                    -10	    0.00136	    0.00110	    0.00071	    0.00074	    0.00065	    0.00046	    0.00044
                      2	    0.00090	    0.00078	    0.00076	    0.00055	    0.00076	    0.00002	  -0.00013
                     10	    0.00096	    0.00059	    0.00050	    0.00057	    0.00047	    0.00022	    0.00019
                     18	    0.00228	    0.00196	    0.00188	    0.00152	    0.00119	    0.00051	    0.00037
                     30	    0.00275	    0.00315	    0.00218	    0.00180	    0.00132	    0.00189	    0.00163
                     60	    0.00076	    0.00021	    0.00031	    0.00024	    0.00010	    0.00012	  -0.00084
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              </tableData>
              <tableData breakPoint="20">
                               -7	        -5	        -2	         0	         2	         5	         7
                    -10	    0.00215	    0.00189	    0.00107	    0.00105	    0.00102	    0.00070	    0.00073
                      2	    0.00147	    0.00112	    0.00111	    0.00071	    0.00120	  -0.00017	  -0.00051
                     10	    0.00182	    0.00074	    0.00074	    0.00088	    0.00080	    0.00030	    0.00032
                     18	    0.00447	    0.00366	    0.00384	    0.00282	    0.00232	    0.00135	    0.00065
                     30	    0.00468	    0.00506	    0.00475	    0.00313	    0.00275	    0.00321	    0.00304
                     60	    0.00144	    0.00043	    0.00049	    0.00037	    0.00022	    0.00012	  -0.00064
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              </tableData>
              <tableData breakPoint="25">
                               -7	        -5	        -2	         0	         2	         5	         7
                    -10	    0.00242	    0.00247	    0.00114	    0.00112	    0.00110	    0.00038	    0.00086
                      2	    0.00165	    0.00121	    0.00118	    0.00069	    0.00127	  -0.00024	  -0.00071
                     10	    0.00173	    0.00080	    0.00081	    0.00095	    0.00089	    0.00029	    0.00016
                     18	    0.00537	    0.00482	    0.00443	    0.00303	    0.00273	    0.00164	    0.00092
                     30	    0.00522	    0.00567	    0.00535	    0.00364	    0.00323	    0.00361	    0.00362
                     60	    0.00152	    0.00068	    0.00053	    0.00040	    0.00024	    0.00016	  -0.00061
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              </tableData>
          </table>
       </product>
    </function>
    <function name="aero/c/CMNDED2R">
    <description>YAW MOMENT DUE TO ELEVON 2R</description>
    <product>
          <table>
            <independentVar lookup="row">aero/alpha-deg</independentVar>
            <independentVar lookup="column">aero/beta-deg</independentVar>
            <independentVar lookup="table">fcs/elevon-2R-pos-deg</independentVar>
              <tableData breakPoint="-16">
                               -7	        -5	        -2	         0	         2	         5	         7
                    -10	    0.00331	    0.00195	    0.00173	    0.00161	    0.00132	    0.00113	    0.00050
                      2	    0.00205	    0.00165	    0.00206	    0.00147	    0.00127	    0.00055	    0.00016
                     10	    0.00142	    0.00127	    0.00132	    0.00132	    0.00106	    0.00092	    0.00105
                     18	    0.00307	    0.00305	    0.00236	    0.00196	    0.00167	    0.00035	  -0.00009
                     30	    0.00343	    0.00402	    0.00329	    0.00254	    0.00368	    0.00364	    0.00462
                     60	    0.00016	    0.00062	    0.00043	    0.00051	    0.00054	    0.00080	    0.00117
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              </tableData>
              <tableData breakPoint="-10">
                               -7	        -5	        -2	         0	         2	         5	         7
                    -10	    0.00235	    0.00119	    0.00103	    0.00099	    0.00081	    0.00066	  -0.00001
                      2	    0.00124	    0.00104	    0.00121	    0.00088	    0.00073	    0.00028	    0.00007
                     10	    0.00068	    0.00072	    0.00074	    0.00080	    0.00063	    0.00054	    0.00070
                     18	    0.00217	    0.00235	    0.00153	    0.00134	    0.00122	    0.00076	  -0.00028
                     30	    0.00188	    0.00225	    0.00176	    0.00229	    0.00233	    0.00225	    0.00270
                     60	  -0.00023	    0.00030	    0.00022	    0.00030	    0.00035	    0.00055	    0.00082
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              </tableData>
              <tableData breakPoint="-5">
                               -7	        -5	        -2	         0	         2	         5	         7
                    -10	    0.00070	    0.00059	    0.00049	    0.00046	    0.00039	    0.00030	    0.00041
                      2	    0.00056	    0.00056	    0.00064	    0.00040	    0.00031	    0.00012	  -0.00002
                     10	    0.00049	    0.00031	    0.00032	    0.00038	    0.00032	    0.00024	    0.00023
                     18	    0.00118	    0.00086	    0.00078	    0.00082	    0.00055	    0.00052	    0.00012
                     30	    0.00109	    0.00095	    0.00093	    0.00094	    0.00100	    0.00114	    0.00172
                     60	  -0.00056	    0.00006	    0.00005	    0.00015	    0.00021	    0.00036	    0.00054
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              </tableData>
              <tableData breakPoint="0">
                               -7	        -5	        -2	         0	         2	         5	         7
                    -10	    0.00000	    0.00000	    0.00000	    0.00000	    0.00000	    0.00000	    0.00000
                      2	    0.00000	    0.00000	    0.00000	    0.00000	    0.00000	    0.00000	    0.00000
                     10	    0.00000	    0.00000	    0.00000	    0.00000	    0.00000	    0.00000	    0.00000
                     18	    0.00000	    0.00000	    0.00000	    0.00000	    0.00000	    0.00000	    0.00000
                     30	    0.00000	    0.00000	    0.00000	    0.00000	    0.00000	    0.00000	    0.00000
                     60	    0.00000	    0.00000	    0.00000	    0.00000	    0.00000	    0.00000	    0.00000
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              </tableData>
              <tableData breakPoint="5">
                               -7	        -5	        -2	         0	         2	         5	         7
                    -10	  -0.00074	  -0.00059	  -0.00038	  -0.00041	  -0.00035	  -0.00025	  -0.00024
                      2	  -0.00047	  -0.00044	  -0.00030	  -0.00032	  -0.00053	  -0.00003	    0.00021
                     10	  -0.00053	  -0.00030	  -0.00029	  -0.00032	  -0.00025	  -0.00012	  -0.00008
                     18	  -0.00145	  -0.00101	  -0.00095	  -0.00084	  -0.00056	  -0.00030	  -0.00030
                     30	  -0.00157	  -0.00136	  -0.00126	  -0.00087	  -0.00084	  -0.00106	  -0.00070
                     60	  -0.00055	  -0.00037	  -0.00020	  -0.00013	  -0.00002	    0.00001	    0.00100
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              </tableData>
              <tableData breakPoint="10">
                               -7	        -5	        -2	         0	         2	         5	         7
                    -10	  -0.00136	  -0.00110	  -0.00071	  -0.00074	  -0.00065	  -0.00046	  -0.00044
                      2	  -0.00090	  -0.00078	  -0.00076	  -0.00055	  -0.00076	  -0.00002	    0.00013
                     10	  -0.00096	  -0.00059	  -0.00050	  -0.00057	  -0.00047	  -0.00022	  -0.00019
                     18	  -0.00228	  -0.00196	  -0.00188	  -0.00152	  -0.00119	  -0.00051	  -0.00037
                     30	  -0.00275	  -0.00315	  -0.00218	  -0.00180	  -0.00132	  -0.00189	  -0.00163
                     60	  -0.00076	  -0.00021	  -0.00031	  -0.00024	  -0.00010	  -0.00012	    0.00084
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              </tableData>
              <tableData breakPoint="20">
                               -7	        -5	        -2	         0	         2	         5	         7
                    -10	  -0.00215	  -0.00189	  -0.00107	  -0.00105	  -0.00102	  -0.00070	  -0.00073
                      2	  -0.00147	  -0.00112	  -0.00111	  -0.00071	  -0.00120	    0.00017	    0.00051
                     10	  -0.00182	  -0.00074	  -0.00074	  -0.00088	  -0.00080	  -0.00030	  -0.00032
                     18	  -0.00447	  -0.00366	  -0.00384	  -0.00282	  -0.00232	  -0.00135	  -0.00065
                     30	  -0.00468	  -0.00506	  -0.00475	  -0.00313	  -0.00275	  -0.00321	  -0.00304
                     60	  -0.00144	  -0.00043	  -0.00049	  -0.00037	  -0.00022	  -0.00012	    0.00064
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              </tableData>
              <tableData breakPoint="25">
                               -7	        -5	        -2	         0	         2	         5	         7
                    -10	  -0.00242	  -0.00247	  -0.00114	  -0.00112	  -0.00110	  -0.00038	  -0.00086
                      2	  -0.00165	  -0.00121	  -0.00118	  -0.00069	  -0.00127	    0.00024	    0.00071
                     10	  -0.00173	  -0.00080	  -0.00081	  -0.00095	  -0.00089	  -0.00029	  -0.00016
                     18	  -0.00537	  -0.00482	  -0.00443	  -0.00303	  -0.00273	  -0.00164	  -0.00092
                     30	  -0.00522	  -0.00567	  -0.00535	  -0.00364	  -0.00323	  -0.00361	  -0.00362
                     60	  -0.00152	  -0.00068	  -0.00053	  -0.00040	  -0.00024	  -0.00016	    0.00061
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              </tableData>
          </table>
       </product>
    </function>
    <function name="aero/c/CMNDRDr">
    <description>YAWING MOMENT DUE TO RUDDER DEFLECTION</description>
    <product>
          <table>
            <independentVar lookup="row">aero/alpha-deg</independentVar>
            <independentVar lookup="column">aero/beta-deg</independentVar>
            <independentVar lookup="table">fcs/rudder-pos-deg</independentVar>
              <tableData breakPoint="-25">
                               -7	        -5	        -2	         0	         2	         5	         7
                    -10	  -0.02812	  -0.02633	  -0.02540	  -0.02509	  -0.02482	  -0.02501	  -0.02659
                      2	  -0.02420	  -0.02353	  -0.02267	  -0.02218	  -0.02300	  -0.02319	  -0.02402
                     10	  -0.02086	  -0.02029	  -0.01937	  -0.01929	  -0.01877	  -0.01920	  -0.02084
                     18	  -0.01884	  -0.01952	  -0.02022	  -0.01977	  -0.01924	  -0.01885	  -0.01909
                     30	  -0.01565	  -0.01467	  -0.01375	  -0.01318	  -0.01345	  -0.01490	  -0.01559
                     60	  -0.00212	  -0.00210	  -0.00208	  -0.00216	  -0.00227	  -0.00293	  -0.00284
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              </tableData>
              <tableData breakPoint="0">
                               -7	        -5	        -2	         0	         2	         5	         7
                    -10	    0.00000	    0.00000	    0.00000	    0.00000	    0.00000	    0.00000	    0.00000
                      2	    0.00000	    0.00000	    0.00000	    0.00000	    0.00000	    0.00000	    0.00000
                     10	    0.00000	    0.00000	    0.00000	    0.00000	    0.00000	    0.00000	    0.00000
                     18	    0.00000	    0.00000	    0.00000	    0.00000	    0.00000	    0.00000	    0.00000
                     30	    0.00000	    0.00000	    0.00000	    0.00000	    0.00000	    0.00000	    0.00000
                     60	    0.00000	    0.00000	    0.00000	    0.00000	    0.00000	    0.00000	    0.00000
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              </tableData>
              <tableData breakPoint="25">
                               -7	        -5	        -2	         0	         2	         5	         7
                    -10	    0.02659	    0.02501	    0.02482	    0.02509	    0.02540	    0.02633	    0.02812
                      2	    0.02402	    0.02319	    0.02300	    0.02218	    0.02267	    0.02353	    0.02420
                     10	    0.02084	    0.01920	    0.01877	    0.01929	    0.01937	    0.02029	    0.02086
                     18	    0.01909	    0.01885	    0.01924	    0.01977	    0.02022	    0.01952	    0.01884
                     30	    0.01559	    0.01490	    0.01345	    0.01318	    0.01375	    0.01467	    0.01565
                     60	    0.00284	    0.00293	    0.00227	    0.00216	    0.00208	    0.00210	    0.00212
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              </tableData>
          </table>
       </product>
    </function>
    <function name="aero/c/CMNDSBL">
    <description>YAW MOMENT DUE TO LOWER SPEEDBRAKE DEFLECTION</description>
    <product>
          <property>fcs/airbrake-upper</property>
          <table>
            <independentVar lookup="row">aero/alpha-deg</independentVar>
            <tableData>
                    -10		  -0.00014
                     -5		  -0.00069
                      4		  -0.00102
                     12		  -0.00344
                     20		  -0.00194
                     35		  -0.00103
                     60		  -0.00175
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            </tableData>
          </table>
       </product>
    </function>
    <function name="aero/c/CMNDSBU">
    <description>YAW MOMENT DUE TO UPPER SPEEDBRAKE DEFLECTION</description>
    <product>
          <property>fcs/airbrake-lower</property>
          <table>
            <independentVar lookup="row">aero/alpha-deg</independentVar>
            <tableData>
                    -10		  -0.00079
                     -5		  -0.00047
                      4		  -0.00048
                     12		  -0.00049
                     20		  -0.00008
                     35		    0.00004
                     60		    0.00041
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            </tableData>
          </table>
       </product>
    </function>
    <function name="aero/c/CMNDSD1L">
    <description>YAW MOMENT DUE TO LE SLAT 1L</description>
    <product>
          <property>fcs/slat-1L-pos-deg</property>
          <table>
            <independentVar lookup="row">aero/alpha-deg</independentVar>
            <tableData>
                    -10		  -0.00060
                     -5		  -0.00014
                      4		    0.00035
                     12		    0.00148
                     20		    0.00223
                     35		    0.00200
                     60		    0.00119
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            </tableData>
          </table>
       </product>
    </function>
    <function name="aero/c/CMNDSD1R">
    <description>YAW MOMENT DUE TO LE SLAT 1R</description>
    <product>
          <property>fcs/slat-1R-pos-deg</property>
          <table>
            <independentVar lookup="row">aero/alpha-deg</independentVar>
            <tableData>
                    -10		    0.00060
                     -5		    0.00014
                      4		  -0.00035
                     12		  -0.00148
                     20		  -0.00223
                     35		  -0.00200
                     60		  -0.00119
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            </tableData>
          </table>
       </product>
    </function>
    <function name="aero/c/CMNDSD2L">
    <description>YAW MOMENT DUE TO LE SLAT 2L</description>
    <product>
          <property>fcs/slat-2L-pos-deg</property>
          <table>
            <independentVar lookup="row">aero/alpha-deg</independentVar>
            <tableData>
                    -10		  -0.00138
                     -5		  -0.00040
                      4		    0.00056
                     12		    0.00226
                     20		    0.00374
                     35		    0.00263
                     60		    0.00036
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            </tableData>
          </table>
       </product>
    </function>
    <function name="aero/c/CMNDSD2R">
    <description>YAW MOMENT DUE TO LE SLAT 2R</description>
    <product>
          <property>fcs/slat-2R-pos-deg</property>
          <table>
            <independentVar lookup="row">aero/alpha-deg</independentVar>
            <tableData>
                    -10		    0.00138
                     -5		    0.00040
                      4		  -0.00056
                     12		  -0.00226
                     20		  -0.00374
                     35		  -0.00263
                     60		  -0.00036
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            </tableData>
          </table>
       </product>
    </function>
    <function name="aero/c/CMNGEAR">
    <description>YAWING MOMENT INCREMENT DUE TO GEAR</description>
    <product>
          <property>gear/gear-pos-norm</property>
          <table>
            <independentVar lookup="row">aero/alpha-deg</independentVar>
            <tableData>
                    -10		  -0.00001
                     -5		  -0.00001
                      2		    0.00000
                      8		    0.00000
                     14		    0.00000
                     20		  -0.00007
                     30		    0.00012
                     40		    0.00010
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            </tableData>
          </table>
       </product>
    </function>
    <function name="aero/c/CMNmnw">
    <description>YAW DUE TO MACH</description>
    <product>
          <table>
            <independentVar lookup="row">velocities/mach</independentVar>
            <independentVar lookup="column">aero/alpha-deg</independentVar>
            <tableData>
                                -10	         -1	       0.01	          1	         10
                    0.2	    0.00000	    0.00000	    0.00000	    0.00000	    0.00000
                    0.8	    0.00000	    0.00000	    0.00000	    0.00000	    0.00000
                   0.99	    0.00000	    0.00000	    0.00000	    0.00000	    0.00000
                    1.4	    0.00001	    0.00001	    0.00000	    0.00003	    0.00002
                    1.8	  -0.00011	  -0.00002	  -0.00001	  -0.00001	    0.00001
                    2.5	    0.00028	    0.00001	  -0.00001	  -0.00001	    0.00024
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            </tableData>
          </table>
       </product>
    </function>
    <function name="aero/c/CMNP">
    <description>YAWING MOMENT DUE TO ROLL RATE</description>
    <product>
          <property>aero/pb</property>
          <table>
            <independentVar lookup="row">aero/alpha-deg</independentVar>
            <tableData>
                    -10		    0.06857
                     -5		    0.07653
                      4		    0.04685
                     12		    0.04584
                     20		  -0.00054
                     35		    0.01298
                     60		  -0.00587
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            </tableData>
          </table>
       </product>
    </function>
    <function name="aero/c/CMNR">
    <description>YAW DAMPING DERIVATIVE</description>
    <product>
          <property>aero/rb</property>
          <table>
            <independentVar lookup="row">aero/alpha-deg</independentVar>
            <tableData>
                    -10		  -0.20773
                     -5		  -0.17547
                      4		  -0.15859
                     12		  -0.18114
                     20		  -0.19792
                     35		  -0.12532
                     60		    0.01289
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            </tableData>
          </table>
       </product>
    </function>
    <function name="aero/coefficients/CLIFT">
      <sum>
          <property>aero/c/CFZB</property>
          <property>aero/c/CFZDED1L</property>
          <property>aero/c/CFZDED1R</property>
          <property>aero/c/CFZDE2L</property>
          <property>aero/c/CFZDE2R</property>
          <property>aero/c/CFZDSD1L</property>
          <property>aero/c/CFZDSD1R</property>
          <property>aero/c/CFZDSBU</property>
          <property>aero/c/CFZDEL</property>
          <property>aero/c/CFZGEAR</property>
          <property>aero/c/CFZmn</property>
       </sum>
    </function>
  <axis name="LIFT">
    <function name="aero/force/LIFT">
    <product>
          <property>aero/qbar-psf</property>
          <property>metrics/Sw-sqft</property>
          <property>aero/coefficients/CLIFT</property>
       </product>
    </function>
  </axis>
    <function name="aero/coefficients/CDRAG">
      <sum>
          <property>aero/c/CFXB</property>
          <property>aero/c/CFXDED1L</property>
          <property>aero/c/CFXDED1R</property>
          <property>aero/c/CFXDED2L</property>
          <property>aero/c/CFXDED2R</property>
          <property>aero/c/CFXDSD1L</property>
          <property>aero/c/CFXDSD1R</property>
          <property>aero/c/CFXDSD2L</property>
          <property>aero/c/CFXDSD2R</property>
          <property>aero/c/CFXDSBU</property>
          <property>aero/c/CFXDSBL</property>
          <property>aero/c/CFXGEAR</property>
          <property>aero/c/CFXmn</property>
       </sum>
    </function>
  <axis name="DRAG">
    <function name="aero/force/DRAG">
    <product>
          <property>aero/qbar-psf</property>
          <property>metrics/Sw-sqft</property>
          <property>aero/coefficients/CDRAG</property>
       </product>
    </function>
  </axis>
    <function name="aero/coefficients/CSIDE">
      <sum>
          <property>aero/c/CFYB</property>
          <property>aero/c/CFYP</property>
          <property>aero/c/CFYR</property>
          <property>aero/c/CFYDED1L</property>
          <property>aero/c/CFYDED1R</property>
          <property>aero/c/CFYDED2L</property>
          <property>aero/c/CFYDED2R</property>
          <property>aero/c/CFYDRD</property>
          <property>aero/c/CFYDSD1L</property>
          <property>aero/c/CFYDSD1R</property>
          <property>aero/c/CFYDSD2L</property>
          <property>aero/c/CFYDSD2R</property>
          <property>aero/c/CFYDSBU</property>
          <property>aero/c/CFYDSBL</property>
          <property>aero/c/CFYGEAR</property>
          <property>aero/c/CFYmn</property>
       </sum>
    </function>
  <axis name="SIDE">
    <function name="aero/force/SIDE">
    <product>
          <property>aero/qbar-psf</property>
          <property>metrics/Sw-sqft</property>
          <property>aero/coefficients/CSIDE</property>
       </product>
    </function>
  </axis>
    <function name="aero/coefficients/CROLL">
      <sum>
          <property>aero/c/CML1</property>
          <property>aero/c/CMLP</property>
          <property>aero/c/CMLR</property>
          <property>aero/c/CMLDED1L</property>
          <property>aero/c/CMLDED1R</property>
          <property>aero/c/CMLDED2L</property>
          <property>aero/c/CMLDED2R</property>
          <property>aero/c/CMLDRD</property>
          <property>aero/c/CMLDSD1L</property>
          <property>aero/c/CMLDSD1R</property>
          <property>aero/c/CMLDSD2L</property>
          <property>aero/c/CMLDSD2R</property>
          <property>aero/c/CMLDSBU</property>
          <property>aero/c/CMLDSBL</property>
          <property>aero/c/CMLGEAR</property>
          <property>aero/c/CMLmnw</property>
       </sum>
    </function>
  <axis name="ROLL">
    <function name="aero/force/ROLL">
    <product>
          <property>aero/qbar-psf</property>
          <property>metrics/Sw-sqft</property>
          <property>metrics/bw-ft</property>
          <property>aero/coefficients/CROLL</property>
       </product>
    </function>
  </axis>
    <function name="aero/coefficients/CPITCH">
      <sum>
          <property>aero/c/CMM1</property>
          <property>aero/c/CMMQ</property>
          <property>aero/c/CMMDED1L</property>
          <property>aero/c/CMMDED1R</property>
          <property>aero/c/CMMDED2L</property>
          <property>aero/c/CMMDED2R</property>
          <property>aero/c/CMMDSD1L</property>
          <property>aero/c/CMMDSD1R</property>
          <property>aero/c/CMMDSD2L</property>
          <property>aero/c/CMMDSD2R</property>
          <property>aero/c/CMMDSBU</property>
          <property>aero/c/CMMDSBL</property>
          <property>aero/c/CMMGEAR</property>
          <property>aero/c/CMMmnw</property>
       </sum>
    </function>
  <axis name="PITCH">
    <function name="aero/force/PITCH">
    <product>
          <property>aero/qbar-psf</property>
          <property>metrics/Sw-sqft</property>
          <property>metrics/cbarw-ft</property>
          <property>aero/coefficients/CPITCH</property>
       </product>
    </function>
  </axis>
    <function name="aero/coefficients/CYAW">
      <sum>
          <property>aero/c/CMN1</property>
          <property>aero/c/CMNDED1L</property>
          <property>aero/c/CMNDED1R</property>
          <property>aero/c/CMNDED2L</property>
          <property>aero/c/CMNDED2R</property>
          <property>aero/c/CMNDSD1L</property>
          <property>aero/c/CMNDSD1R</property>
          <property>aero/c/CMNDSD2L</property>
          <property>aero/c/CMNDSD2R</property>
          <property>aero/c/CMNDSBU</property>
          <property>aero/c/CMNDSBL</property>
          <property>aero/c/CMNGEAR</property>
          <property>aero/c/CMNDRDr</property>
          <property>aero/c/CMNP</property>
          <property>aero/c/CMNR</property>
          <property>aero/c/CMNmnw</property>
       </sum>
    </function>
  <axis name="YAW">
    <function name="aero/force/YAW">
    <product>
          <property>aero/qbar-psf</property>
          <property>metrics/Sw-sqft</property>
          <property>metrics/bw-ft</property>
          <property>aero/coefficients/CYAW</property>
       </product>
    </function>
  </axis>
</aerodynamics>
    <output name="c:/temp/JSBOut.csv" type="CSV" rate="10">
        <property caption="alpha-deg">aero/alpha-deg</property>
        <property caption="beta-deg">aero/beta-deg</property>
        <property caption="CFXB">aero/c/CFXB</property>
        <property caption="CFXDED1L">aero/c/CFXDED1L</property>
        <property caption="CFXDED1R">aero/c/CFXDED1R</property>
        <property caption="CFXDED2L">aero/c/CFXDED2L</property>
        <property caption="CFXDED2R">aero/c/CFXDED2R</property>
        <property caption="CFXDSBL">aero/c/CFXDSBL</property>
        <property caption="CFXDSBU">aero/c/CFXDSBU</property>
        <property caption="CFXDSD1L">aero/c/CFXDSD1L</property>
        <property caption="CFXDSD1R">aero/c/CFXDSD1R</property>
        <property caption="CFXDSD2L">aero/c/CFXDSD2L</property>
        <property caption="CFXDSD2R">aero/c/CFXDSD2R</property>
        <property caption="CFXGEAR">aero/c/CFXGEAR</property>
        <property caption="CFXmn">aero/c/CFXmn</property>
        <property caption="CFYB">aero/c/CFYB</property>
        <property caption="CFYDED1L">aero/c/CFYDED1L</property>
        <property caption="CFYDED1R">aero/c/CFYDED1R</property>
        <property caption="CFYDED2L">aero/c/CFYDED2L</property>
        <property caption="CFYDED2R">aero/c/CFYDED2R</property>
        <property caption="CFYDRD">aero/c/CFYDRD</property>
        <property caption="CFYDSBL">aero/c/CFYDSBL</property>
        <property caption="CFYDSBU">aero/c/CFYDSBU</property>
        <property caption="CFYDSD1L">aero/c/CFYDSD1L</property>
        <property caption="CFYDSD1R">aero/c/CFYDSD1R</property>
        <property caption="CFYDSD2L">aero/c/CFYDSD2L</property>
        <property caption="CFYDSD2R">aero/c/CFYDSD2R</property>
        <property caption="CFYGEAR">aero/c/CFYGEAR</property>
        <property caption="CFYmn">aero/c/CFYmn</property>
        <property caption="CFYP">aero/c/CFYP</property>
        <property caption="CFYR">aero/c/CFYR</property>
        <property caption="CFZB">aero/c/CFZB</property>
        <property caption="CFZDE2L">aero/c/CFZDE2L</property>
        <property caption="CFZDE2R">aero/c/CFZDE2R</property>
        <property caption="CFZDED1L">aero/c/CFZDED1L</property>
        <property caption="CFZDED1R">aero/c/CFZDED1R</property>
        <property caption="CFZDEL">aero/c/CFZDEL</property>
        <property caption="CFZDSBU">aero/c/CFZDSBU</property>
        <property caption="CFZDSD1L">aero/c/CFZDSD1L</property>
        <property caption="CFZDSD1R">aero/c/CFZDSD1R</property>
        <property caption="CFZGEAR">aero/c/CFZGEAR</property>
        <property caption="CFZmn">aero/c/CFZmn</property>
        <property caption="CML1">aero/c/CML1</property>
        <property caption="CMLDED1L">aero/c/CMLDED1L</property>
        <property caption="CMLDED1R">aero/c/CMLDED1R</property>
        <property caption="CMLDED2L">aero/c/CMLDED2L</property>
        <property caption="CMLDED2R">aero/c/CMLDED2R</property>
        <property caption="CMLDRD">aero/c/CMLDRD</property>
        <property caption="CMLDSBL">aero/c/CMLDSBL</property>
        <property caption="CMLDSBU">aero/c/CMLDSBU</property>
        <property caption="CMLDSD1L">aero/c/CMLDSD1L</property>
        <property caption="CMLDSD1R">aero/c/CMLDSD1R</property>
        <property caption="CMLDSD2L">aero/c/CMLDSD2L</property>
        <property caption="CMLDSD2R">aero/c/CMLDSD2R</property>
        <property caption="CMLGEAR">aero/c/CMLGEAR</property>
        <property caption="CMLmnw">aero/c/CMLmnw</property>
        <property caption="CMLP">aero/c/CMLP</property>
        <property caption="CMLR">aero/c/CMLR</property>
        <property caption="CMM1">aero/c/CMM1</property>
        <property caption="CMMDED1L">aero/c/CMMDED1L</property>
        <property caption="CMMDED1R">aero/c/CMMDED1R</property>
        <property caption="CMMDED2L">aero/c/CMMDED2L</property>
        <property caption="CMMDED2R">aero/c/CMMDED2R</property>
        <property caption="CMMDSBL">aero/c/CMMDSBL</property>
        <property caption="CMMDSBU">aero/c/CMMDSBU</property>
        <property caption="CMMDSD1L">aero/c/CMMDSD1L</property>
        <property caption="CMMDSD1R">aero/c/CMMDSD1R</property>
        <property caption="CMMDSD2L">aero/c/CMMDSD2L</property>
        <property caption="CMMDSD2R">aero/c/CMMDSD2R</property>
        <property caption="CMMGEAR">aero/c/CMMGEAR</property>
        <property caption="CMMmnw">aero/c/CMMmnw</property>
        <property caption="CMMQ">aero/c/CMMQ</property>
        <property caption="CMN1">aero/c/CMN1</property>
        <property caption="CMNDED1L">aero/c/CMNDED1L</property>
        <property caption="CMNDED1R">aero/c/CMNDED1R</property>
        <property caption="CMNDED2L">aero/c/CMNDED2L</property>
        <property caption="CMNDED2R">aero/c/CMNDED2R</property>
        <property caption="CMNDRDr">aero/c/CMNDRDr</property>
        <property caption="CMNDSBL">aero/c/CMNDSBL</property>
        <property caption="CMNDSBU">aero/c/CMNDSBU</property>
        <property caption="CMNDSD1L">aero/c/CMNDSD1L</property>
        <property caption="CMNDSD1R">aero/c/CMNDSD1R</property>
        <property caption="CMNDSD2L">aero/c/CMNDSD2L</property>
        <property caption="CMNDSD2R">aero/c/CMNDSD2R</property>
        <property caption="CMNGEAR">aero/c/CMNGEAR</property>
        <property caption="CMNmnw">aero/c/CMNmnw</property>
        <property caption="CMNP">aero/c/CMNP</property>
        <property caption="CMNR">aero/c/CMNR</property>
        <property caption="CDRAG">aero/coefficients/CDRAG</property>
        <property caption="CLIFT">aero/coefficients/CLIFT</property>
        <property caption="CPITCH">aero/coefficients/CPITCH</property>
        <property caption="CROLL">aero/coefficients/CROLL</property>
        <property caption="CSIDE">aero/coefficients/CSIDE</property>
        <property caption="CYAW">aero/coefficients/CYAW</property>
        <property caption="pb">aero/pb</property>
        <property caption="qb">aero/qb</property>
        <property caption="qbar-psf">aero/qbar-psf</property>
        <property caption="rb">aero/rb</property>
        <property caption="phi-deg">attitude/phi-deg</property>
        <property caption="psi-deg">attitude/psi-deg</property>
        <property caption="theta-deg">attitude/theta-deg</property>
        <property caption="airbrake-lower">fcs/airbrake-lower</property>
        <property caption="airbrake-upper">fcs/airbrake-upper</property>
        <property caption="elevon-1L-pos-deg">fcs/elevon-1L-pos-deg</property>
        <property caption="elevon-1R-pos-deg">fcs/elevon-1R-pos-deg</property>
        <property caption="elevon-2L-pos-deg">fcs/elevon-2L-pos-deg</property>
        <property caption="elevon-2R-pos-deg">fcs/elevon-2R-pos-deg</property>
        <property caption="rudder-pos-deg">fcs/rudder-pos-deg</property>
        <property caption="slat-1L-pos-deg">fcs/slat-1L-pos-deg</property>
        <property caption="slat-1R-pos-deg">fcs/slat-1R-pos-deg</property>
        <property caption="slat-2L-pos-deg">fcs/slat-2L-pos-deg</property>
        <property caption="slat-2R-pos-deg">fcs/slat-2R-pos-deg</property>
        <property caption="fbx-total-lbs">forces/fbx-total-lbs</property>
        <property caption="fby-total-lbs">forces/fby-total-lbs</property>
        <property caption="fbz-total-lbs">forces/fbz-total-lbs</property>
        <property caption="gear-pos-norm">gear/gear-pos-norm</property>
        <property caption="l-total-lbsft">moments/l-total-lbsft</property>
        <property caption="m-total-lbsft">moments/m-total-lbsft</property>
        <property caption="n-total-lbsft">moments/n-total-lbsft</property>
        <property caption="mach">velocities/mach</property>
        <property caption="p-aero-rad_sec">velocities/p-aero-rad_sec</property>
        <property caption="q-aero-rad_sec">velocities/q-aero-rad_sec</property>
        <property caption="r-aero-rad_sec">velocities/r-aero-rad_sec</property>
        <property caption="vt-fps">velocities/vt-fps</property>
    </output>
</fdm_config>
